# OpenSim document version 40000
Model 2nd_Hand_Model_Mass-scaled-scaled-scaled-scaled:
  gravity: 0 -9.80665 0
  Ground
  BodySet:
    Body thorax: mass=0 [kg] mass_center=(0 0 0) inertia=(0 0 0 0 0 0) meshes=thorax.vtp
      WrapEllipsoid Thorax: xyz_body_rotation=(0.0434587 -0.3319616 0.1898918) translation=(-0.0386 -0.1273 0.0709)
          quadrant=all dimensions=(0.1 0.135 0.08)
    Body clavicle: mass=0 mass_center=(0 0 0) inertia=(0 0 0 0 0 0) meshes=clavicle.vtp
    Body clavphant: mass=0 mass_center=(0 0 0) inertia=(0 0 0 0 0 0)
    Body scapula: mass=0 mass_center=(0 0 0) inertia=(0 0 0 0 0 0) meshes=scapula.vtp
      WrapEllipsoid Deltoid2: active=false xyz_body_rotation=(3.130423 -1.548805 -1.314233)
          translation=(-0.0058 -0.0378 0.0096) quadrant=-y dimensions=(0.03 0.04 0.035)
      WrapTorus Delt3: active=false xyz_body_rotation=(0.6209881 0.32882 -0.5607743)
          translation=(-0.0973 -0.0428 -0.037) quadrant=all inner_radius=0.04 outer_radius=0.06
      WrapTorus INFSP: xyz_body_rotation=(0.02530727 0.5883505 0.1518436) translation=(-0.0561 -0.0199 -0.0112)
          quadrant=all inner_radius=0.008 outer_radius=0.019
      WrapEllipsoid TMIN: xyz_body_rotation=(-2.097537 -0.2808235 -1.763481) translation=(-0.0418 -0.0519 -0.0359)
          quadrant=x dimensions=(0.03 0.03 0.05)
      WrapCylinder TRIlongglen: xyz_body_rotation=(1.375319 -0.2946116 2.435956) translation=(-0.0359 -0.0309 -0.0132)
          quadrant=x radius=0.003 length=0.03
    Body scapphant: mass=0 mass_center=(0 0 0) inertia=(0 0 0 0 0 0)
    Body humphant: mass=0 mass_center=(0 0 0) inertia=(0 0 0 0 0 0)
    Body humphant1: mass=0 mass_center=(0 0 0) inertia=(0 0 0 0 0 0)
    Body humerus: mass=0 mass_center=(0 0 0) inertia=(0 0 0 0 0 0) meshes=humerus.vtp
      WrapEllipsoid DELT1hh: xyz_body_rotation=(0.05846853 1.004612 0.5703736) translation=(-0.0139 -0.0127 -0.0262)
          quadrant=z dimensions=(3e-5 0.0001 5e-5)
      WrapCylinder delt2hum: xyz_body_rotation=(1.680927 -0.02495821 0.05166175) translation=(0.0017 -0.0958 0.0011)
          quadrant=all radius=9.4e-6 length=5e-5
      WrapEllipsoid delt3hum: xyz_body_rotation=(1.727352 0.07592182 -2.743134) translation=(0.0019 -0.0592 0.0011)
          quadrant=x dimensions=(1e-5 1e-5 5e-5)
      WrapEllipsoid SUPSP: xyz_body_rotation=(0.03804818 0.00855211 -1.306728) translation=(0.0002 0.0077 0.0043)
          quadrant=all dimensions=(2e-5 2e-5 2e-5)
      WrapEllipsoid INFSP_and_TMIN_hum_head: xyz_body_rotation=(-0.2865831 -0.00907571 -0.06841691)
          translation=(-0.0003 0.0026 0.0038) quadrant=all dimensions=(2e-5 2.5e-5 2e-5)
      WrapEllipsoid SUBSCAP: xyz_body_rotation=(-0.9245009 0.288852 0.381529) translation=(-0.0025 0.0007 -0.0045)
          quadrant=all dimensions=(2e-5 1.7e-5 2.8e-5)
      WrapCylinder TMINhum: xyz_body_rotation=(1.753532 0.06928957 2.746276) translation=(-0.0014 -0.0455 0) quadrant=x
          radius=7e-6 length=7e-5
      WrapSphere TMAJ_LAT_PEC_CORBhh: translation=(0.0007 0 0.006) quadrant=all radius=3e-5
      WrapCylinder TMAJ_LAThum: xyz_body_rotation=(1.536413 -0.06370452 1.41424) translation=(0.0007 -0.0443 -0.0055)
          quadrant=-x radius=7e-6 length=4e-5
      WrapEllipsoid PEC1hh: xyz_body_rotation=(-0.6204646 -0.3104941 0.3637266) translation=(-0.0037 0.0005 -0.0025)
          quadrant=-z dimensions=(3e-5 2e-5 2e-5)
      WrapCylinder PEC12hum: xyz_body_rotation=(1.559277 -0.07749262 -0.9258972) translation=(0.002 -0.0508 -0.0017)
          quadrant=x radius=9e-6 length=7e-5
      WrapSphere PEC23hh: translation=(-0.0086 0.0021 -0.0004) quadrant=all radius=2e-5
      WrapCylinder PEC3hum: xyz_body_rotation=(1.440944 -0.0561996 1.751961) translation=(0.0009 -0.0551 -0.0004)
          quadrant=-x radius=8e-6 length=7e-5
      WrapCylinder LAT_TMAJhh: xyz_body_rotation=(-0.3050835 -0.01832596 -0.6866125)
          translation=(-0.0224 0.0102 0.0094) quadrant=-y radius=7e-6 length=4.5e-5
      WrapSphere LAT_TMAJ2hh: xyz_body_rotation=(-0.1272345 0.2761111 0.01972222) translation=(-0.0016 0.0092 0.0052)
          quadrant=-z radius=3e-5
      WrapCylinder CORBhum: xyz_body_rotation=(-1.608321 0.09599311 0.8752826) translation=(0.0027 -0.1202 -0.0059)
          quadrant=x radius=8e-6 length=5e-5
      WrapEllipsoid TRIlonghh: xyz_body_rotation=(3.001617 -0.853466 2.574186) translation=(-0.0078 -0.0041 -0.0014)
          quadrant=z dimensions=(3.5e-5 2e-5 2e-5)
      WrapCylinder TRI: xyz_body_rotation=(-0.1401499 -0.00628319 0.1549852) translation=(0.0028 -0.2919 -0.0119)
          quadrant=all radius=1.6e-5 length=4e-5
      WrapEllipsoid ANC: xyz_body_rotation=(0.00750492 -0.1966986 1.049292) translation=(0.0134 -0.2861 -0.0008)
          quadrant=-x dimensions=(2e-5 2e-5 2e-5)
      WrapEllipsoid BIClong: xyz_body_rotation=(-2.004336 -1.001644 0.9754645) translation=(0.0033 0.0073 0.0003)
          quadrant=-y dimensions=(2.5e-5 2e-5 2e-5)
      WrapEllipsoid Elbow_BIC_BRD: xyz_body_rotation=(-0.1286308 0.1375319 0.03071779)
          translation=(0.0019 -0.289 -0.014) quadrant=x dimensions=(1.5e-5 1.5e-5 0.0001)
      WrapEllipsoid Elbow_PT_ECRL: xyz_body_rotation=(-0.1610939 -0.1108284 0.6145304)
          translation=(0.003 -0.2872 -0.0069) quadrant=x dimensions=(1.8e-5 2.5e-5 3.5e-5)
    Body ulna: mass=0 mass_center=(0 0 0) inertia=(0 0 0 0 0 0) meshes=ulna.vtp
      WrapCylinder PQ2: xyz_body_rotation=(1.391376 0.06894051 1.522451) translation=(-0.0012 -0.2092 0.0428)
          quadrant=all radius=0.007 length=0.01
    Body radius: mass=0 mass_center=(0 0 0) inertia=(0 0 0 0 0 0) meshes=radius.vtp
      WrapCylinder SUP: xyz_body_rotation=(1.447751 0.3040364 -2.441017) translation=(0.0045 -0.0437 0.0059)
          quadrant=-x radius=0.008 length=0.04
      WrapTorus ECU: xyz_body_rotation=(-0.9866346 -0.1488766 0.222704) translation=(-0.0163 -0.2417 0.0349)
          quadrant=all inner_radius=0.006 outer_radius=0.009
      WrapCylinder PQ1: xyz_body_rotation=(-1.607623 -0.0127409 -2.690251) translation=(0.0281 -0.1986 0.0288)
          quadrant=all radius=0.01 length=0.01
    Body lunate: mass=0 mass_center=(0 0 0) inertia=(0 0 0 0 0 0) meshes=lunate.vtp
      WrapEllipsoid Extensor_ellipse: xyz_body_rotation=(-0.2508038 0.2855359 0.2328269)
          translation=(0.0007 -0.0135 0.0047) quadrant=z dimensions=(0.05 0.02 0.013)
      WrapTorus ECRL: xyz_body_rotation=(1.538333 0.2343977 0.7311184) translation=(0.0222 -0.0096 0.0208) quadrant=all
          inner_radius=0.008 outer_radius=0.016
      WrapTorus ECRB: xyz_body_rotation=(1.312662 -0.1178097 -0.1162389) translation=(0.0126 -0.0095 0.0186)
          quadrant=all inner_radius=0.008 outer_radius=0.01
      WrapTorus FCR: xyz_body_rotation=(-1.555961 -0.1532399 -0.1000074) translation=(0.0032 -0.0045 -0.019)
          quadrant=all inner_radius=0.001 outer_radius=0.0025
      WrapTorus FCU: xyz_body_rotation=(-1.573763 -0.07976155 0.39235) translation=(-0.0123 -0.0124 -0.0171)
          quadrant=all inner_radius=0.0068 outer_radius=0.008
      WrapEllipsoid PL: xyz_body_rotation=(-0.03159046 0.0996583 0.06335545) translation=(0.0057 -0.018 -0.0041)
          quadrant=-z dimensions=(0.025 0.014 0.012)
      WrapEllipsoid FDS: xyz_body_rotation=(0.00837758 -0.08168141 -0.01710423) translation=(0.0012 -0.0057 -0.0003)
          quadrant=-z dimensions=(0.025 0.013 0.012)
      WrapEllipsoid FDP: xyz_body_rotation=(-1.467473 -0.1946042 0.121824) translation=(-0.0022 -0.0069 0.0032)
          quadrant=y dimensions=(0.025 0.013 0.012)
      WrapTorus EDCL: xyz_body_rotation=(2.363176 0.1930334 -0.2691298) translation=(-0.0128 -0.0133 0.0148)
          quadrant=all inner_radius=0.008 outer_radius=0.012
      WrapTorus EDCR: xyz_body_rotation=(1.983916 0.100531 0.5230752) translation=(-0.0098 -0.0137 0.0166) quadrant=all
          inner_radius=0.009 outer_radius=0.011
      WrapTorus EDCM: xyz_body_rotation=(1.993166 0.1979203 0.3682645) translation=(-0.0007 -0.0117 0.0191)
          quadrant=all inner_radius=0.009 outer_radius=0.012
      WrapTorus EDCI: xyz_body_rotation=(1.697682 0.08970992 0.00767945) translation=(0.009 -0.0149 0.0211)
          quadrant=all inner_radius=0.009 outer_radius=0.012
      WrapEllipsoid EDM: xyz_body_rotation=(2.962696 0.1593486 0.1179843) translation=(-0.0167 -0.0022 0.0048)
          quadrant=-z dimensions=(0.018 0.014 0.008)
      WrapEllipsoid FPL: xyz_body_rotation=(-0.1663299 -0.08220501 -0.06597345) translation=(0.017 -0.025 -0.0033)
          quadrant=-z dimensions=(0.016 0.01 0.01)
    Body scaphoid: mass=0 mass_center=(0 0 0) inertia=(0 0 0 0 0 0) meshes=scaphoid.vtp
    Body pisiform: mass=0 mass_center=(0 0 0) inertia=(0 0 0 0 0 0) meshes=pisiform.vtp
    Body triquetrum: mass=0 mass_center=(0 0 0) inertia=(0 0 0 0 0 0) meshes=triquetrum.vtp
    Body capitate: mass=0 mass_center=(0 0 0) inertia=(0 0 0 0 0 0) meshes=capitate.vtp
    Body trapezium: mass=0 mass_center=(0 0 0) inertia=(0 0 0 0 0 0) meshes=trapezium.vtp
    Body trapezoid: mass=0 mass_center=(0 0 0) inertia=(0 0 0 0 0 0) meshes=trapezoid.vtp
    Body hamate: mass=0 mass_center=(0 0 0) inertia=(0 0 0 0 0 0) meshes=hamate.vtp
    Body firstmc1: mass=0 mass_center=(0 0 0) inertia=(0 0 0 0 0 0)
      WrapTorus APL: active=false xyz_body_rotation=(-1.609892 0.2478367 -0.0301942)
          translation=(0.0082 0.0023 -0.0101) quadrant=all inner_radius=0.004 outer_radius=0.008
    Body firstmc: mass=0 mass_center=(0 0 0) inertia=(0 0 0 0 0 0) meshes=1mc.vtp
      WrapCylinder MPthumb: xyz_body_rotation=(0.3213151 0.1101303 -0.834791) translation=(0.0177 -0.0305 -0.0143)
          quadrant=all radius=0.0085 length=0.02
    Body secondmc: mass=0 mass_center=(0 0 0) inertia=(0 0 0 0 0 0) meshes=2mc.vtp
      WrapEllipsoid 2ndmcp: xyz_body_rotation=(0.8492772 -1.335526 1.338144) translation=(0.0058 -0.0294 0.0007)
          quadrant=-x dimensions=(0.005 0.005 0.0065)
    Body thirdmc: mass=0 mass_center=(0 0 0) inertia=(0 0 0 0 0 0) meshes=3mc.vtp
      WrapEllipsoid 3rdmcp: xyz_body_rotation=(2.579422 -1.44967 2.906148) translation=(0.0016 -0.0271 0.0001)
          quadrant=-x dimensions=(0.005 0.005 0.0065)
      WrapSphere 3rdmcp2: translation=(0.0009 -0.0241 0.0031) quadrant=all radius=0.005
    Body fourthmc: mass=0 mass_center=(0 0 0) inertia=(0 0 0 0 0 0) meshes=4mc.vtp
      WrapEllipsoid 4thmcp: xyz_body_rotation=(-2.972121 -1.22173 -2.463183) translation=(-0.0003 -0.0254 -0.0003)
          quadrant=-x dimensions=(0.005 0.005 0.0065)
      WrapSphere 4thmcp2: translation=(-0.0015 -0.0219 0.0016) quadrant=all radius=0.005
    Body fifthmc: mass=0 mass_center=(0 0 0) inertia=(0 0 0 0 0 0) meshes=5mc.vtp
      WrapEllipsoid 5thmcp: xyz_body_rotation=(-2.67175 -0.834791 -2.465976) translation=(-0.0004 -0.0218 -0.0037)
          quadrant=-x dimensions=(0.005 0.005 0.0065)
      WrapSphere 5thmcp2: translation=(-0.003 -0.0204 -0.0019) quadrant=all radius=0.005
    Body proximal_thumb: mass=0 mass_center=(0 0 0) inertia=(0 0 0 0 0 0) meshes=thumbprox.vtp
      WrapCylinder IPthumb: xyz_body_rotation=(0.3047345 0.01291544 0.08796459) translation=(0.0121 -0.0302 -0.0096)
          quadrant=-x radius=0.0045 length=0.01
    Body distal_thumb: mass=0 mass_center=(0 0 0) inertia=(0 0 0 0 0 0) meshes=thumbdist.vtp
    Body proxph2: mass=0 mass_center=(0 0 0) inertia=(0 0 0 0 0 0) meshes=2proxph.vtp
      WrapCylinder Secondpm: xyz_body_rotation=(0.7419395 -1.473931 0.7096509) translation=(0.0075 -0.0407 0.0061)
          quadrant=all radius=0.004 length=0.01
    Body midph2: mass=0 mass_center=(0 0 0) inertia=(0 0 0 0 0 0) meshes=2midph.vtp
      WrapCylinder Secondmd: xyz_body_rotation=(0.5017822 -1.413019 0.6473426) translation=(0.0036 -0.0243 0.0003)
          quadrant=x radius=0.003 length=0.01
    Body distph2: mass=0 mass_center=(0 0 0) inertia=(0 0 0 0 0 0) meshes=2distph.vtp
    Body proxph3: mass=0 mass_center=(0 0 0) inertia=(0 0 0 0 0 0) meshes=3proxph.vtp
      WrapCylinder Thirdpm: xyz_body_rotation=(1.808859 -1.506045 1.853191) translation=(0.0017 -0.0439 0.005)
          quadrant=all radius=0.004 length=0.01
      WrapSphere Thirdpm2: translation=(0.0017 -0.0439 0.005) quadrant=all radius=0.005
    Body midph3: mass=0 mass_center=(0 0 0) inertia=(0 0 0 0 0 0) meshes=3midph.vtp
      WrapCylinder Thirdmd: xyz_body_rotation=(1.37881 -1.493304 1.518611) translation=(0.0014 -0.0289 0.0012)
          quadrant=x radius=0.003 length=0.01
      WrapSphere Thirdmd2: translation=(0.0014 -0.0289 0.0012) quadrant=all radius=0.004
    Body distph3: mass=0 mass_center=(0 0 0) inertia=(0 0 0 0 0 0) meshes=3distph.vtp
    Body proxph4: mass=0 mass_center=(0 0 0) inertia=(0 0 0 0 0 0) meshes=4proxph.vtp
      WrapCylinder Fourthpm: xyz_body_rotation=(-3.02291 -1.123119 -1.27252) translation=(-0.0033 -0.0401 -0.0001)
          quadrant=all radius=0.004 length=0.01
    Body midph4: mass=0 mass_center=(0 0 0) inertia=(0 0 0 0 0 0) meshes=4midph.vtp
      WrapCylinder Fourthmd: xyz_body_rotation=(-3.029717 -1.102874 -2.872114) translation=(-0.0021 -0.0247 -0.0001)
          quadrant=x radius=0.003 length=0.01
    Body distph4: mass=0 mass_center=(0 0 0) inertia=(0 0 0 0 0 0) meshes=4distph.vtp
    Body proxph5: mass=0 mass_center=(0 0 0) inertia=(0 0 0 0 0 0) meshes=5proxph.vtp
      WrapCylinder Fifthpm: xyz_body_rotation=(-2.931979 -0.8775515 -2.954493) translation=(-0.0046 -0.0349 -0.0042)
          quadrant=all radius=0.004 length=0.01
    Body midph5: mass=0 mass_center=(0 0 0) inertia=(0 0 0 0 0 0) meshes=5midph.vtp
      WrapCylinder Fifthmd: xyz_body_rotation=(-2.904402 -0.7251843 -2.99673) translation=(-0.0025 -0.0205 -0.0025)
          quadrant=x radius=0.003 length=0.01
    Body distph5: mass=0 mass_center=(0 0 0) inertia=(0 0 0 0 0 0) meshes=5distph.vtp
    Body bicpt: mass=0 mass_center=(0 0 0) inertia=(0 0 0 0 0 0)
    Body bicpt2: mass=0 mass_center=(0 0 0) inertia=(0 0 0 0 0 0)
    Body ptpt: mass=0 mass_center=(0 0 0) inertia=(0 0 0 0 0 0)
    Body FCUpt: mass=0 mass_center=(0 0 0) inertia=(0 0 0 0 0 0)
    Body EDCpt: mass=0 mass_center=(0 0 0) inertia=(0 0 0 0 0 0)
    Body APLpt: mass=0 mass_center=(0 0 0) inertia=(0 0 0 0 0 0)
    Body FPLpt: mass=0 mass_center=(0 0 0) inertia=(0 0 0 0 0 0)
    Body FPLpt2: mass=0 mass_center=(0 0 0) inertia=(0 0 0 0 0 0)
    Body PEC1pt2: mass=0 mass_center=(0 0 0) inertia=(0 0 0 0 0 0)
    Body PEC1pt3: mass=0 mass_center=(0 0 0) inertia=(0 0 0 0 0 0)
    Body PEC2pt2: mass=0 mass_center=(0 0 0) inertia=(0 0 0 0 0 0)
    Body PEC2pt3: mass=0 mass_center=(0 0 0) inertia=(0 0 0 0 0 0)
    Body PEC3pt2: mass=0 mass_center=(0 0 0) inertia=(0 0 0 0 0 0)
    Body PEC3pt3: mass=0 mass_center=(0 0 0) inertia=(0 0 0 0 0 0)
    Body DELT2pt2a: mass=0 mass_center=(0 0 0) inertia=(0 0 0 0 0 0)
    Body DELT2pt2: mass=0 mass_center=(0 0 0) inertia=(0 0 0 0 0 0)
    Body LAT1pt2: mass=0 mass_center=(0 0 0) inertia=(0 0 0 0 0 0)
    Body LAT1pt3: mass=0 mass_center=(0 0 0) inertia=(0 0 0 0 0 0)
    Body LAT2pt2: mass=0 mass_center=(0 0 0) inertia=(0 0 0 0 0 0)
    Body LAT2pt3: mass=0 mass_center=(0 0 0) inertia=(0 0 0 0 0 0)
    Body LAT3pt2: mass=0 mass_center=(0 0 0) inertia=(0 0 0 0 0 0)
    Body LAT3pt3: mass=0 mass_center=(0 0 0) inertia=(0 0 0 0 0 0)
  JointSet:
    WeldJoint ground_thorax: socket_parent_frame=ground_offset socket_child_frame=thorax_offset
      PhysicalOffsetFrame ground_offset: socket_parent=/ground translation=(0 0 0) [meters]
      PhysicalOffsetFrame thorax_offset: socket_parent=/bodyset/thorax translation=(0 0 0)
    CustomJoint sternoclavicular: socket_parent_frame=thorax_offset socket_child_frame=clavicle_offset
      Coordinate sternoclavicular_r2: default_value=-0.335413 range=(-99999.9 99999.9) clamped=false
      Coordinate sternoclavicular_r3: default_value=0.1420651 range=(-99999.9 99999.9) clamped=false
      PhysicalOffsetFrame thorax_offset: socket_parent=/bodyset/thorax translation=(0.006325 0.00693 0.025465)
      PhysicalOffsetFrame clavicle_offset: socket_parent=/bodyset/clavicle translation=(0 0 0)
      SpatialTransform: axes_held_at_zero=(rotation3 translation1 translation2 translation3)
        TransformAxis rotation1: coordinates=sternoclavicular_r2 axis=(0.0153 0.9892987 -0.1451)
        TransformAxis rotation2: coordinates=sternoclavicular_r3 axis=(-0.9944725 0 -0.104997)
    CustomJoint unrotscap: socket_parent_frame=clavicle_offset socket_child_frame=clavphant_offset
      Coordinate unrotscap_r3: default_value=-0.1420651 range=(-99999.9 99999.9) clamped=false
      Coordinate unrotscap_r2: default_value=0.335413 range=(-99999.9 99999.9) clamped=false
      PhysicalOffsetFrame clavicle_offset: socket_parent=/bodyset/clavicle translation=(-0.01433 0.02007 0.135535)
      PhysicalOffsetFrame clavphant_offset: socket_parent=/bodyset/clavphant translation=(0 0 0)
      SpatialTransform: axes_held_at_zero=(rotation3 translation1 translation2 translation3)
        TransformAxis rotation1: coordinates=unrotscap_r3 axis=(-0.9944725 0 -0.104997)
        TransformAxis rotation2: coordinates=unrotscap_r2 axis=(0.0153 0.9892987 -0.1451)
    CustomJoint acromioclavicular: socket_parent_frame=clavphant_offset socket_child_frame=scapula_offset
      Coordinate acromioclavicular_r2: default_value=-0.0679143 range=(-99999.9 99999.9) clamped=false
      Coordinate acromioclavicular_r3: default_value=0.5488595 range=(-99999.9 99999.9) clamped=false
      Coordinate acromioclavicular_r1: default_value=0.2467086 range=(-99999.9 99999.9) clamped=false
      PhysicalOffsetFrame clavphant_offset: socket_parent=/bodyset/clavphant translation=(0 0 0)
      PhysicalOffsetFrame scapula_offset: socket_parent=/bodyset/scapula translation=(0 0 0)
      SpatialTransform: axes_held_at_zero=(translation1 translation2 translation3)
        TransformAxis rotation1: coordinates=acromioclavicular_r2 axis=(0.1570949 0.9472686 -0.2792909)
        TransformAxis rotation2: coordinates=acromioclavicular_r3 axis=(-0.754084 0.297594 0.585487)
        TransformAxis rotation3: coordinates=acromioclavicular_r1 axis=(0.6376998 0.1186 0.7610998)
    CustomJoint unrothum: socket_parent_frame=scapula_offset socket_child_frame=scapphant_offset
      Coordinate unrothum_r1: default_value=-0.2467086 range=(-99999.9 99999.9) clamped=false
      Coordinate unrothum_r3: default_value=-0.5488595 range=(-99999.9 99999.9) clamped=false
      Coordinate unrothum_r2: default_value=0.0679143 range=(-99999.9 99999.9) clamped=false
      PhysicalOffsetFrame scapula_offset: socket_parent=/bodyset/scapula translation=(-0.00955 -0.034 0.009)
      PhysicalOffsetFrame scapphant_offset: socket_parent=/bodyset/scapphant translation=(0 0 0)
      SpatialTransform: axes_held_at_zero=(translation1 translation2 translation3)
        TransformAxis rotation1: coordinates=unrothum_r1 axis=(0.6376998 0.1186 0.7610998)
        TransformAxis rotation2: coordinates=unrothum_r3 axis=(-0.754084 0.297594 0.585487)
        TransformAxis rotation3: coordinates=unrothum_r2 axis=(0.1570949 0.9472686 -0.2792909)
    CustomJoint shoulder0: socket_parent_frame=scapphant_offset socket_child_frame=humphant_offset
      Coordinate elv_angle: default_value=1.704262 range=(-1.570796 2.268928) clamped=true
      PhysicalOffsetFrame scapphant_offset: socket_parent=/bodyset/scapphant translation=(0 0 0)
      PhysicalOffsetFrame humphant_offset: socket_parent=/bodyset/humphant translation=(0 0 0)
      SpatialTransform: axes_held_at_zero=(rotation1 rotation3 translation1 translation2 translation3)
        TransformAxis rotation2: coordinates=elv_angle axis=(0.0048 0.9990892 0.04240001)
            LinearFunction(coefficients=1 0)
    CustomJoint shoulder1: socket_parent_frame=humphant_offset socket_child_frame=humphant1_offset
      Coordinate shoulder_elv: default_value=1.386001 range=(0 3.141593) clamped=true
      Coordinate shoulder1_r2: default_value=-1.704262 range=(-99999.9 99999.9) clamped=false
      PhysicalOffsetFrame humphant_offset: socket_parent=/bodyset/humphant translation=(0 0 0)
      PhysicalOffsetFrame humphant1_offset: socket_parent=/bodyset/humphant1 translation=(0 0 0)
      SpatialTransform: axes_held_at_zero=(rotation1 translation1 translation2 translation3)
        TransformAxis rotation2: coordinates=shoulder_elv axis=(-0.9982614 0.0023 0.05889802)
            LinearFunction(coefficients=1 0)
        TransformAxis rotation3: coordinates=shoulder1_r2 axis=(0.0048 0.9990892 0.04240001)
    CustomJoint shoulder2: socket_parent_frame=humphant1_offset socket_child_frame=humerus_offset
      Coordinate shoulder_rot: default_value=-0.1591391 range=(-1.570796 0.3490659) clamped=true
      PhysicalOffsetFrame humphant1_offset: socket_parent=/bodyset/humphant1 translation=(0 0 0)
      PhysicalOffsetFrame humerus_offset: socket_parent=/bodyset/humerus translation=(0 0 0)
      SpatialTransform: axes_held_at_zero=(rotation1 rotation3 translation1 translation2 translation3)
        TransformAxis rotation2: coordinates=shoulder_rot axis=(0.0048 0.9990892 0.04240001)
            LinearFunction(coefficients=1 0)
    CustomJoint elbow: socket_parent_frame=humerus_offset socket_child_frame=ulna_offset
      Coordinate elbow_flexion: default_value=0.4671374 range=(0 2.268928) clamped=true
      PhysicalOffsetFrame humerus_offset: socket_parent=/bodyset/humerus translation=(0.0061 -0.2904 -0.0123)
      PhysicalOffsetFrame ulna_offset: socket_parent=/bodyset/ulna translation=(0 0 0)
      SpatialTransform: axes_held_at_zero=(rotation1 rotation2 translation1 translation2 translation3)
        TransformAxis rotation3: coordinates=elbow_flexion axis=(0.04940001 0.03660001 0.9981083)
            LinearFunction(coefficients=1 0)
    CustomJoint radioulnar: socket_parent_frame=ulna_offset socket_child_frame=radius_offset
      Coordinate pro_sup: default_value=0.3695909 range=(-1.570796 1.570796) clamped=true
      PhysicalOffsetFrame ulna_offset: socket_parent=/bodyset/ulna translation=(0.0004 -0.011503 0.019999)
      PhysicalOffsetFrame radius_offset: socket_parent=/bodyset/radius translation=(0 0 0)
      SpatialTransform: axes_held_at_zero=(rotation1 rotation3 translation1 translation2 translation3)
        TransformAxis rotation2: coordinates=pro_sup axis=(-0.01716099 0.9926656 -0.119668)
            LinearFunction(coefficients=1 0)
    CustomJoint radiocarpal: socket_parent_frame=radius_offset socket_child_frame=lunate_offset
      Coordinate deviation: default_value=0.1304671 range=(-0.1745329 0.4363323) clamped=true
      Coordinate flexion: default_value=-0.4317305 range=(-1.22173 1.22173) clamped=true
      PhysicalOffsetFrame radius_offset: socket_parent=/bodyset/radius translation=(0.018 -0.242 0.025)
      PhysicalOffsetFrame lunate_offset: socket_parent=/bodyset/lunate translation=(0 0 0)
      SpatialTransform: axes_held_at_zero=(rotation2 translation1 translation2 translation3)
        TransformAxis rotation1: coordinates=deviation axis=(-0.819064 -0.135611 -0.557444)
          SimmSpline: x=(-0.174533 0 0.436332) y=(-0.174533 0 0.436332)
        TransformAxis rotation3: coordinates=flexion axis=(0.9564267 -0.2522069 0.147104)
          SimmSpline: x=(-1.5708 1.5708) y=(-0.785398 0.785398)
    WeldJoint lun_scaph: socket_parent_frame=lunate_offset socket_child_frame=scaphoid_offset
      PhysicalOffsetFrame lunate_offset: socket_parent=/bodyset/lunate translation=(0.012345 -0.004464 -0.001254)
      PhysicalOffsetFrame scaphoid_offset: socket_parent=/bodyset/scaphoid translation=(0 0 0)
    WeldJoint lun_pis: socket_parent_frame=lunate_offset socket_child_frame=pisiform_offset
      PhysicalOffsetFrame lunate_offset: socket_parent=/bodyset/lunate translation=(-0.013388 -0.009886 -0.010593)
      PhysicalOffsetFrame pisiform_offset: socket_parent=/bodyset/pisiform translation=(0 0 0)
    WeldJoint lun_triq: socket_parent_frame=lunate_offset socket_child_frame=triquetrum_offset
      PhysicalOffsetFrame lunate_offset: socket_parent=/bodyset/lunate translation=(-0.010784 -0.007499 -0.001289)
      PhysicalOffsetFrame triquetrum_offset: socket_parent=/bodyset/triquetrum translation=(0 0 0)
    CustomJoint proximal_distal: socket_parent_frame=lunate_offset socket_child_frame=capitate_offset
      Coordinate proximal_distal_r1: default_value=0.1631298 range=(-99999.9 99999.9) clamped=false
      Coordinate proximal_distal_r3: default_value=-0.2158652 range=(-99999.9 99999.9) clamped=false
      PhysicalOffsetFrame lunate_offset: socket_parent=/bodyset/lunate translation=(0.003992 -0.015054 0.002327)
      PhysicalOffsetFrame capitate_offset: socket_parent=/bodyset/capitate translation=(0 0 0)
      SpatialTransform: axes_held_at_zero=(rotation2 translation1 translation2 translation3)
        TransformAxis rotation1: coordinates=proximal_distal_r1 axis=(0.8991357 -0.3490529 -0.2640399)
        TransformAxis rotation3: coordinates=proximal_distal_r3 axis=(0.9971185 0.01069999 -0.07510096)
    WeldJoint cap_trpzm: socket_parent_frame=capitate_offset socket_child_frame=trapezium_offset
      PhysicalOffsetFrame capitate_offset: socket_parent=/bodyset/capitate translation=(0.015293 -0.004569 -0.010308)
      PhysicalOffsetFrame trapezium_offset: socket_parent=/bodyset/trapezium translation=(0 0 0)
    WeldJoint cap_trpzd: socket_parent_frame=capitate_offset socket_child_frame=trapezoid_offset
      PhysicalOffsetFrame capitate_offset: socket_parent=/bodyset/capitate translation=(0.009143 -0.004062 -0.002464)
      PhysicalOffsetFrame trapezoid_offset: socket_parent=/bodyset/trapezoid translation=(0 0 0)
    WeldJoint cap_ham: socket_parent_frame=capitate_offset socket_child_frame=hamate_offset
      PhysicalOffsetFrame capitate_offset: socket_parent=/bodyset/capitate translation=(-0.010969 -0.002495 -0.00075)
      PhysicalOffsetFrame hamate_offset: socket_parent=/bodyset/hamate translation=(0 0 0)
    CustomJoint CMC1a: socket_parent_frame=trapezium_offset socket_child_frame=firstmc1_offset
      Coordinate cmc_flexion: default_value=0.2002067 range=(-0.2617994 0.7853982) clamped=true
      PhysicalOffsetFrame trapezium_offset: socket_parent=/bodyset/trapezium translation=(0 0 0)
      PhysicalOffsetFrame firstmc1_offset: socket_parent=/bodyset/firstmc1 translation=(0 0 0)
      SpatialTransform: axes_held_at_zero=(rotation1 rotation2 translation1 translation2 translation3)
        TransformAxis rotation3: coordinates=cmc_flexion axis=(-0.04239899 -0.6652858 0.7453838)
            LinearFunction(coefficients=1 0)
    CustomJoint CMC1b: socket_parent_frame=firstmc1_offset socket_child_frame=firstmc_offset
      Coordinate cmc_abduction: default_value=0 range=(-0.4363323 0.4363323) clamped=true
      PhysicalOffsetFrame firstmc1_offset: socket_parent=/bodyset/firstmc1 translation=(0.0072 -0.0054 -0.0025)
      PhysicalOffsetFrame firstmc_offset: socket_parent=/bodyset/firstmc translation=(0 0 0)
      SpatialTransform: axes_held_at_zero=(rotation2 rotation3 translation1 translation2 translation3)
        TransformAxis rotation1: coordinates=cmc_abduction axis=(0.495557 0.731736 0.467959)
            LinearFunction(coefficients=1 0)
    WeldJoint CMC2: socket_parent_frame=capitate_offset socket_child_frame=secondmc_offset
      PhysicalOffsetFrame capitate_offset: socket_parent=/bodyset/capitate translation=(0.014685 -0.03762 0.005032)
      PhysicalOffsetFrame secondmc_offset: socket_parent=/bodyset/secondmc translation=(0 0 0)
    WeldJoint CMC3: socket_parent_frame=capitate_offset socket_child_frame=thirdmc_offset
      PhysicalOffsetFrame capitate_offset: socket_parent=/bodyset/capitate translation=(0.000477 -0.039239 0.007377)
      PhysicalOffsetFrame thirdmc_offset: socket_parent=/bodyset/thirdmc translation=(0 0 0)
    WeldJoint CMC4: socket_parent_frame=capitate_offset socket_child_frame=fourthmc_offset
      PhysicalOffsetFrame capitate_offset: socket_parent=/bodyset/capitate translation=(-0.012046 -0.040519 0.003513)
      PhysicalOffsetFrame fourthmc_offset: socket_parent=/bodyset/fourthmc translation=(0 0 0)
    WeldJoint CMC5: socket_parent_frame=capitate_offset socket_child_frame=fifthmc_offset
      PhysicalOffsetFrame capitate_offset: socket_parent=/bodyset/capitate translation=(-0.021896 -0.034683 -0.004218)
      PhysicalOffsetFrame fifthmc_offset: socket_parent=/bodyset/fifthmc translation=(0 0 0)
    CustomJoint MCP: socket_parent_frame=firstmc_offset socket_child_frame=proximal_thumb_offset
      Coordinate mp_flexion: default_value=-4.964827e-9 range=(-0.7853982 0.6981317) clamped=true
      PhysicalOffsetFrame firstmc_offset: socket_parent=/bodyset/firstmc translation=(0.0165 -0.0292 -0.0127)
      PhysicalOffsetFrame proximal_thumb_offset: socket_parent=/bodyset/proximal_thumb translation=(0 0 0)
      SpatialTransform: axes_held_at_zero=(rotation1 rotation2 translation1 translation2 translation3)
        TransformAxis rotation3: coordinates=mp_flexion axis=(-0.084295 -0.203488 0.975442)
            LinearFunction(coefficients=1 0)
    CustomJoint IP: socket_parent_frame=proximal_thumb_offset socket_child_frame=distal_thumb_offset
      Coordinate ip_flexion: default_value=-4.727293e-8 range=(-1.308997 0.4363323) clamped=true
      PhysicalOffsetFrame proximal_thumb_offset: socket_parent=/bodyset/proximal_thumb
          translation=(0.014 -0.0259 -0.0101)
      PhysicalOffsetFrame distal_thumb_offset: socket_parent=/bodyset/distal_thumb translation=(0 0 0)
      SpatialTransform: axes_held_at_zero=(rotation1 rotation2 translation1 translation2 translation3)
        TransformAxis rotation3: coordinates=ip_flexion axis=(-0.05010201 -0.4796231 0.8760431)
            LinearFunction(coefficients=1 0)
    CustomJoint MCP2: socket_parent_frame=secondmc_offset socket_child_frame=proxph2_offset
      Coordinate mcp2_flexion: default_value=0 range=(0 1.570796) clamped=false
      Coordinate mcp2_abduction: default_value=0 range=(-0.2617994 0.2617994) clamped=true
      PhysicalOffsetFrame secondmc_offset: socket_parent=/bodyset/secondmc translation=(0.003501 -0.028243 0.00362)
      PhysicalOffsetFrame proxph2_offset: socket_parent=/bodyset/proxph2 translation=(0 0 0)
      SpatialTransform: axes_held_at_zero=(rotation2 translation1 translation2 translation3)
        TransformAxis rotation1: coordinates=mcp2_flexion axis=(0.9975061 -0.03949601 0.05849401)
            LinearFunction(coefficients=1 0)
        TransformAxis rotation3: coordinates=mcp2_abduction axis=(-0.05499898 0.08589897 0.9947846)
            LinearFunction(coefficients=1 0)
    CustomJoint prox2-midph: socket_parent_frame=proxph2_offset socket_child_frame=midph2_offset
      Coordinate pm2_flexion: default_value=0.0002470566 range=(0 1.570796) clamped=true
      PhysicalOffsetFrame proxph2_offset: socket_parent=/bodyset/proxph2 translation=(0.007517 -0.041273 0.007326)
      PhysicalOffsetFrame midph2_offset: socket_parent=/bodyset/midph2 translation=(0 0 0)
      SpatialTransform: axes_held_at_zero=(rotation2 rotation3 translation1 translation2 translation3)
        TransformAxis rotation1: coordinates=pm2_flexion axis=(0.9603449 0.040998 -0.275784)
            LinearFunction(coefficients=1 0)
    CustomJoint mid2-distph: socket_parent_frame=midph2_offset socket_child_frame=distph2_offset
      Coordinate md2_flexion: default_value=0 range=(0 1.570796) clamped=false
      PhysicalOffsetFrame midph2_offset: socket_parent=/bodyset/midph2 translation=(0.003333 -0.024888 0.00122)
      PhysicalOffsetFrame distph2_offset: socket_parent=/bodyset/distph2 translation=(0 0 0)
      SpatialTransform: axes_held_at_zero=(rotation2 rotation3 translation1 translation2 translation3)
        TransformAxis rotation1: coordinates=md2_flexion axis=(0.9789773 0.07690602 -0.1889151)
            LinearFunction(coefficients=1 0)
    CustomJoint MCP3: socket_parent_frame=thirdmc_offset socket_child_frame=proxph3_offset
      Coordinate mcp3_flexion: default_value=0 range=(0 1.570796) clamped=false
      Coordinate mcp3_abduction: default_value=0 range=(-0.2617994 0.2617994) clamped=true
      PhysicalOffsetFrame thirdmc_offset: socket_parent=/bodyset/thirdmc translation=(0.00024 -0.02629 0.001778)
      PhysicalOffsetFrame proxph3_offset: socket_parent=/bodyset/proxph3 translation=(0 0 0)
      SpatialTransform: axes_held_at_zero=(rotation2 translation1 translation2 translation3)
        TransformAxis rotation1: coordinates=mcp3_flexion axis=(0.970748 -0.167208 0.172308)
            LinearFunction(coefficients=1 0)
        TransformAxis rotation3: coordinates=mcp3_abduction axis=(-0.159892 0.085196 0.983451)
            LinearFunction(coefficients=1 0)
    CustomJoint prox3-midph: socket_parent_frame=proxph3_offset socket_child_frame=midph3_offset
      Coordinate pm3_flexion: default_value=0.0002470566 range=(0 1.570796) clamped=true
      PhysicalOffsetFrame proxph3_offset: socket_parent=/bodyset/proxph3 translation=(0.00165 -0.044211 0.00623)
      PhysicalOffsetFrame midph3_offset: socket_parent=/bodyset/midph3 translation=(0 0 0)
      SpatialTransform: axes_held_at_zero=(rotation2 rotation3 translation1 translation2 translation3)
        TransformAxis rotation1: coordinates=pm3_flexion axis=(0.992332 -0.115004 -0.045301)
            LinearFunction(coefficients=1 0)
    CustomJoint mid3-distph: socket_parent_frame=midph3_offset socket_child_frame=distph3_offset
      Coordinate md3_flexion: default_value=0.0002470566 range=(0 1.570796) clamped=true
      PhysicalOffsetFrame midph3_offset: socket_parent=/bodyset/midph3 translation=(0.001365 -0.029047 0.001954)
      PhysicalOffsetFrame distph3_offset: socket_parent=/bodyset/distph3 translation=(0 0 0)
      SpatialTransform: axes_held_at_zero=(rotation2 rotation3 translation1 translation2 translation3)
        TransformAxis rotation1: coordinates=md3_flexion axis=(0.989822 0.093493 0.107292)
            LinearFunction(coefficients=1 0)
    CustomJoint MCP4: socket_parent_frame=fourthmc_offset socket_child_frame=proxph4_offset
      Coordinate mcp4_flexion: default_value=0 range=(0 1.570796) clamped=false
      Coordinate mcp4_abduction: default_value=0 range=(-0.2617994 0.2617994) clamped=true
      PhysicalOffsetFrame fourthmc_offset: socket_parent=/bodyset/fourthmc translation=(-0.00183 -0.023689 -0.000173)
      PhysicalOffsetFrame proxph4_offset: socket_parent=/bodyset/proxph4 translation=(0 0 0)
      SpatialTransform: axes_held_at_zero=(rotation2 translation1 translation2 translation3)
        TransformAxis rotation1: coordinates=mcp4_flexion axis=(0.891962 -0.342185 0.295487)
            LinearFunction(coefficients=1 0)
        TransformAxis rotation3: coordinates=mcp4_abduction axis=(-0.291121 0.065105 0.954468)
            LinearFunction(coefficients=1 0)
    CustomJoint prox4-midph: socket_parent_frame=proxph4_offset socket_child_frame=midph4_offset
      Coordinate pm4_flexion: default_value=0 range=(0 1.570796) clamped=false
      PhysicalOffsetFrame proxph4_offset: socket_parent=/bodyset/proxph4 translation=(-0.003528 -0.040255 0.001345)
      PhysicalOffsetFrame midph4_offset: socket_parent=/bodyset/midph4 translation=(0 0 0)
      SpatialTransform: axes_held_at_zero=(rotation2 rotation3 translation1 translation2 translation3)
        TransformAxis rotation1: coordinates=pm4_flexion axis=(0.913701 -0.1097 0.3913)
            LinearFunction(coefficients=1 0)
    CustomJoint mid4-distph: socket_parent_frame=midph4_offset socket_child_frame=distph4_offset
      Coordinate md4_flexion: default_value=0.0002470566 range=(0 1.570796) clamped=true
      PhysicalOffsetFrame midph4_offset: socket_parent=/bodyset/midph4 translation=(-0.002317 -0.024789 0.000563)
      PhysicalOffsetFrame distph4_offset: socket_parent=/bodyset/distph4 translation=(0 0 0)
      SpatialTransform: axes_held_at_zero=(rotation2 rotation3 translation1 translation2 translation3)
        TransformAxis rotation1: coordinates=md4_flexion axis=(0.900778 -0.057999 0.430389)
            LinearFunction(coefficients=1 0)
    CustomJoint MCP5: socket_parent_frame=fifthmc_offset socket_child_frame=proxph5_offset
      Coordinate mcp5_flexion: default_value=0 range=(0 1.570796) clamped=false
      Coordinate mcp5_abduction: default_value=0 range=(-0.2617994 0.2617994) clamped=true
      PhysicalOffsetFrame fifthmc_offset: socket_parent=/bodyset/fifthmc translation=(-0.001597 -0.021431 -0.001496)
      PhysicalOffsetFrame proxph5_offset: socket_parent=/bodyset/proxph5 translation=(0 0 0)
      SpatialTransform: axes_held_at_zero=(rotation2 translation1 translation2 translation3)
        TransformAxis rotation1: coordinates=mcp5_flexion axis=(0.828072 -0.254191 0.499683)
            LinearFunction(coefficients=1 0)
        TransformAxis rotation3: coordinates=mcp5_abduction axis=(-0.510048 0.028303 0.85968)
            LinearFunction(coefficients=1 0)
    CustomJoint prox5-midph: socket_parent_frame=proxph5_offset socket_child_frame=midph5_offset
      Coordinate pm5_flexion: default_value=0 range=(0 1.570796) clamped=false
      PhysicalOffsetFrame proxph5_offset: socket_parent=/bodyset/proxph5 translation=(-0.005279 -0.035563 -0.002879)
      PhysicalOffsetFrame midph5_offset: socket_parent=/bodyset/midph5 translation=(0 0 0)
      SpatialTransform: axes_held_at_zero=(rotation2 rotation3 translation1 translation2 translation3)
        TransformAxis rotation1: coordinates=pm5_flexion axis=(0.657113 -0.381007 0.650412)
            LinearFunction(coefficients=1 0)
    CustomJoint mid5-distph: socket_parent_frame=midph5_offset socket_child_frame=distph5_offset
      Coordinate md5_flexion: default_value=0.0002466448 range=(0 0.174533) clamped=true
      PhysicalOffsetFrame midph5_offset: socket_parent=/bodyset/midph5 translation=(-0.002871 -0.020677 -0.002243)
      PhysicalOffsetFrame distph5_offset: socket_parent=/bodyset/distph5 translation=(0 0 0)
      SpatialTransform: axes_held_at_zero=(rotation2 rotation3 translation1 translation2 translation3)
        TransformAxis rotation1: coordinates=md5_flexion axis=(0.643112 -0.226804 0.731414)
            LinearFunction(coefficients=1 0)
    CustomJoint bicpt: socket_parent_frame=radius_offset socket_child_frame=bicpt_offset
      Coordinate bicpt_tx: default_value=0.0007853031 range=(-99999.9 99999.9) clamped=false
      Coordinate bicpt_ty: default_value=-0.03066768 range=(-99999.9 99999.9) clamped=false
      Coordinate bicpt_tz: default_value=-0.004794123 range=(-99999.9 99999.9) clamped=false
      PhysicalOffsetFrame radius_offset: socket_parent=/bodyset/radius translation=(0 0 0)
      PhysicalOffsetFrame bicpt_offset: socket_parent=/bodyset/bicpt translation=(0 0 0)
      SpatialTransform: axes_held_at_zero=(rotation1 rotation2 rotation3)
        TransformAxis translation1: coordinates=bicpt_tx axis=(1 0 0) MultiplierFunction(scale=1, Constant(value=0))
        TransformAxis translation2: coordinates=bicpt_ty axis=(0 1 0) MultiplierFunction(scale=1, Constant(value=0))
        TransformAxis translation3: coordinates=bicpt_tz axis=(0 0 1) MultiplierFunction(scale=1, Constant(value=0))
    CustomJoint bicpt2: socket_parent_frame=radius_offset socket_child_frame=bicpt2_offset
      Coordinate bicpt2_tx: default_value=0.01613392 range=(-99999.9 99999.9) clamped=false
      Coordinate bicpt2_ty: default_value=-0.01747084 range=(-99999.9 99999.9) clamped=false
      Coordinate bicpt2_tz: default_value=-0.00923111 range=(-99999.9 99999.9) clamped=false
      PhysicalOffsetFrame radius_offset: socket_parent=/bodyset/radius translation=(0 0 0)
      PhysicalOffsetFrame bicpt2_offset: socket_parent=/bodyset/bicpt2 translation=(0 0 0)
      SpatialTransform: axes_held_at_zero=(rotation1 rotation2 rotation3)
        TransformAxis translation1: coordinates=bicpt2_tx axis=(1 0 0) MultiplierFunction(scale=1, Constant(value=0))
        TransformAxis translation2: coordinates=bicpt2_ty axis=(0 1 0) MultiplierFunction(scale=1, Constant(value=0))
        TransformAxis translation3: coordinates=bicpt2_tz axis=(0 0 1) MultiplierFunction(scale=1, Constant(value=0))
    CustomJoint ptpt: socket_parent_frame=ulna_offset socket_child_frame=ptpt_offset
      Coordinate ptpt_tx: default_value=0.005985333 range=(-99999.9 99999.9) clamped=false
      Coordinate ptpt_ty: default_value=-0.06591174 range=(-99999.9 99999.9) clamped=false
      Coordinate ptpt_tz: default_value=-0.00175584 range=(-99999.9 99999.9) clamped=false
      PhysicalOffsetFrame ulna_offset: socket_parent=/bodyset/ulna translation=(0 0 0)
      PhysicalOffsetFrame ptpt_offset: socket_parent=/bodyset/ptpt translation=(0 0 0)
      SpatialTransform: axes_held_at_zero=(rotation1 rotation2 rotation3)
        TransformAxis translation1: coordinates=ptpt_tx axis=(1 0 0) MultiplierFunction(scale=1, Constant(value=0))
        TransformAxis translation2: coordinates=ptpt_ty axis=(0 1 0) MultiplierFunction(scale=1, Constant(value=0))
        TransformAxis translation3: coordinates=ptpt_tz axis=(0 0 1) MultiplierFunction(scale=1, Constant(value=0))
    CustomJoint FCUpt: socket_parent_frame=radius_offset socket_child_frame=FCUpt_offset
      Coordinate FCUpt_tx: default_value=0.005939743 range=(-99999.9 99999.9) clamped=false
      Coordinate FCUpt_ty: default_value=-0.1838363 range=(-99999.9 99999.9) clamped=false
      Coordinate FCUpt_tz: default_value=-0.0001193661 range=(-99999.9 99999.9) clamped=false
      PhysicalOffsetFrame radius_offset: socket_parent=/bodyset/radius translation=(0 0 0)
      PhysicalOffsetFrame FCUpt_offset: socket_parent=/bodyset/FCUpt translation=(0 0 0)
      SpatialTransform: axes_held_at_zero=(rotation1 rotation2 rotation3)
        TransformAxis translation1: coordinates=FCUpt_tx axis=(1 0 0) MultiplierFunction(scale=1, Constant(value=0))
        TransformAxis translation2: coordinates=FCUpt_ty axis=(0 1 0) MultiplierFunction(scale=1, Constant(value=0))
        TransformAxis translation3: coordinates=FCUpt_tz axis=(0 0 1) MultiplierFunction(scale=1, Constant(value=0))
    CustomJoint EDCpt: socket_parent_frame=radius_offset socket_child_frame=EDCpt_offset
      Coordinate EDCpt_tx: default_value=-0.002541114 range=(-99999.9 99999.9) clamped=false
      Coordinate EDCpt_ty: default_value=0.000669186 range=(-99999.9 99999.9) clamped=false
      Coordinate EDCpt_tz: default_value=0.0001855348 range=(-99999.9 99999.9) clamped=false
      PhysicalOffsetFrame radius_offset: socket_parent=/bodyset/radius translation=(0 0 0)
      PhysicalOffsetFrame EDCpt_offset: socket_parent=/bodyset/EDCpt translation=(0 0 0)
      SpatialTransform: axes_held_at_zero=(rotation1 rotation2 rotation3)
        TransformAxis translation1: coordinates=EDCpt_tx axis=(1 0 0) MultiplierFunction(scale=1, Constant(value=0))
        TransformAxis translation2: coordinates=EDCpt_ty axis=(0 1 0) MultiplierFunction(scale=1, Constant(value=0))
        TransformAxis translation3: coordinates=EDCpt_tz axis=(0 0 1) MultiplierFunction(scale=1, Constant(value=0))
    CustomJoint APLpt: socket_parent_frame=capitate_offset socket_child_frame=APLpt_offset
      Coordinate APLpt_tx: default_value=0.0002856269 range=(-99999.9 99999.9) clamped=false
      Coordinate APLpt_ty: default_value=0.0001142508 range=(-99999.9 99999.9) clamped=false
      Coordinate APLpt_tz: default_value=0.0005712538 range=(-99999.9 99999.9) clamped=false
      PhysicalOffsetFrame capitate_offset: socket_parent=/bodyset/capitate translation=(0 0 0)
      PhysicalOffsetFrame APLpt_offset: socket_parent=/bodyset/APLpt translation=(0 0 0)
      SpatialTransform: axes_held_at_zero=(rotation1 rotation2 rotation3)
        TransformAxis translation1: coordinates=APLpt_tx axis=(1 0 0) MultiplierFunction(scale=1, Constant(value=0))
        TransformAxis translation2: coordinates=APLpt_ty axis=(0 1 0) MultiplierFunction(scale=1, Constant(value=0))
        TransformAxis translation3: coordinates=APLpt_tz axis=(0 0 1) MultiplierFunction(scale=1, Constant(value=0))
    CustomJoint FPLpt: socket_parent_frame=capitate_offset socket_child_frame=FPLpt_offset
      Coordinate FPLpt_tx: default_value=0.0003656024 range=(-99999.9 99999.9) clamped=false
      Coordinate FPLpt_ty: default_value=0.001096807 range=(-99999.9 99999.9) clamped=false
      Coordinate FPLpt_tz: default_value=0.0006169541 range=(-99999.9 99999.9) clamped=false
      PhysicalOffsetFrame capitate_offset: socket_parent=/bodyset/capitate translation=(0 0 0)
      PhysicalOffsetFrame FPLpt_offset: socket_parent=/bodyset/FPLpt translation=(0 0 0)
      SpatialTransform: axes_held_at_zero=(rotation1 rotation2 rotation3)
        TransformAxis translation1: coordinates=FPLpt_tx axis=(1 0 0) MultiplierFunction(scale=1, Constant(value=0))
        TransformAxis translation2: coordinates=FPLpt_ty axis=(0 1 0) MultiplierFunction(scale=1, Constant(value=0))
        TransformAxis translation3: coordinates=FPLpt_tz axis=(0 0 1) MultiplierFunction(scale=1, Constant(value=0))
    CustomJoint FPLpt2: socket_parent_frame=capitate_offset socket_child_frame=FPLpt2_offset
      Coordinate FPLpt2_tx: default_value=3.058518e-5 range=(-99999.9 99999.9) clamped=false
      Coordinate FPLpt2_ty: default_value=-0.0002136732 range=(-99999.9 99999.9) clamped=false
      Coordinate FPLpt2_tz: default_value=-0.0002564079 range=(-99999.9 99999.9) clamped=false
      PhysicalOffsetFrame capitate_offset: socket_parent=/bodyset/capitate translation=(0 0 0)
      PhysicalOffsetFrame FPLpt2_offset: socket_parent=/bodyset/FPLpt2 translation=(0 0 0)
      SpatialTransform: axes_held_at_zero=(rotation1 rotation2 rotation3)
        TransformAxis translation1: coordinates=FPLpt2_tx axis=(1 0 0) MultiplierFunction(scale=1, Constant(value=0))
        TransformAxis translation2: coordinates=FPLpt2_ty axis=(0 1 0) MultiplierFunction(scale=1, Constant(value=0))
        TransformAxis translation3: coordinates=FPLpt2_tz axis=(0 0 1) MultiplierFunction(scale=1, Constant(value=0))
    CustomJoint PEC1pt2: socket_parent_frame=humerus_offset socket_child_frame=PEC1pt2_offset
      Coordinate PEC1pt2_tx: default_value=0.002602951 range=(-99999.9 99999.9) clamped=false
      Coordinate PEC1pt2_ty: default_value=0.009132388 range=(-99999.9 99999.9) clamped=false
      Coordinate PEC1pt2_tz: default_value=0.006352965 range=(-99999.9 99999.9) clamped=false
      PhysicalOffsetFrame humerus_offset: socket_parent=/bodyset/humerus translation=(0 0 0)
      PhysicalOffsetFrame PEC1pt2_offset: socket_parent=/bodyset/PEC1pt2 translation=(0 0 0)
      SpatialTransform: axes_held_at_zero=(rotation1 rotation2 rotation3)
        TransformAxis translation1: coordinates=PEC1pt2_tx axis=(1 0 0) MultiplierFunction(scale=1, Constant(value=0))
        TransformAxis translation2: coordinates=PEC1pt2_ty axis=(0 1 0) MultiplierFunction(scale=1, Constant(value=0))
        TransformAxis translation3: coordinates=PEC1pt2_tz axis=(0 0 1) MultiplierFunction(scale=1, Constant(value=0))
    CustomJoint PEC1pt3: socket_parent_frame=thorax_offset socket_child_frame=PEC1pt3_offset
      Coordinate PEC1pt3_tx: default_value=-0.008514738 range=(-99999.9 99999.9) clamped=false
      Coordinate PEC1pt3_ty: default_value=0.0205589 range=(-99999.9 99999.9) clamped=false
      Coordinate PEC1pt3_tz: default_value=-0.01950007 range=(-99999.9 99999.9) clamped=false
      PhysicalOffsetFrame thorax_offset: socket_parent=/bodyset/thorax translation=(0 0 0)
      PhysicalOffsetFrame PEC1pt3_offset: socket_parent=/bodyset/PEC1pt3 translation=(0 0 0)
      SpatialTransform: axes_held_at_zero=(rotation1 rotation2 rotation3)
        TransformAxis translation1: coordinates=PEC1pt3_tx axis=(1 0 0) MultiplierFunction(scale=1, Constant(value=0))
        TransformAxis translation2: coordinates=PEC1pt3_ty axis=(0 1 0) MultiplierFunction(scale=1, Constant(value=0))
        TransformAxis translation3: coordinates=PEC1pt3_tz axis=(0 0 1) MultiplierFunction(scale=1, Constant(value=0))
    CustomJoint PEC2pt2: socket_parent_frame=humerus_offset socket_child_frame=PEC2pt2_offset
      Coordinate PEC2pt2_tx: default_value=0.002602951 range=(-99999.9 99999.9) clamped=false
      Coordinate PEC2pt2_ty: default_value=0.009132388 range=(-99999.9 99999.9) clamped=false
      Coordinate PEC2pt2_tz: default_value=0.006352965 range=(-99999.9 99999.9) clamped=false
      PhysicalOffsetFrame humerus_offset: socket_parent=/bodyset/humerus translation=(0 0 0)
      PhysicalOffsetFrame PEC2pt2_offset: socket_parent=/bodyset/PEC2pt2 translation=(0 0 0)
      SpatialTransform: axes_held_at_zero=(rotation1 rotation2 rotation3)
        TransformAxis translation1: coordinates=PEC2pt2_tx axis=(1 0 0) MultiplierFunction(scale=1, Constant(value=0))
        TransformAxis translation2: coordinates=PEC2pt2_ty axis=(0 1 0) MultiplierFunction(scale=1, Constant(value=0))
        TransformAxis translation3: coordinates=PEC2pt2_tz axis=(0 0 1) MultiplierFunction(scale=1, Constant(value=0))
    CustomJoint PEC2pt3: socket_parent_frame=thorax_offset socket_child_frame=PEC2pt3_offset
      Coordinate PEC2pt3_tx: default_value=0.0005735316 range=(-99999.9 99999.9) clamped=false
      Coordinate PEC2pt3_ty: default_value=0.0190589 range=(-99999.9 99999.9) clamped=false
      Coordinate PEC2pt3_tz: default_value=-0.01001474 range=(-99999.9 99999.9) clamped=false
      PhysicalOffsetFrame thorax_offset: socket_parent=/bodyset/thorax translation=(0 0 0)
      PhysicalOffsetFrame PEC2pt3_offset: socket_parent=/bodyset/PEC2pt3 translation=(0 0 0)
      SpatialTransform: axes_held_at_zero=(rotation1 rotation2 rotation3)
        TransformAxis translation1: coordinates=PEC2pt3_tx axis=(1 0 0) MultiplierFunction(scale=1, Constant(value=0))
        TransformAxis translation2: coordinates=PEC2pt3_ty axis=(0 1 0) MultiplierFunction(scale=1, Constant(value=0))
        TransformAxis translation3: coordinates=PEC2pt3_tz axis=(0 0 1) MultiplierFunction(scale=1, Constant(value=0))
    CustomJoint PEC3pt2: socket_parent_frame=humerus_offset socket_child_frame=PEC3pt2_offset
      Coordinate PEC3pt2_tx: default_value=0.004068848 range=(-99999.9 99999.9) clamped=false
      Coordinate PEC3pt2_ty: default_value=0.005078405 range=(-99999.9 99999.9) clamped=false
      Coordinate PEC3pt2_tz: default_value=0.01625552 range=(-99999.9 99999.9) clamped=false
      PhysicalOffsetFrame humerus_offset: socket_parent=/bodyset/humerus translation=(0 0 0)
      PhysicalOffsetFrame PEC3pt2_offset: socket_parent=/bodyset/PEC3pt2 translation=(0 0 0)
      SpatialTransform: axes_held_at_zero=(rotation1 rotation2 rotation3)
        TransformAxis translation1: coordinates=PEC3pt2_tx axis=(1 0 0) MultiplierFunction(scale=1, Constant(value=0))
        TransformAxis translation2: coordinates=PEC3pt2_ty axis=(0 1 0) MultiplierFunction(scale=1, Constant(value=0))
        TransformAxis translation3: coordinates=PEC3pt2_tz axis=(0 0 1) MultiplierFunction(scale=1, Constant(value=0))
    CustomJoint PEC3pt3: socket_parent_frame=thorax_offset socket_child_frame=PEC3pt3_offset
      Coordinate PEC3pt3_tx: default_value=0 range=(-99999.9 99999.9) clamped=false
      Coordinate PEC3pt3_ty: default_value=0.008439001 range=(-99999.9 99999.9) clamped=false
      Coordinate PEC3pt3_tz: default_value=0 range=(-99999.9 99999.9) clamped=false
      PhysicalOffsetFrame thorax_offset: socket_parent=/bodyset/thorax translation=(0 0 0)
      PhysicalOffsetFrame PEC3pt3_offset: socket_parent=/bodyset/PEC3pt3 translation=(0 0 0)
      SpatialTransform: axes_held_at_zero=(rotation1 rotation2 rotation3)
        TransformAxis translation1: coordinates=PEC3pt3_tx axis=(1 0 0) MultiplierFunction(scale=1, Constant(value=0))
        TransformAxis translation2: coordinates=PEC3pt3_ty axis=(0 1 0) MultiplierFunction(scale=1, Constant(value=0))
        TransformAxis translation3: coordinates=PEC3pt3_tz axis=(0 0 1) MultiplierFunction(scale=1, Constant(value=0))
    CustomJoint DELT2pt2a: socket_parent_frame=humerus_offset socket_child_frame=DELT2pt2a_offset
      Coordinate DELT2pt2a_tx: default_value=-0.007455911 range=(-99999.9 99999.9) clamped=false
      Coordinate DELT2pt2a_ty: default_value=-0.03445601 range=(-99999.9 99999.9) clamped=false
      Coordinate DELT2pt2a_tz: default_value=-0.006961795 range=(-99999.9 99999.9) clamped=false
      PhysicalOffsetFrame humerus_offset: socket_parent=/bodyset/humerus translation=(0 0 0)
      PhysicalOffsetFrame DELT2pt2a_offset: socket_parent=/bodyset/DELT2pt2a translation=(0 0 0)
      SpatialTransform: axes_held_at_zero=(rotation1 rotation2 rotation3)
        TransformAxis translation1: coordinates=DELT2pt2a_tx axis=(1 0 0)
            MultiplierFunction(scale=1, Constant(value=0))
        TransformAxis translation2: coordinates=DELT2pt2a_ty axis=(0 1 0)
            MultiplierFunction(scale=1, Constant(value=0))
        TransformAxis translation3: coordinates=DELT2pt2a_tz axis=(0 0 1)
            MultiplierFunction(scale=1, Constant(value=0))
    CustomJoint DELT2pt2: socket_parent_frame=DELT2pt2a_offset socket_child_frame=DELT2pt2_offset
      Coordinate DELT2pt2_tx: default_value=0.006704811 range=(-99999.9 99999.9) clamped=false
      Coordinate DELT2pt2_ty: default_value=-0.0001236855 range=(-99999.9 99999.9) clamped=false
      Coordinate DELT2pt2_tz: default_value=-0.0005340897 range=(-99999.9 99999.9) clamped=false
      PhysicalOffsetFrame DELT2pt2a_offset: socket_parent=/bodyset/DELT2pt2a translation=(0 0 0)
      PhysicalOffsetFrame DELT2pt2_offset: socket_parent=/bodyset/DELT2pt2 translation=(0 0 0)
      SpatialTransform: axes_held_at_zero=(rotation1 rotation2 rotation3)
        TransformAxis translation1: coordinates=DELT2pt2_tx axis=(1 0 0) MultiplierFunction(scale=1, Constant(value=0))
        TransformAxis translation2: coordinates=DELT2pt2_ty axis=(0 1 0) MultiplierFunction(scale=1, Constant(value=0))
        TransformAxis translation3: coordinates=DELT2pt2_tz axis=(0 0 1) MultiplierFunction(scale=1, Constant(value=0))
    CustomJoint LAT1pt2: socket_parent_frame=scapula_offset socket_child_frame=LAT1pt2_offset
      Coordinate LAT1pt2_tx: default_value=-0.0009264741 range=(-99999.9 99999.9) clamped=false
      Coordinate LAT1pt2_ty: default_value=0.01552947 range=(-99999.9 99999.9) clamped=false
      Coordinate LAT1pt2_tz: default_value=-0.006352965 range=(-99999.9 99999.9) clamped=false
      PhysicalOffsetFrame scapula_offset: socket_parent=/bodyset/scapula translation=(0 0 0)
      PhysicalOffsetFrame LAT1pt2_offset: socket_parent=/bodyset/LAT1pt2 translation=(0 0 0)
      SpatialTransform: axes_held_at_zero=(rotation1 rotation2 rotation3)
        TransformAxis translation1: coordinates=LAT1pt2_tx axis=(1 0 0) MultiplierFunction(scale=1, Constant(value=0))
        TransformAxis translation2: coordinates=LAT1pt2_ty axis=(0 1 0) MultiplierFunction(scale=1, Constant(value=0))
        TransformAxis translation3: coordinates=LAT1pt2_tz axis=(0 0 1) MultiplierFunction(scale=1, Constant(value=0))
    CustomJoint LAT1pt3: socket_parent_frame=scapula_offset socket_child_frame=LAT1pt3_offset
      Coordinate LAT1pt3_tx: default_value=0.002558833 range=(-99999.9 99999.9) clamped=false
      Coordinate LAT1pt3_ty: default_value=0.02241185 range=(-99999.9 99999.9) clamped=false
      Coordinate LAT1pt3_tz: default_value=-0.01852948 range=(-99999.9 99999.9) clamped=false
      PhysicalOffsetFrame scapula_offset: socket_parent=/bodyset/scapula translation=(0 0 0)
      PhysicalOffsetFrame LAT1pt3_offset: socket_parent=/bodyset/LAT1pt3 translation=(0 0 0)
      SpatialTransform: axes_held_at_zero=(rotation1 rotation2 rotation3)
        TransformAxis translation1: coordinates=LAT1pt3_tx axis=(1 0 0) MultiplierFunction(scale=1, Constant(value=0))
        TransformAxis translation2: coordinates=LAT1pt3_ty axis=(0 1 0) MultiplierFunction(scale=1, Constant(value=0))
        TransformAxis translation3: coordinates=LAT1pt3_tz axis=(0 0 1) MultiplierFunction(scale=1, Constant(value=0))
    CustomJoint LAT2pt2: socket_parent_frame=scapula_offset socket_child_frame=LAT2pt2_offset
      Coordinate LAT2pt2_tx: default_value=-0.006220612 range=(-99999.9 99999.9) clamped=false
      Coordinate LAT2pt2_ty: default_value=0.01345593 range=(-99999.9 99999.9) clamped=false
      Coordinate LAT2pt2_tz: default_value=-0.005691198 range=(-99999.9 99999.9) clamped=false
      PhysicalOffsetFrame scapula_offset: socket_parent=/bodyset/scapula translation=(0 0 0)
      PhysicalOffsetFrame LAT2pt2_offset: socket_parent=/bodyset/LAT2pt2 translation=(0 0 0)
      SpatialTransform: axes_held_at_zero=(rotation1 rotation2 rotation3)
        TransformAxis translation1: coordinates=LAT2pt2_tx axis=(1 0 0) MultiplierFunction(scale=1, Constant(value=0))
        TransformAxis translation2: coordinates=LAT2pt2_ty axis=(0 1 0) MultiplierFunction(scale=1, Constant(value=0))
        TransformAxis translation3: coordinates=LAT2pt2_tz axis=(0 0 1) MultiplierFunction(scale=1, Constant(value=0))
    CustomJoint LAT2pt3: socket_parent_frame=scapula_offset socket_child_frame=LAT2pt3_offset
      Coordinate LAT2pt3_tx: default_value=-0.01297064 range=(-99999.9 99999.9) clamped=false
      Coordinate LAT2pt3_ty: default_value=0.02841187 range=(-99999.9 99999.9) clamped=false
      Coordinate LAT2pt3_tz: default_value=-0.03180894 range=(-99999.9 99999.9) clamped=false
      PhysicalOffsetFrame scapula_offset: socket_parent=/bodyset/scapula translation=(0 0 0)
      PhysicalOffsetFrame LAT2pt3_offset: socket_parent=/bodyset/LAT2pt3 translation=(0 0 0)
      SpatialTransform: axes_held_at_zero=(rotation1 rotation2 rotation3)
        TransformAxis translation1: coordinates=LAT2pt3_tx axis=(1 0 0) MultiplierFunction(scale=1, Constant(value=0))
        TransformAxis translation2: coordinates=LAT2pt3_ty axis=(0 1 0) MultiplierFunction(scale=1, Constant(value=0))
        TransformAxis translation3: coordinates=LAT2pt3_tz axis=(0 0 1) MultiplierFunction(scale=1, Constant(value=0))
    CustomJoint LAT3pt2: socket_parent_frame=scapula_offset socket_child_frame=LAT3pt2_offset
      Coordinate LAT3pt2_tx: default_value=-0.02435303 range=(-99999.9 99999.9) clamped=false
      Coordinate LAT3pt2_ty: default_value=0.01504417 range=(-99999.9 99999.9) clamped=false
      Coordinate LAT3pt2_tz: default_value=-0.007632382 range=(-99999.9 99999.9) clamped=false
      PhysicalOffsetFrame scapula_offset: socket_parent=/bodyset/scapula translation=(0 0 0)
      PhysicalOffsetFrame LAT3pt2_offset: socket_parent=/bodyset/LAT3pt2 translation=(0 0 0)
      SpatialTransform: axes_held_at_zero=(rotation1 rotation2 rotation3)
        TransformAxis translation1: coordinates=LAT3pt2_tx axis=(1 0 0) MultiplierFunction(scale=1, Constant(value=0))
        TransformAxis translation2: coordinates=LAT3pt2_ty axis=(0 1 0) MultiplierFunction(scale=1, Constant(value=0))
        TransformAxis translation3: coordinates=LAT3pt2_tz axis=(0 0 1) MultiplierFunction(scale=1, Constant(value=0))
    CustomJoint LAT3pt3: socket_parent_frame=scapula_offset socket_child_frame=LAT3pt3_offset
      Coordinate LAT3pt3_tx: default_value=-0.01614712 range=(-99999.9 99999.9) clamped=false
      Coordinate LAT3pt3_ty: default_value=0.03282365 range=(-99999.9 99999.9) clamped=false
      Coordinate LAT3pt3_tz: default_value=-0.03975015 range=(-99999.9 99999.9) clamped=false
      PhysicalOffsetFrame scapula_offset: socket_parent=/bodyset/scapula translation=(0 0 0)
      PhysicalOffsetFrame LAT3pt3_offset: socket_parent=/bodyset/LAT3pt3 translation=(0 0 0)
      SpatialTransform: axes_held_at_zero=(rotation1 rotation2 rotation3)
        TransformAxis translation1: coordinates=LAT3pt3_tx axis=(1 0 0) MultiplierFunction(scale=1, Constant(value=0))
        TransformAxis translation2: coordinates=LAT3pt3_ty axis=(0 1 0) MultiplierFunction(scale=1, Constant(value=0))
        TransformAxis translation3: coordinates=LAT3pt3_tz axis=(0 0 1) MultiplierFunction(scale=1, Constant(value=0))
  ConstraintSet:
    CoordinateCouplerConstraint sternoclavicular_r2_con: independent_coordinate_names=shoulder_elv
        dependent_coordinate_name=sternoclavicular_r2
      coupled_coordinates_function: SimmSpline: x=(0 2.61799) y=(0 -0.633555)
    CoordinateCouplerConstraint sternoclavicular_r3_con: independent_coordinate_names=shoulder_elv
        dependent_coordinate_name=sternoclavicular_r3
      coupled_coordinates_function: SimmSpline: x=(0 3.14159) y=(0 0.322013)
    CoordinateCouplerConstraint unrotscap_r2_con: independent_coordinate_names=shoulder_elv
        dependent_coordinate_name=unrotscap_r2
      coupled_coordinates_function: SimmSpline: x=(0 2.61799) y=(0 0.633555)
    CoordinateCouplerConstraint unrotscap_r3_con: independent_coordinate_names=shoulder_elv
        dependent_coordinate_name=unrotscap_r3
      coupled_coordinates_function: SimmSpline: x=(0 3.14159) y=(0 -0.322013)
    CoordinateCouplerConstraint acromioclavicular_r1_con: independent_coordinate_names=shoulder_elv
        dependent_coordinate_name=acromioclavicular_r1
      coupled_coordinates_function: SimmSpline: x=(0 2.61799) y=(0 0.466003)
    CoordinateCouplerConstraint acromioclavicular_r2_con: independent_coordinate_names=shoulder_elv
        dependent_coordinate_name=acromioclavicular_r2
      coupled_coordinates_function: SimmSpline: x=(0 2.61799) y=(0 -0.128282)
    CoordinateCouplerConstraint acromioclavicular_r3_con: independent_coordinate_names=shoulder_elv
        dependent_coordinate_name=acromioclavicular_r3
      coupled_coordinates_function: SimmSpline: x=(0 2.61799) y=(0 1.03673)
    CoordinateCouplerConstraint unrothum_r1_con: independent_coordinate_names=shoulder_elv
        dependent_coordinate_name=unrothum_r1
      coupled_coordinates_function: SimmSpline: x=(0 2.61799) y=(0 -0.466003)
    CoordinateCouplerConstraint unrothum_r2_con: independent_coordinate_names=shoulder_elv
        dependent_coordinate_name=unrothum_r2
      coupled_coordinates_function: SimmSpline: x=(0 2.61799) y=(0 0.128282)
    CoordinateCouplerConstraint unrothum_r3_con: independent_coordinate_names=shoulder_elv
        dependent_coordinate_name=unrothum_r3
      coupled_coordinates_function: SimmSpline: x=(0 2.61799) y=(0 -1.03673)
    CoordinateCouplerConstraint shoulder1_r2_con: independent_coordinate_names=elv_angle
        dependent_coordinate_name=shoulder1_r2
      coupled_coordinates_function: SimmSpline: x=(-1.5708 3.14159) y=(1.5708 -3.14159)
    CoordinateCouplerConstraint proximal_distal_r1_con: independent_coordinate_names=deviation
        dependent_coordinate_name=proximal_distal_r1
      coupled_coordinates_function: SimmSpline: x=(-0.174533 0 0.436332) y=(-0.261799 0 0.436332)
    CoordinateCouplerConstraint proximal_distal_r3_con: independent_coordinate_names=flexion
        dependent_coordinate_name=proximal_distal_r3
      coupled_coordinates_function: SimmSpline: x=(-1.22173 1.22173) y=(-0.610865 0.610865)
    CoordinateCouplerConstraint bicpt_tx_con: independent_coordinate_names=elbow_flexion
        dependent_coordinate_name=bicpt_tx
      coupled_coordinates_function: SimmSpline: x=(0 2.26893) y=(-0.0001 0.0042)
    CoordinateCouplerConstraint bicpt_ty_con: independent_coordinate_names=elbow_flexion
        dependent_coordinate_name=bicpt_ty
      coupled_coordinates_function: SimmSpline: x=(0 2.26893) y=(-0.0276 -0.0425)
    CoordinateCouplerConstraint bicpt_tz_con: independent_coordinate_names=elbow_flexion
        dependent_coordinate_name=bicpt_tz
      coupled_coordinates_function: SimmSpline: x=(0 2.26893) y=(-0.0043 -0.0067)
    CoordinateCouplerConstraint bicpt2_tx_con: independent_coordinate_names=pro_sup dependent_coordinate_name=bicpt2_tx
      coupled_coordinates_function: SimmSpline: x=(-1.5708 -0.610865 1.57823) y=(-0.003 0.01 0.01376)
    CoordinateCouplerConstraint bicpt2_ty_con: independent_coordinate_names=elbow_flexion
        dependent_coordinate_name=bicpt2_ty
      coupled_coordinates_function: SimmSpline: x=(0 2.27483) y=(-0.0102 -0.045607)
    CoordinateCouplerConstraint bicpt2_tz_con: independent_coordinate_names=pro_sup dependent_coordinate_name=bicpt2_tz
      coupled_coordinates_function: SimmSpline: x=(-1.5708 -0.610865 1.57561) y=(-0.0095 -0.011533 -0.000331)
    CoordinateCouplerConstraint ptpt_tx_con: independent_coordinate_names=pro_sup dependent_coordinate_name=ptpt_tx
      coupled_coordinates_function: SimmSpline: x=(-1.5708 1.5708) y=(0.0142 0.0009)
    CoordinateCouplerConstraint ptpt_ty_con: independent_coordinate_names=pro_sup dependent_coordinate_name=ptpt_ty
      coupled_coordinates_function: SimmSpline: x=(-1.5708 1.5708) y=(-0.0606 -0.0692)
    CoordinateCouplerConstraint ptpt_tz_con: independent_coordinate_names=pro_sup dependent_coordinate_name=ptpt_tz
      coupled_coordinates_function: SimmSpline: x=(-1.5708 1.5708) y=(0.0072 -0.0073)
    CoordinateCouplerConstraint FCUpt_tx_con: independent_coordinate_names=pro_sup dependent_coordinate_name=FCUpt_tx
      coupled_coordinates_function: SimmSpline: x=(-1.5708 0 1.5708) y=(-0.0027 0.004 0.0132)
    CoordinateCouplerConstraint FCUpt_ty_con: independent_coordinate_names=pro_sup dependent_coordinate_name=FCUpt_ty
      coupled_coordinates_function: SimmSpline: x=(-1.5708 0 1.5708) y=(-0.1838 -0.1841 -0.1821)
    CoordinateCouplerConstraint FCUpt_tz_con: independent_coordinate_names=pro_sup dependent_coordinate_name=FCUpt_tz
      coupled_coordinates_function: SimmSpline: x=(-1.5708 0 1.5708) y=(0.0069 0.0005 0.0002)
    CoordinateCouplerConstraint EDCpt_tx_con: independent_coordinate_names=pro_sup dependent_coordinate_name=EDCpt_tx
      coupled_coordinates_function: SimmSpline: x=(-1.5708 0 1.5708) y=(0.0108 0 -0.0108)
    CoordinateCouplerConstraint EDCpt_ty_con: independent_coordinate_names=pro_sup dependent_coordinate_name=EDCpt_ty
      coupled_coordinates_function: SimmSpline: x=(-1.5708 0 1.5708) y=(-0.0013 0 0.0038)
    CoordinateCouplerConstraint EDCpt_tz_con: independent_coordinate_names=pro_sup dependent_coordinate_name=EDCpt_tz
      coupled_coordinates_function: SimmSpline: x=(-1.5708 0 1.5708) y=(-0.0035 0 -0.00089)
    CoordinateCouplerConstraint APLpt_tx_con: independent_coordinate_names=flexion dependent_coordinate_name=APLpt_tx
      coupled_coordinates_function: SimmSpline: x=(-1.22173 0 1.22173) y=(0 0 -0.0025)
    CoordinateCouplerConstraint APLpt_ty_con: independent_coordinate_names=flexion dependent_coordinate_name=APLpt_ty
      coupled_coordinates_function: SimmSpline: x=(-1.22173 0 1.22173) y=(0 0 -0.001)
    CoordinateCouplerConstraint APLpt_tz_con: independent_coordinate_names=flexion dependent_coordinate_name=APLpt_tz
      coupled_coordinates_function: SimmSpline: x=(-1.22173 0 1.22173) y=(0 0 -0.005)
    CoordinateCouplerConstraint FPLpt_tx_con: independent_coordinate_names=flexion dependent_coordinate_name=FPLpt_tx
      coupled_coordinates_function: SimmSpline: x=(-1.22173 0 1.22173) y=(0 0 -0.0032)
    CoordinateCouplerConstraint FPLpt_ty_con: independent_coordinate_names=flexion dependent_coordinate_name=FPLpt_ty
      coupled_coordinates_function: SimmSpline: x=(-1.22173 0 1.22173) y=(0 0 -0.0096)
    CoordinateCouplerConstraint FPLpt_tz_con: independent_coordinate_names=flexion dependent_coordinate_name=FPLpt_tz
      coupled_coordinates_function: SimmSpline: x=(-1.22173 0 1.22173) y=(0 0 -0.0054)
    CoordinateCouplerConstraint FPLpt2_tx_con: independent_coordinate_names=cmc_flexion
        dependent_coordinate_name=FPLpt2_tx
      coupled_coordinates_function: SimmSpline: x=(-0.261799 0 0.0872665 0.183675 0.376492 0.785303)
          y=(-0.0032 0 4e-5 3.2e-5 8e-6 0)
    CoordinateCouplerConstraint FPLpt2_ty_con: independent_coordinate_names=cmc_flexion
        dependent_coordinate_name=FPLpt2_ty
      coupled_coordinates_function: SimmSpline: x=(-0.261799 0 0.785398) y=(0.0005 0 0)
    CoordinateCouplerConstraint FPLpt2_tz_con: independent_coordinate_names=cmc_flexion
        dependent_coordinate_name=FPLpt2_tz
      coupled_coordinates_function: SimmSpline: x=(-0.261799 0 0.785398) y=(0.0006 0 0)
    CoordinateCouplerConstraint PEC1pt2_tx_con: independent_coordinate_names=shoulder_elv
        dependent_coordinate_name=PEC1pt2_tx
      coupled_coordinates_function: SimmSpline: x=(0 3.14159) y=(0 0.0059)
    CoordinateCouplerConstraint PEC1pt2_ty_con: independent_coordinate_names=shoulder_elv
        dependent_coordinate_name=PEC1pt2_ty
      coupled_coordinates_function: SimmSpline: x=(0 3.14159) y=(0 0.0207)
    CoordinateCouplerConstraint PEC1pt2_tz_con: independent_coordinate_names=shoulder_elv
        dependent_coordinate_name=PEC1pt2_tz
      coupled_coordinates_function: SimmSpline: x=(0 3.14159) y=(0 0.0144)
    CoordinateCouplerConstraint PEC1pt3_tx_con: independent_coordinate_names=shoulder_elv
        dependent_coordinate_name=PEC1pt3_tx
      coupled_coordinates_function: SimmSpline: x=(0 3.14159) y=(0 -0.0193)
    CoordinateCouplerConstraint PEC1pt3_ty_con: independent_coordinate_names=shoulder_elv
        dependent_coordinate_name=PEC1pt3_ty
      coupled_coordinates_function: SimmSpline: x=(0 3.14159) y=(0 0.0466)
    CoordinateCouplerConstraint PEC1pt3_tz_con: independent_coordinate_names=shoulder_elv
        dependent_coordinate_name=PEC1pt3_tz
      coupled_coordinates_function: SimmSpline: x=(0 3.14159) y=(0 -0.0442)
    CoordinateCouplerConstraint PEC2pt2_tx_con: independent_coordinate_names=shoulder_elv
        dependent_coordinate_name=PEC2pt2_tx
      coupled_coordinates_function: SimmSpline: x=(0 3.14159) y=(0 0.0059)
    CoordinateCouplerConstraint PEC2pt2_ty_con: independent_coordinate_names=shoulder_elv
        dependent_coordinate_name=PEC2pt2_ty
      coupled_coordinates_function: SimmSpline: x=(0 3.14159) y=(0 0.0207)
    CoordinateCouplerConstraint PEC2pt2_tz_con: independent_coordinate_names=shoulder_elv
        dependent_coordinate_name=PEC2pt2_tz
      coupled_coordinates_function: SimmSpline: x=(0 3.14159) y=(0 0.0144)
    CoordinateCouplerConstraint PEC2pt3_tx_con: independent_coordinate_names=shoulder_elv
        dependent_coordinate_name=PEC2pt3_tx
      coupled_coordinates_function: SimmSpline: x=(0 3.14159) y=(0 0.0013)
    CoordinateCouplerConstraint PEC2pt3_ty_con: independent_coordinate_names=shoulder_elv
        dependent_coordinate_name=PEC2pt3_ty
      coupled_coordinates_function: SimmSpline: x=(0 3.14159) y=(0 0.0432)
    CoordinateCouplerConstraint PEC2pt3_tz_con: independent_coordinate_names=shoulder_elv
        dependent_coordinate_name=PEC2pt3_tz
      coupled_coordinates_function: SimmSpline: x=(0 3.14159) y=(0 -0.0227)
    CoordinateCouplerConstraint PEC3pt2_tx_con: independent_coordinate_names=shoulder_elv
        dependent_coordinate_name=PEC3pt2_tx
      coupled_coordinates_function: SimmSpline: x=(0 0.747517 3.14159) y=(0 0.002482 0.0059)
    CoordinateCouplerConstraint PEC3pt2_ty_con: independent_coordinate_names=shoulder_elv
        dependent_coordinate_name=PEC3pt2_ty
      coupled_coordinates_function: SimmSpline: x=(0 3.13149) y=(0 0.011474)
    CoordinateCouplerConstraint PEC3pt2_tz_con: independent_coordinate_names=shoulder_elv
        dependent_coordinate_name=PEC3pt2_tz
      coupled_coordinates_function: SimmSpline: x=(0 0.623056 2.29124 3.12533) y=(0 0.009968 0.018193 0.017746)
    CoordinateCouplerConstraint PEC3pt3_tx_con: independent_coordinate_names=shoulder_elv
        dependent_coordinate_name=PEC3pt3_tx
      coupled_coordinates_function: SimmSpline: x=(0 3.14159) y=(0 0)
    CoordinateCouplerConstraint PEC3pt3_ty_con: independent_coordinate_names=shoulder_elv
        dependent_coordinate_name=PEC3pt3_ty
      coupled_coordinates_function: SimmSpline: x=(0.0101016 1.59605 3.14159) y=(0.000222 0.011219 0.0441)
    CoordinateCouplerConstraint PEC3pt3_tz_con: independent_coordinate_names=shoulder_elv
        dependent_coordinate_name=PEC3pt3_tz
      coupled_coordinates_function: SimmSpline: x=(0 3.14159) y=(0 0)
    CoordinateCouplerConstraint DELT2pt2a_tx_con: independent_coordinate_names=shoulder_elv
        dependent_coordinate_name=DELT2pt2a_tx
      coupled_coordinates_function: SimmSpline: x=(0 3.14159) y=(0 -0.0169)
    CoordinateCouplerConstraint DELT2pt2a_ty_con: independent_coordinate_names=shoulder_elv
        dependent_coordinate_name=DELT2pt2a_ty
      coupled_coordinates_function: SimmSpline: x=(0 3.14159) y=(0 -0.0781)
    CoordinateCouplerConstraint DELT2pt2a_tz_con: independent_coordinate_names=shoulder_elv
        dependent_coordinate_name=DELT2pt2a_tz
      coupled_coordinates_function: SimmSpline: x=(0 1.22229 3.14159) y=(0 -0.005395 -0.0363)
    CoordinateCouplerConstraint DELT2pt2_tx_con: independent_coordinate_names=shoulder_rot
        dependent_coordinate_name=DELT2pt2_tx
      coupled_coordinates_function: SimmSpline: x=(-1.5708 -0.0101503 0.349046) y=(0.0214 4.9e-5 -0.020005)
    CoordinateCouplerConstraint DELT2pt2_ty_con: independent_coordinate_names=shoulder_rot
        dependent_coordinate_name=DELT2pt2_ty
      coupled_coordinates_function: SimmSpline: x=(-1.5708 -1.18189 -0.169482 0 0.349066)
          y=(-0.0029 -0.002148 -0.000139 0 -0.001644)
    CoordinateCouplerConstraint DELT2pt2_tz_con: independent_coordinate_names=shoulder_rot
        dependent_coordinate_name=DELT2pt2_tz
      coupled_coordinates_function: SimmSpline: x=(-1.5708 -0.496661 0 0.342893) y=(-0.0455 -0.006762 0 -0.00573)
    CoordinateCouplerConstraint LAT1pt2_tx_con: independent_coordinate_names=shoulder_elv
        dependent_coordinate_name=LAT1pt2_tx
      coupled_coordinates_function: SimmSpline: x=(0 3.14159) y=(0 -0.0021)
    CoordinateCouplerConstraint LAT1pt2_ty_con: independent_coordinate_names=shoulder_elv
        dependent_coordinate_name=LAT1pt2_ty
      coupled_coordinates_function: SimmSpline: x=(0 3.14159) y=(0 0.0352)
    CoordinateCouplerConstraint LAT1pt2_tz_con: independent_coordinate_names=shoulder_elv
        dependent_coordinate_name=LAT1pt2_tz
      coupled_coordinates_function: SimmSpline: x=(0 3.14159) y=(0 -0.0144)
    CoordinateCouplerConstraint LAT1pt3_tx_con: independent_coordinate_names=shoulder_elv
        dependent_coordinate_name=LAT1pt3_tx
      coupled_coordinates_function: SimmSpline: x=(0 3.14159) y=(0 0.0058)
    CoordinateCouplerConstraint LAT1pt3_ty_con: independent_coordinate_names=shoulder_elv
        dependent_coordinate_name=LAT1pt3_ty
      coupled_coordinates_function: SimmSpline: x=(0 3.14159) y=(0 0.0508)
    CoordinateCouplerConstraint LAT1pt3_tz_con: independent_coordinate_names=shoulder_elv
        dependent_coordinate_name=LAT1pt3_tz
      coupled_coordinates_function: SimmSpline: x=(0 3.14159) y=(0 -0.042)
    CoordinateCouplerConstraint LAT2pt2_tx_con: independent_coordinate_names=shoulder_elv
        dependent_coordinate_name=LAT2pt2_tx
      coupled_coordinates_function: SimmSpline: x=(0 3.14159) y=(0 -0.0141)
    CoordinateCouplerConstraint LAT2pt2_ty_con: independent_coordinate_names=shoulder_elv
        dependent_coordinate_name=LAT2pt2_ty
      coupled_coordinates_function: SimmSpline: x=(0 3.14159) y=(0 0.0305)
    CoordinateCouplerConstraint LAT2pt2_tz_con: independent_coordinate_names=shoulder_elv
        dependent_coordinate_name=LAT2pt2_tz
      coupled_coordinates_function: SimmSpline: x=(0 3.14159) y=(0 -0.0129)
    CoordinateCouplerConstraint LAT2pt3_tx_con: independent_coordinate_names=shoulder_elv
        dependent_coordinate_name=LAT2pt3_tx
      coupled_coordinates_function: SimmSpline: x=(0 3.14159) y=(0 -0.0294)
    CoordinateCouplerConstraint LAT2pt3_ty_con: independent_coordinate_names=shoulder_elv
        dependent_coordinate_name=LAT2pt3_ty
      coupled_coordinates_function: SimmSpline: x=(0 3.14159) y=(0 0.0644)
    CoordinateCouplerConstraint LAT2pt3_tz_con: independent_coordinate_names=shoulder_elv
        dependent_coordinate_name=LAT2pt3_tz
      coupled_coordinates_function: SimmSpline: x=(0 3.14159) y=(0 -0.0721)
    CoordinateCouplerConstraint LAT3pt2_tx_con: independent_coordinate_names=shoulder_elv
        dependent_coordinate_name=LAT3pt2_tx
      coupled_coordinates_function: SimmSpline: x=(0 3.14159) y=(0 -0.0552)
    CoordinateCouplerConstraint LAT3pt2_ty_con: independent_coordinate_names=shoulder_elv
        dependent_coordinate_name=LAT3pt2_ty
      coupled_coordinates_function: SimmSpline: x=(0 3.14159) y=(0 0.0341)
    CoordinateCouplerConstraint LAT3pt2_tz_con: independent_coordinate_names=shoulder_elv
        dependent_coordinate_name=LAT3pt2_tz
      coupled_coordinates_function: SimmSpline: x=(0 3.14159) y=(0 -0.0173)
    CoordinateCouplerConstraint LAT3pt3_tx_con: independent_coordinate_names=shoulder_elv
        dependent_coordinate_name=LAT3pt3_tx
      coupled_coordinates_function: SimmSpline: x=(0 3.14159) y=(0 -0.0366)
    CoordinateCouplerConstraint LAT3pt3_ty_con: independent_coordinate_names=shoulder_elv
        dependent_coordinate_name=LAT3pt3_ty
      coupled_coordinates_function: SimmSpline: x=(0 3.14159) y=(0 0.0744)
    CoordinateCouplerConstraint LAT3pt3_tz_con: independent_coordinate_names=shoulder_elv
        dependent_coordinate_name=LAT3pt3_tz
      coupled_coordinates_function: SimmSpline: x=(0 3.14159) y=(0 -0.0901)
  MarkerSet:
    Marker INDEX_MCP: proxph2 (0 0 0)
    Marker RING_MCP: proxph4 (0 0 0)
    Marker INDEX_PIP: midph2 (0 0 0)
    Marker INDEX_DIP: distph2 (0 0 0)
    Marker MIDDLE_MCP: proxph3 (0 0 0)
    Marker MIDDLE_PIP: midph3 (0 0 0)
    Marker MIDDLE_DIP: distph3 (0 0 0)
    Marker RING_PIP: midph4 (0 0 0)
    Marker RING_DIP: distph4 (0 0 0)
    Marker PINKY_MCP: proxph5 (0 0 0)
    Marker PINKY_PIP: midph5 (0 0 0)
    Marker PINKY_DIP: distph5 (0 0 0)
    Marker THUMB_CMC: firstmc1 (0 0 0)
    Marker THUMB_MCP: proximal_thumb (0 0 0)
    Marker THUMB_IP: distal_thumb (0 0 0)
    Marker WRIST: lunate (0 0 0)
    Marker INDEX_TIP: distph2 (0.002 -0.018 0)
    Marker MIDDLE_TIP: distph3 (0.002 -0.018 0)
    Marker RING_TIP: distph4 (0.001 -0.018 0)
    Marker PINKY_TIP: distph5 (-0.002 -0.017 0)
    Marker THUMB_TIP: distal_thumb (0.008 -0.02 -0.008)
