# OpenSim document version 10902
Model 2nd_Hand_Model_Mass:
  gravity: 0 -9.80665 0
  defaults:
    Thelen2003Muscle default: min_control=0.01 max_control=1 optimal_force=1 max_isometric_force=546
        optimal_fiber_length=0.0535 tendon_slack_length=0.078 pennation_angle_at_optimal=0.1396263
        max_contraction_velocity=10 activation_time_constant=0.015 deactivation_time_constant=0.05 Vmax=10 Vmax0=5
        FmaxTendonStrain=0.033 FmaxMuscleStrain=0.6 KshapeActive=0.5 KshapePassive=4 damping=0.017 Af=0.3 Flen=1.8
    Schutte1993Muscle default: min_control=0.01 max_control=1 optimal_force=1 max_isometric_force=546
        optimal_fiber_length=0.0535 tendon_slack_length=0.078 pennation_angle_at_optimal=0.1396263
        max_contraction_velocity=0 time_scale=0.1 activation1=7.667 activation2=1.459854 damping=0.017
      tendon_force_length_curve: NaturalCubicSpline: x=(-10 -0.002 -0.001 0 0.00131 0.00281 0.00431 0.00581 0.00731 0.00881 0.0103 0.0118 0.0123 9.2 9.201 9.202 20)
          y=(0 0 0 0 0.0108 0.0257 0.0435 0.0652 0.0915 0.123 0.161 0.208 0.227 345 345 345 345)
      active_force_length_curve: NaturalCubicSpline: x=(-35 0 0.401 0.402 0.4035 0.52725 0.62875 0.71875 0.86125 1.045 1.2175 1.43875 1.61875 1.62 1.621 2.2 35)
          y=(0 0 0 0 0 0.226667 0.636667 0.856667 0.95 0.993333 0.77 0.246667 0 0 0 0 0)
      passive_force_length_curve: NaturalCubicSpline: x=(-35 1 1.05 1.1 1.125 1.14 1.145 1.15 1.15 1.25 1.35 1.45 1.55 1.65 1.75 1.7501 1.7502 35)
          y=(0 0 0 0 0 0 0 0 0 0.035 0.12 0.26 0.55 1.17 2 2 2 2)
  ForceSet:
    ObjectGroup shoulder: members=(CORB DELT1 DELT2 DELT3 INFSP LAT1 LAT2 LAT3 PECM1 PECM2 PECM3 SUBSC SUPSP TMAJ TMIN)
    ObjectGroup elbow: members=(ANC BIClong BICshort BRA BRD ECRL PT TRIlat TRIlong TRImed)
    ObjectGroup forearm: members=(APL ECRB ECU EDM EIP EPB EPL FCR FCU FDP2 FDP3 FDP4 FDP5 FDS2 FDS3 FDS4 FDS5 FPL PL PQ PT SUP)
    ObjectGroup extensor: members=(ECRB ECU EDC2 EDC3 EDC4 EDC5 EDM EIP EPL)
    ObjectGroup radial: members=(APL ECRB EIP EPB EPL FCR FDP2 FDS2 FDS3 FPL PL)
    ObjectGroup wrist: members=(ECRB ECU FCR FCU)
    ObjectGroup ulnar: members=(ECU EDC5 EDC4 EDM FCU FDP2 FDP3 FDP4 FDS5 FDS4)
    ObjectGroup flexor: members=(APL EPB FCR FCU FDP2 FDP5 FDP3 FDP4 FDS2 FDS5 FDS3 FDS4 FPL PL)
    ObjectGroup hand: members=(APL EDC2 EDC5 EDC3 EDC4 EDM EIP EPB EPL FDP2 FDP5 FDP3 FDP4 FDS2 FDS5 FDS3 FDS4 FPL PL)
    ObjectGroup thumb: members=(APL EPB EPL FPL)
    ObjectGroup index finger: members=(EDC2 EIP FDP2 FDS2 RI2 LU_RB2 UI_UB2)
    ObjectGroup middle finger: members=(EDC3 FDP3 FDS3 RI3 LU_RB3 UI_UB3)
    ObjectGroup ring finger: members=(EDC4 FDP4 FDS4 RI4 LU_RB4 UI_UB4)
    ObjectGroup little finger: members=(EDC5 EDM EPB EPL FDP5 FDS5 RI5 LU_RB5 UI_UB5)
    CoordinateLimitForce shoulder_elv_ligaments: coordinate=shoulder_elv upper_limit=150
        upper_stiffness=100 [N*m/degree] lower_limit=30 lower_stiffness=100 [N*m/degree] damping=0 transition=542.8423
    CoordinateLimitForce shoulder_elv_damping: coordinate=shoulder_elv upper_limit=190 upper_stiffness=0.00000001
        lower_limit=190 lower_stiffness=0.00000001 damping=0.001745 transition=1
    CoordinateLimitForce elv_angle_ligaments: coordinate=elv_angle upper_limit=100 upper_stiffness=100 lower_limit=-60
        lower_stiffness=100 damping=0 transition=545.4471
    CoordinateLimitForce elv_angle_damping: coordinate=elv_angle upper_limit=190 upper_stiffness=0.00000001
        lower_limit=190 lower_stiffness=0.00000001 damping=0.001745 transition=1
    CoordinateLimitForce shoulder_rot_ligaments: coordinate=shoulder_rot upper_limit=-10 upper_stiffness=100
        lower_limit=-60 lower_stiffness=100 damping=0 transition=485.466
    CoordinateLimitForce shoulder_rot_damping: coordinate=shoulder_rot upper_limit=190 upper_stiffness=0.00000001
        lower_limit=190 lower_stiffness=0.00000001 damping=0.001745 transition=1
    CoordinateLimitForce elbow_flexion_ligaments: coordinate=elbow_flexion upper_limit=85 upper_stiffness=0.3037
        lower_limit=14 lower_stiffness=100 damping=0 transition=139.5813
    CoordinateLimitForce elbow_flexion_damping: coordinate=elbow_flexion upper_limit=190 upper_stiffness=0.00000001
        lower_limit=190 lower_stiffness=0.00000001 damping=0.001745 transition=1
    CoordinateLimitForce pro_sup_ligaments: coordinate=pro_sup upper_limit=60 upper_stiffness=50 lower_limit=-60
        lower_stiffness=50 damping=0 transition=430.1186
    CoordinateLimitForce pro_sup_damping: coordinate=pro_sup upper_limit=190 upper_stiffness=0.00000001 lower_limit=190
        lower_stiffness=0.00000001 damping=0.001745 transition=1
    CoordinateLimitForce deviation_ligaments: coordinate=deviation upper_limit=20 upper_stiffness=52.5961
        lower_limit=-6 lower_stiffness=487.176 damping=0 transition=39.1586
    CoordinateLimitForce deviation_damping: coordinate=deviation upper_limit=190 upper_stiffness=0.00000001
        lower_limit=190 lower_stiffness=0.00000001 damping=0.001745 transition=1
    CoordinateLimitForce flexion_ligaments: coordinate=flexion upper_limit=60 upper_stiffness=200 lower_limit=-60
        lower_stiffness=135.3232 damping=0 transition=92.916
    CoordinateLimitForce flexion_damping: coordinate=flexion upper_limit=190 upper_stiffness=0.00000001 lower_limit=190
        lower_stiffness=0.00000001 damping=0.00043633 transition=1
    Schutte1993Muscle DELT1: max_isometric_force=1142.6 optimal_fiber_length=0.0976 tendon_slack_length=0.093
        pennation_angle_at_optimal=0.3839724
      PathPoint P1: humerus (0.00896 -0.11883 0.00585)
      PathPoint P2: humerus (0.01623 -0.11033 0.00412)
      PathPoint P3: scapula (0.04347 -0.03252 0.00099)
      PathPoint P4: clavicle (-0.014 0.01106 0.08021)
      PathWrap: wrap_object=delt2hum
      PathWrap: wrap_object=DELT1hh method=hybrid range=(2 3)
    Schutte1993Muscle DELT2: max_isometric_force=1142.6 optimal_fiber_length=0.1078 tendon_slack_length=0.1095
        pennation_angle_at_optimal=0.2617994
      PathPoint P1: humerus (0.00461 -0.13611 0.0056)
      PathPoint P2: DELT2pt2 (0.0272 0.00535 0.04807)
      PathPoint P3: scapula (0.00005 0.00294 0.02233)
      PathPoint P4: scapula (-0.01078 -0.00034 0.0062)
      PathWrap: wrap_object=Deltoid2 method=hybrid
      PathWrap: wrap_object=delt2hum
      PathWrap: wrap_object=TMAJ_LAT_PEC_CORBhh
    Schutte1993Muscle DELT3: max_isometric_force=259.88 optimal_fiber_length=0.1367 tendon_slack_length=0.038
        pennation_angle_at_optimal=0.3141593
      PathPoint P1: scapula (-0.05573 0.00122 -0.02512)
      PathPoint P2: scapula (-0.07247 -0.03285 0.01233)
      PathPoint P3: humerus (0.00206 -0.07602 0.01045)
      PathWrap: wrap_object=Delt3
      PathWrap: wrap_object=delt3hum method=hybrid
      PathWrap: wrap_object=TMAJ_LAT_PEC_CORBhh
    Schutte1993Muscle SUPSP: max_isometric_force=487.82 optimal_fiber_length=0.0682 tendon_slack_length=0.0395
        pennation_angle_at_optimal=0.1221731
      PathPoint P1: humerus (0.00256 0.01063 0.02593)
      PathPoint P2: scapula (-0.01918 0.00127 -0.01271)
      PathPoint P3: scapula (-0.044 -0.01512 -0.05855)
      PathWrap: wrap_object=SUPSP method=hybrid
    Schutte1993Muscle INFSP: max_isometric_force=1210.84 optimal_fiber_length=0.0755 tendon_slack_length=0.0308
        pennation_angle_at_optimal=0.3228859
      PathPoint P1: humerus (-0.00887 0.00484 0.02448)
      PathPoint P2: scapula (-0.07382 -0.05476 -0.04781)
      PathWrap: wrap_object=INFSP
      PathWrap: wrap_object=INFSP_and_TMIN_hum_head method=hybrid
    Schutte1993Muscle SUBSC: max_isometric_force=1377.81 optimal_fiber_length=0.0873 tendon_slack_length=0.033
        pennation_angle_at_optimal=0.3490659
      PathPoint P1: humerus (0.01403 0.0084 -0.01331)
      PathPoint P2: scapula (-0.01831 -0.05223 -0.02457)
      PathPoint P3: scapula (-0.07246 -0.03943 -0.06475)
      PathWrap: wrap_object=SUBSCAP method=hybrid
    Schutte1993Muscle TMIN: max_isometric_force=354.25 optimal_fiber_length=0.0741 tendon_slack_length=0.0713
        pennation_angle_at_optimal=0.418879
      PathPoint P1: humerus (-0.0011 -0.01264 0.02156)
      PathPoint P2: scapula (-0.09473 -0.07991 -0.04737)
      PathPoint P3: scapula (-0.09643 -0.08121 -0.05298)
      PathWrap: wrap_object=TMIN method=hybrid range=(1 2)
      PathWrap: wrap_object=INFSP_and_TMIN_hum_head method=hybrid range=(1 2)
      PathWrap: wrap_object=TMINhum range=(1 2)
    Schutte1993Muscle TMAJ: max_isometric_force=425.39 optimal_fiber_length=0.1624 tendon_slack_length=0.02
        pennation_angle_at_optimal=0.2792527
      PathPoint P1: humerus (0.00998 -0.05419 -0.00568)
      PathPoint P2: scapula (-0.10264 -0.10319 -0.05829)
      PathPoint P3: scapula (-0.10489 -0.10895 -0.07117)
      PathWrap: wrap_object=TMAJ_LAThum
      PathWrap: wrap_object=LAT_TMAJhh range=(1 2)
      PathWrap: wrap_object=LAT_TMAJ2hh
    Schutte1993Muscle PECM1: max_isometric_force=364.41 optimal_fiber_length=0.1442 tendon_slack_length=0.0028
        pennation_angle_at_optimal=0.296706
      PathPoint P1: humerus (0.01169 -0.04191 0.0078)
      PathPoint P2: PEC1pt2 (0.01615 -0.04045 -0.00577)
      PathPoint P3: PEC1pt3 (0.00958 -0.01509 0.12664)
      PathPoint P4: clavicle (0.00321 -0.00013 0.05113)
      PathWrap: wrap_object=Thorax method=hybrid
      PathWrap: wrap_object=PEC12hum range=(2 3)
      PathWrap: wrap_object=PEC1hh method=hybrid
    Schutte1993Muscle PECM2: max_isometric_force=515.41 optimal_fiber_length=0.1385 tendon_slack_length=0.089
        pennation_angle_at_optimal=0.4363323
      PathPoint P1: humerus (0.01274 -0.04289 0.00785)
      PathPoint P2: PEC2pt2 (0.01453 -0.04568 -0.00687)
      PathPoint P3: PEC2pt3 (0.02018 -0.04165 0.1269)
      PathPoint P4: thorax (0.03091 -0.03922 0.09705)
      PathPoint P5: thorax (0.02769 -0.04498 0.02271)
      PathWrap: wrap_object=Thorax method=hybrid
      PathWrap: wrap_object=PEC12hum range=(2 3)
      PathWrap: wrap_object=TMAJ_LAT_PEC_CORBhh
      PathWrap: wrap_object=PEC23hh
    Schutte1993Muscle PECM3: max_isometric_force=390.55 optimal_fiber_length=0.1385 tendon_slack_length=0.132
        pennation_angle_at_optimal=0.4363323
      PathPoint P1: humerus (0.01269 -0.04375 0.0075)
      PathPoint P2: PEC3pt2 (0.01243 -0.05157 -0.01807)
      PathPoint P3: PEC3pt3 (0.02984 -0.071 0.1151)
      PathPoint P4: thorax (0.0525 -0.08417 0.08935)
      PathPoint P5: thorax (0.05724 -0.11654 0.03787)
      PathWrap: wrap_object=Thorax method=hybrid
      PathWrap: wrap_object=PEC3hum range=(2 3)
      PathWrap: wrap_object=PEC23hh
    Schutte1993Muscle LAT1: max_isometric_force=389.1 optimal_fiber_length=0.254 tendon_slack_length=0.12
        pennation_angle_at_optimal=0.4363323
      PathPoint P1: humerus (0.0105 -0.03415 -0.00653)
      PathPoint P2: LAT1pt2 (-0.07947 -0.08581 -0.02188)
      PathPoint P3: LAT1pt3 (-0.11215 -0.09779 -0.05322)
      PathPoint P4: thorax (-0.11828 -0.10118 0.03316)
      PathPoint P5: thorax (-0.09578 -0.11724 0.00882)
      PathWrap: wrap_object=TMAJ_LAThum
      PathWrap: wrap_object=LAT_TMAJhh range=(1 2)
      PathWrap: wrap_object=LAT_TMAJ2hh
    Schutte1993Muscle LAT2: max_isometric_force=389.1 optimal_fiber_length=0.2324 tendon_slack_length=0.1765
        pennation_angle_at_optimal=0.3316126
      PathPoint P1: humerus (0.00968 -0.04071 -0.00611)
      PathPoint P2: LAT2pt2 (-0.0764 -0.1022 -0.01808)
      PathPoint P3: LAT2pt3 (-0.10054 -0.13969 -0.05258)
      PathPoint P4: thorax (-0.10992 -0.16908 0.02878)
      PathPoint P5: thorax (-0.07186 -0.18818 0.00815)
      PathWrap: wrap_object=TMAJ_LAThum
      PathWrap: wrap_object=LAT_TMAJhh range=(1 2)
      PathWrap: wrap_object=LAT_TMAJ2hh
    Schutte1993Muscle LAT3: max_isometric_force=281.66 optimal_fiber_length=0.2789 tendon_slack_length=0.1403
        pennation_angle_at_optimal=0.3665191
      PathPoint P1: humerus (0.01208 -0.03922 -0.00416)
      PathPoint P2: LAT3pt2 (-0.05678 -0.13303 -0.0213)
      PathPoint P3: LAT3pt3 (-0.09449 -0.17553 -0.04606)
      PathPoint P4: thorax (-0.11157 -0.19387 0.05532)
      PathPoint P5: thorax (-0.07117 -0.24858 0.00907)
      PathWrap: wrap_object=TMAJ_LAThum
      PathWrap: wrap_object=LAT_TMAJhh range=(1 2)
      PathWrap: wrap_object=LAT_TMAJ2hh
    Schutte1993Muscle CORB: max_isometric_force=242.46 optimal_fiber_length=0.0932 tendon_slack_length=0.097
        pennation_angle_at_optimal=0
      PathPoint P1: scapula (0.0125 -0.04127 -0.02652)
      PathPoint P2: scapula (0.00483 -0.06958 -0.01563)
      PathPoint P3: humerus (0.00743 -0.15048 -0.00782)
      PathWrap: wrap_object=CORBhum
      PathWrap: wrap_object=TMAJ_LAT_PEC_CORBhh
    Schutte1993Muscle TRIlong: max_isometric_force=798.52 optimal_fiber_length=0.134 tendon_slack_length=0.143
        pennation_angle_at_optimal=0.2094395
      PathPoint P1: scapula (-0.04565 -0.04073 -0.01377)
      PathPoint P2: humerus (-0.02714 -0.11441 -0.00664)
      PathPoint P3: humerus (-0.03184 -0.22637 -0.01217)
      PathPoint P4: humerus (-0.01743 -0.26757 -0.01208)
      PathPoint P5: ulna (-0.0219 0.01046 -0.00078)
      PathWrap: wrap_object=TRI
      PathWrap: wrap_object=TRIlonghh method=hybrid
      PathWrap: wrap_object=TRIlongglen
    Schutte1993Muscle TRIlat: max_isometric_force=624.3 optimal_fiber_length=0.1138 tendon_slack_length=0.098
        pennation_angle_at_optimal=0.1570796
      PathPoint P1: humerus (-0.00599 -0.12646 0.00428)
      PathPoint P2: humerus (-0.02344 -0.14528 0.00928)
      PathPoint P3: humerus (-0.03184 -0.22637 -0.01217)
      PathPoint P4: humerus (-0.01743 -0.26757 -0.01208)
      PathPoint P5: ulna (-0.0219 0.01046 -0.00078)
      PathWrap: wrap_object=TRI
    Schutte1993Muscle TRImed: max_isometric_force=624.3 optimal_fiber_length=0.1138 tendon_slack_length=0.0908
        pennation_angle_at_optimal=0.1570796
      PathPoint P1: humerus (-0.00838 -0.13695 -0.00906)
      PathPoint P2: humerus (-0.02601 -0.15139 -0.0108)
      PathPoint P3: humerus (-0.03184 -0.22637 -0.01217)
      PathPoint P4: humerus (-0.01743 -0.26757 -0.01208)
      PathPoint P5: ulna (-0.0219 0.01046 -0.00078)
      PathWrap: wrap_object=TRI
    Schutte1993Muscle ANC: max_isometric_force=350 optimal_fiber_length=0.027 tendon_slack_length=0.018
        pennation_angle_at_optimal=0
      PathPoint P1: humerus (-0.00744 -0.28359 0.00979)
      PathPoint P2: ulna (-0.02532 -0.00124 0.006)
      PathWrap: wrap_object=ANC method=hybrid
    Schutte1993Muscle SUP: max_isometric_force=476 optimal_fiber_length=0.033 tendon_slack_length=0.028
        pennation_angle_at_optimal=0
      PathPoint P1: radius (0.00996 -0.06096 0.00075)
      PathPoint P2: radius (0.01201 -0.0517 -0.00107)
      PathPoint P3: ulna (-0.0136 -0.03384 0.02013)
      PathWrap: wrap_object=SUP
    Schutte1993Muscle BIClong: max_isometric_force=624.3 optimal_fiber_length=0.1157 tendon_slack_length=0.2723
        pennation_angle_at_optimal=0
      PathPoint P1: scapula (-0.03123 -0.02353 -0.01305)
      PathPoint P2: scapula (-0.02094 -0.01309 -0.00461)
      PathPoint P3: humerus (0.02131 0.01793 0.01028)
      PathPoint P4: humerus (0.02378 -0.00511 0.01201)
      PathPoint P5: humerus (0.01345 -0.02827 0.00136)
      PathPoint P6: humerus (0.01068 -0.07736 -0.00165)
      PathPoint P7: humerus (0.01703 -0.12125 0.00024)
      PathPoint P8: humerus (0.0228 -0.1754 -0.0063)
      PathPoint P9: bicpt2 (0 0 0)
      ConditionalPathPoint P10: bicpt (0 0 0) coordinate=pro_sup range=(-0.6387905 1.570796)
      PathPoint P11: radius (-0.002 -0.0375 -0.002)
      PathWrap: wrap_object=Elbow_BIC_BRD method=hybrid
      PathWrap: wrap_object=BIClong method=hybrid range=(2 3)
    Schutte1993Muscle BICshort: max_isometric_force=435.56 optimal_fiber_length=0.1321 tendon_slack_length=0.1923
        pennation_angle_at_optimal=0
      PathPoint P1: scapula (0.01268 -0.03931 -0.02625)
      PathPoint P2: scapula (0.00093 -0.06704 -0.01593)
      PathPoint P3: humerus (0.01117 -0.07576 -0.01101)
      PathPoint P4: humerus (0.01703 -0.12125 -0.01079)
      PathPoint P5: humerus (0.0228 -0.1754 -0.0063)
      PathPoint P6: bicpt2 (0 0 0)
      ConditionalPathPoint P7: bicpt (0 0 0) coordinate=pro_sup range=(-0.6387905 1.570796)
      PathPoint P8: radius (-0.002 -0.0375 -0.002)
      PathWrap: wrap_object=Elbow_BIC_BRD method=hybrid
    Schutte1993Muscle BRA: max_isometric_force=987.26 optimal_fiber_length=0.0858 tendon_slack_length=0.0535
        pennation_angle_at_optimal=0
      PathPoint P1: humerus (0.0068 -0.1739 -0.0036)
      ConditionalPathPoint P2: humerus (0.01894 -0.28559 -0.01105) coordinate=elbow_flexion range=(0 0.8131489)
      ConditionalPathPoint P3: ulna (0.00498 -0.01463 0.00128) coordinate=elbow_flexion range=(0 0.8131489)
      PathPoint P4: ulna (-0.0032 -0.0239 0.0009)
    Schutte1993Muscle BRD: max_isometric_force=261.33 optimal_fiber_length=0.1726 tendon_slack_length=0.133
        pennation_angle_at_optimal=0
      PathPoint P1: humerus (-0.0098 -0.19963 0.00223)
      PathPoint P2: radius (0.03577 -0.12742 0.02315)
      PathPoint P3: radius (0.0419 -0.221 0.0224)
      PathWrap: wrap_object=Elbow_BIC_BRD method=hybrid
    Schutte1993Muscle ECRL: max_isometric_force=304.89 optimal_fiber_length=0.081 tendon_slack_length=0.224
        pennation_angle_at_optimal=0
      PathPoint P1: humerus (-0.0073 -0.2609 0.0091)
      PathPoint P2: radius (0.03195 -0.13463 0.02779)
      PathPoint P3: radius (0.04243 -0.23684 0.0362)
      PathPoint P4: secondmc (0.00249 0.0164 0.0008)
      PathWrap: wrap_object=Elbow_PT_ECRL method=hybrid
      PathWrap: wrap_object=ECRL
    Schutte1993Muscle ECRB: max_isometric_force=100.52 optimal_fiber_length=0.0585 tendon_slack_length=0.2223
        pennation_angle_at_optimal=0.1553343
      PathPoint P1: humerus (0.01349 -0.29048 0.01698)
      PathPoint P2: radius (0.02905 -0.13086 0.02385)
      PathPoint P3: radius (0.03549 -0.22805 0.03937)
      PathPoint P4: thirdmc (0.00452 0.02788 0.00112)
      PathWrap: wrap_object=ECRB
    Schutte1993Muscle ECU: max_isometric_force=93.17 optimal_fiber_length=0.0622 tendon_slack_length=0.2285
        pennation_angle_at_optimal=0.06108652
      PathPoint P1: humerus (0.00083 -0.28955 0.0188)
      PathPoint P2: ulna (-0.01391 -0.03201 0.02947)
      PathPoint P3: ulna (-0.01705 -0.05428 0.02868)
      PathPoint P4: ulna (-0.01793 -0.09573 0.03278)
      PathPoint P5: radius (-0.01421 -0.22696 0.03481)
      PathPoint P6: fifthmc (-0.00061 0.02067 0.00294)
      PathWrap: wrap_object=ECU
    Schutte1993Muscle FCR: max_isometric_force=73.96 optimal_fiber_length=0.0628 tendon_slack_length=0.244
        pennation_angle_at_optimal=0.05410521
      PathPoint P1: humerus (0.00758 -0.27806 -0.03705)
      PathPoint P2: radius (0.0211 -0.21943 0.00127)
      PathPoint P3: secondmc (-0.00345 0.01918 -0.00921)
      PathWrap: wrap_object=Elbow_PT_ECRL method=hybrid
      PathWrap: wrap_object=FCR
    Schutte1993Muscle FCU: max_isometric_force=128.93 optimal_fiber_length=0.0509 tendon_slack_length=0.265
        pennation_angle_at_optimal=0.2111848
      PathPoint P1: humerus (0.00219 -0.2774 -0.0388)
      PathPoint P2: FCUpt (0.00549 0 0)
      PathPoint P3: radius (0.01082 -0.22327 0.00969)
      PathPoint P4: fifthmc (0.00154 0.01703 -0.0033)
      PathWrap: wrap_object=FCU
      PathWrap: wrap_object=Elbow_PT_ECRL method=hybrid
    Schutte1993Muscle PL: max_isometric_force=26.72 optimal_fiber_length=0.0638 tendon_slack_length=0.2694
        pennation_angle_at_optimal=0.06981317
      PathPoint P1: humerus (0.00457 -0.27519 -0.03865)
      PathPoint P2: radius (0.02531 -0.23915 -0.00276)
      PathPoint P3: capitate (0.00917 -0.01898 -0.01754)
      PathPoint P4: thirdmc (0.00179 0.00828 -0.00245)
      PathWrap: wrap_object=PL method=hybrid
      PathWrap: wrap_object=Elbow_PT_ECRL method=hybrid
    Schutte1993Muscle PT: max_isometric_force=566.22 optimal_fiber_length=0.0492 tendon_slack_length=0.098
        pennation_angle_at_optimal=0.1745329
      PathPoint P1: humerus (0.0036 -0.2759 -0.0365)
      PathPoint P2: ulna (0.00846 -0.03373 -0.01432)
      PathPoint P3: ptpt (0.00464 -0.00026 -0.00214)
      ConditionalPathPoint P4: radius (0.0236 -0.0934 0.0094) coordinate=pro_sup range=(-1.570796 0.5096361)
      PathPoint P5: radius (0.0254 -0.1088 0.0198)
      PathWrap: wrap_object=Elbow_PT_ECRL method=hybrid
    Schutte1993Muscle PQ: max_isometric_force=75.48 optimal_fiber_length=0.0282 tendon_slack_length=0.005
        pennation_angle_at_optimal=0.1745329
      PathPoint P1: radius (0.03245 -0.19998 0.01962)
      PathPoint P2: ulna (0.00193 -0.20972 0.03632)
      PathWrap: wrap_object=PQ2
      PathWrap: wrap_object=PQ1
    Thelen2003Muscle FDS5: max_isometric_force=16.55 optimal_fiber_length=0.0515 tendon_slack_length=0.3383
        pennation_angle_at_optimal=0.08726646
      PathPoint P1: humerus (0.00421 -0.27598 -0.03864)
      PathPoint P2: radius (0.01377 -0.18718 0.00205)
      PathPoint P3: capitate (-0.00235 -0.01393 -0.01376)
      PathPoint P4: fourthmc (-0.00294 0.00846 -0.01213)
      PathPoint P5: fifthmc (-0.00010445 -0.01308 -0.00952)
      PathPoint P6: proxph5 (-0.00167 -0.01493 -0.00712)
      PathPoint P7: proxph5 (-0.00251 -0.02587 -0.00541)
      PathPoint P8: midph5 (0.00211 -0.0055 -0.00696)
      PathWrap: wrap_object=FDS method=hybrid
      PathWrap: wrap_object=Elbow_PT_ECRL method=hybrid
      PathWrap: wrap_object=5thmcp method=hybrid
    Thelen2003Muscle FDS4: max_isometric_force=57.9 optimal_fiber_length=0.0736 tendon_slack_length=0.328
        pennation_angle_at_optimal=0.06981317
      PathPoint P1: humerus (0.00479 -0.2788 -0.03731)
      PathPoint P2: radius (0.01571 -0.18666 0.00267)
      PathPoint P3: capitate (-0.00082 -0.01344 -0.01359)
      PathPoint P4: thirdmc (-0.00914 0.00544 -0.01085)
      PathPoint P5: fourthmc (0.00201753 -0.01382907 -0.0060227)
      PathPoint P6: proxph4 (0.00007753 -0.01267907 -0.0074727)
      PathPoint P7: proxph4 (0.00055796 -0.03610108 -0.00098871)
      PathPoint P8: midph4 (0.00003796 -0.01194108 -0.00176871)
      PathWrap: wrap_object=FDS method=hybrid
      PathWrap: wrap_object=Elbow_PT_ECRL method=hybrid
      PathWrap: wrap_object=4thmcp method=hybrid
    Thelen2003Muscle FDS3: max_isometric_force=91.03 optimal_fiber_length=0.0749 tendon_slack_length=0.295
        pennation_angle_at_optimal=0.1221731
      PathPoint P1: ulna (-0.00669 -0.02713 -0.00191)
      PathPoint P2: radius (0.01899 -0.18706 0.00424)
      PathPoint P3: capitate (0.0068 -0.01377 -0.01399)
      PathPoint P4: thirdmc (0.00128 0.00639 -0.00952)
      PathPoint P5: thirdmc (0.00224 -0.01087 -0.01345)
      PathPoint P6: proxph3 (0.00244 -0.01919 -0.00801)
      PathPoint P7: proxph3 (0.00454 -0.0376 -0.00213)
      PathPoint P8: midph3 (0.00023 -0.01075 -0.00541)
      PathWrap: wrap_object=FDS method=hybrid
      PathWrap: wrap_object=3rdmcp method=hybrid
    Thelen2003Muscle FDS2: max_isometric_force=61.24 optimal_fiber_length=0.0835 tendon_slack_length=0.275
        pennation_angle_at_optimal=0.1047198
      PathPoint P1: ulna (-0.00676 -0.02819 -0.00137)
      PathPoint P2: radius (0.02145 -0.18623 0.00552)
      PathPoint P3: capitate (0.00889 -0.01366 -0.01387)
      PathPoint P4: secondmc (-0.00407 -0.00025 -0.00479)
      PathPoint P5: secondmc (0.00486 -0.01377 -0.00066)
      PathPoint P6: proxph2 (0.00132 -0.00841 -0.01201)
      PathPoint P7: proxph2 (0.00635 -0.03433 0.00061)
      PathPoint P8: midph2 (-0.00024 -0.00881 -0.00408)
      PathWrap: wrap_object=FDS method=hybrid
      PathWrap: wrap_object=2ndmcp method=hybrid
    Thelen2003Muscle FDP5: max_isometric_force=79.65 optimal_fiber_length=0.0749 tendon_slack_length=0.2819
        pennation_angle_at_optimal=0.1396263
      PathPoint P1: ulna (-0.00628 -0.03214 0.00254)
      PathPoint P2: radius (0.01409 -0.18516 0.00861)
      PathPoint P3: capitate (-0.00088 -0.01027 -0.01188)
      PathPoint P4: fourthmc (-0.00686 0.0089 -0.00619)
      PathPoint P5: fifthmc (0.00095 -0.01305 -0.0087)
      PathPoint P6: proxph5 (-0.00095 -0.01366 -0.00512)
      PathPoint P7: proxph5 (-0.00046 -0.02914 -0.00805)
      PathPoint P8: midph5 (0.00087 -0.00831 -0.00769)
      PathPoint P9: midph5 (-0.00101 -0.01601 -0.00487)
      PathPoint P10: distph5 (0.00019 -0.01135 -0.00475)
      PathWrap: wrap_object=FDP method=hybrid
      PathWrap: wrap_object=5thmcp method=hybrid
    Thelen2003Muscle FDP4: max_isometric_force=64.08 optimal_fiber_length=0.0798 tendon_slack_length=0.282
        pennation_angle_at_optimal=0.1221731
      PathPoint P1: ulna (-0.00502 -0.03374 0.00273)
      PathPoint P2: radius (0.0158 -0.18629 0.00803)
      PathPoint P3: capitate (0.00106 -0.01177 -0.01184)
      PathPoint P4: thirdmc (-0.0104 0.00473 -0.00804)
      PathPoint P5: fourthmc (-0.00062 -0.01364 -0.00629)
      PathPoint P6: proxph4 (-0.00122 -0.01197 -0.0088)
      PathPoint P7: proxph4 (-0.00344 -0.03324 -0.00192)
      PathPoint P8: midph4 (0.00232 -0.00712 -0.006)
      PathPoint P9: midph4 (-0.0007 -0.0197 -0.00131)
      PathPoint P10: distph4 (0.00033 -0.00404 -0.00305)
      PathWrap: wrap_object=FDP method=hybrid
      PathWrap: wrap_object=4thmcp method=hybrid
    Thelen2003Muscle FDP3: max_isometric_force=81.65 optimal_fiber_length=0.0835 tendon_slack_length=0.293
        pennation_angle_at_optimal=0.1047198
      PathPoint P1: ulna (-0.00522 -0.03327 0.0021)
      PathPoint P2: radius (0.01906 -0.18644 0.00785)
      PathPoint P3: capitate (0.00335 -0.0128 -0.01144)
      PathPoint P4: thirdmc (-0.00128 0.00609 -0.00838)
      PathPoint P5: thirdmc (0.00186 -0.01509 -0.00677)
      PathPoint P6: proxph3 (0.00069 -0.01583 -0.0081)
      PathPoint P7: proxph3 (0.00238 -0.03643 -0.00054)
      PathPoint P8: midph3 (0.00158 -0.01149 -0.00512)
      PathPoint P9: midph3 (0.00213 -0.02144 -0.00213)
      PathPoint P10: distph3 (0.00006 -0.00501 -0.00419)
      PathWrap: wrap_object=FDP method=hybrid
      PathWrap: wrap_object=3rdmcp method=hybrid
    Thelen2003Muscle FDP2: max_isometric_force=68.27 optimal_fiber_length=0.0749 tendon_slack_length=0.2935
        pennation_angle_at_optimal=0.1221731
      PathPoint P1: ulna (-0.00647 -0.03176 0.0028)
      PathPoint P2: radius (0.0208 -0.1856 0.00915)
      PathPoint P3: capitate (0.00896 -0.01168 -0.01212)
      PathPoint P4: secondmc (-0.00432 0.00663 -0.00248)
      PathPoint P5: secondmc (0.00411 -0.016 -0.00421)
      PathPoint P6: proxph2 (0.00334 -0.02024 -0.00503)
      PathPoint P7: proxph2 (0.00633 -0.03433 -0.00061)
      PathPoint P7: midph2 (0.00061 -0.00881 -0.00584)
      PathPoint P9: midph2 (0.00432 -0.01962 -0.00352)
      PathPoint P9: distph2 (-0.0007 -0.00562 -0.00399)
      PathWrap: wrap_object=FDP method=hybrid
      PathWrap: wrap_object=2ndmcp method=hybrid
    Thelen2003Muscle EDC5: max_isometric_force=13.11 optimal_fiber_length=0.065 tendon_slack_length=0.2965
        pennation_angle_at_optimal=0.03490659
      PathPoint P1: humerus (-0.0004 -0.28831 0.0187)
      PathPoint P2: EDCpt (0.0013 -0.03888 0.01405)
      PathPoint P3: radius (0.00993 -0.22304 0.03618)
      PathPoint P4: fifthmc (-0.00126 -0.01818 0.00566)
      PathPoint P5: proxph5 (-0.00452 -0.01231 0.00629)
      PathPoint P6: proxph5 (-0.00794 -0.03224 0.00251)
      PathPoint P7: midph5 (-0.00268 -0.00736 0.00466)
      PathPoint P8: midph5 (-0.0052 -0.02 0.00642)
      PathPoint P9: distph5 (-0.00148 -0.01395 0.0047)
      PathWrap: wrap_object=EDCL range=(3 4)
      PathWrap: wrap_object=Fifthpm range=(6 7)
      PathWrap: wrap_object=Fifthmd range=(8 9)
    Thelen2003Muscle EDC4: max_isometric_force=34.04 optimal_fiber_length=0.0626 tendon_slack_length=0.327
        pennation_angle_at_optimal=0.05235988
      PathPoint P1: humerus (-0.00156 -0.28936 0.01782)
      PathPoint P2: EDCpt (0.0026 -0.03991 0.01552)
      PathPoint P3: radius (0.00882 -0.22366 0.04284)
      PathPoint P4: fourthmc (-0.00042 -0.02069 0.00947)
      PathPoint P5: proxph4 (-0.00199 -0.00836 0.00876)
      PathPoint P6: proxph4 (-0.00385 -0.038 0.00484)
      PathPoint P7: midph4 (-0.00194 -0.00582 0.00882)
      PathPoint P8: midph4 (-0.00049 -0.02394 0.00356)
      PathPoint P9: distph4 (-0.00039 -0.002722 0.00358)
      PathWrap: wrap_object=EDCR
      PathWrap: wrap_object=Fourthpm range=(6 7)
      PathWrap: wrap_object=Fourthmd range=(8 9)
    Thelen2003Muscle EDC3: max_isometric_force=35.32 optimal_fiber_length=0.0724 tendon_slack_length=0.335
        pennation_angle_at_optimal=0.05235988
      PathPoint P1: humerus (0.00051 -0.28984 0.01949)
      PathPoint P2: EDCpt (0.00316 -0.03948 0.01528)
      PathPoint P3: radius (0.0144 -0.22323 0.04223)
      PathPoint P4: thirdmc (-0.00069 -0.02629 0.01004)
      PathPoint P5: proxph3 (-0.00118 -0.01222 0.01074)
      PathPoint P6: proxph3 (0.00169 -0.04139 0.01127)
      PathPoint P7: midph3 (0.00039 -0.00423 0.00625)
      PathPoint P8: midph3 (0.00109 -0.02905 0.00507)
      PathPoint P9: distph3 (-0.00058 -0.00694 0.00308)
      PathWrap: wrap_object=EDCM
      PathWrap: wrap_object=Thirdpm range=(6 7)
      PathWrap: wrap_object=Thirdmd range=(8 9)
    Thelen2003Muscle EDC2: max_isometric_force=18.26 optimal_fiber_length=0.07 tendon_slack_length=0.322
        pennation_angle_at_optimal=0.05235988
      PathPoint P1: humerus (0.00065 -0.28898 0.01869)
      PathPoint P2: EDCpt (0.00228 -0.03918 0.01483)
      PathPoint P3: radius (0.01533 -0.22314 0.04196)
      PathPoint P4: secondmc (0.00305 -0.02951 0.01243)
      PathPoint P5: proxph2 (-0.00033 -0.00711 0.01164)
      PathPoint P6: proxph2 (0.00688 -0.03872 0.01095)
      PathPoint P7: midph2 (0.00186 -0.0001 0.00741)
      PathPoint P8: midph2 (0.00283 -0.02489 0.00482)
      PathPoint P9: distph2 (-0.00048 -0.00562 0.00345)
      PathWrap: wrap_object=EDCI range=(3 4)
      PathWrap: wrap_object=Secondpm range=(6 7)
      PathWrap: wrap_object=Secondmd range=(8 9)
    Thelen2003Muscle EDM: max_isometric_force=25.25 optimal_fiber_length=0.0675 tendon_slack_length=0.322
        pennation_angle_at_optimal=0.05235988
      PathPoint P1: humerus (0.00089 -0.28919 0.01847)
      PathPoint P2: ulna (-0.00977 -0.03907 0.03085)
      PathPoint P3: ulna (-0.00755 -0.08267 0.03646)
      PathPoint P4: radius (0.00454 -0.22641 0.03678)
      PathPoint P5: fifthmc (0.00131 0.02436 0.00794)
      PathPoint P6: fifthmc (-0.00537 -0.01848 0.00316)
      PathPoint P7: proxph5 (-0.0054 -0.03237 0.00015)
      PathPoint P8: distph5 (-0.00226 -0.00334 0.00062)
      PathWrap: wrap_object=EDM method=hybrid range=(4 5)
    Thelen2003Muscle EIP: max_isometric_force=21.7 optimal_fiber_length=0.0589 tendon_slack_length=0.186
        pennation_angle_at_optimal=0.1047198
      PathPoint P1: ulna (-0.00394 -0.16652 0.03682)
      PathPoint P2: ulna (0.00171 -0.17469 0.04049)
      PathPoint P3: radius (0.01076 -0.22783 0.03664)
      PathPoint P4: secondmc (-0.01081 0.01528 0.00681)
      PathPoint P5: secondmc (0.00441 -0.02602 0.01285)
      PathPoint P6: proxph2 (0.00171 -0.01033 0.00947)
      PathPoint P7: proxph2 (0.00714 -0.04133 0.01413)
      PathPoint P8: midph2 (0.00115 -0.00899 0.00597)
      PathPoint P9: midph2 (0.00294 -0.02043 0.00377)
      PathPoint P10: distph2 (0.00264 -0.01233 0.00266)
      PathWrap: wrap_object=Extensor_ellipse method=hybrid
      PathWrap: wrap_object=Secondpm range=(7 8)
      PathWrap: wrap_object=Secondmd range=(9 10)
    Thelen2003Muscle EPL: max_isometric_force=39.46 optimal_fiber_length=0.054 tendon_slack_length=0.2205
        pennation_angle_at_optimal=0.1047198
      PathPoint P1: ulna (-0.01412 -0.09706 0.02952)
      PathPoint P2: radius (0.00124 -0.13668 0.0227)
      PathPoint P3: radius (0.02702 -0.21872 0.03828)
      PathPoint P4: radius (0.03382 -0.22754 0.04607)
      PathPoint P5: radius (0.04234 -0.23771 0.04173)
      PathPoint P6: capitate (0.02428 0.00014 0.00608)
      PathPoint P7: trapezium (0.00809 -0.0046 0.00992)
      PathPoint P8: firstmc (0.00656 -0.0043 0.00792)
      PathPoint P9: firstmc (0.02165 -0.0242 -0.00533)
      PathPoint P10: proximal_thumb (0.01147 -0.00362 0.00156)
      PathPoint P11: proximal_thumb (0.01921 -0.0265 -0.01038)
      PathPoint P12: distal_thumb (0.00543 -0.00714 -0.00464)
      PathWrap: wrap_object=MPthumb
    Schutte1993Muscle EPB: max_isometric_force=14.2 optimal_fiber_length=0.0675 tendon_slack_length=0.1155
        pennation_angle_at_optimal=0.1256637
      PathPoint P1: radius (0.01924 -0.14695 0.02114)
      PathPoint P2: radius (0.02276 -0.15857 0.02665)
      PathPoint P3: radius (0.03831 -0.19722 0.03834)
      PathPoint P4: radius (0.05235 -0.23611 0.02699)
      PathPoint P5: capitate (0.03123 0.00256 -0.00327)
      PathPoint P6: firstmc1 (0.01443 -0.00337 -0.00405)
      PathPoint P7: firstmc (0.02173 -0.02303 -0.01141)
      PathPoint P8: proximal_thumb (0.00927 -0.00618 -0.00557)
      PathWrap: wrap_object=MPthumb
    Schutte1993Muscle FPL: max_isometric_force=77.2 optimal_fiber_length=0.0552 tendon_slack_length=0.1938
        pennation_angle_at_optimal=0.1221731
      PathPoint P1: radius (0.00971 -0.09458 0.01769)
      PathPoint P2: radius (0.01658 -0.13525 0.01915)
      PathPoint P3: radius (0.01869 -0.17932 0.01988)
      PathPoint P4: radius (0.038 -0.23171 0.0158)
      PathPoint P5: FPLpt (0.01869 0.00882 -0.01547)
      PathPoint P6: FPLpt2 (0.01244 -0.02207 -0.02089)
      PathPoint P7: firstmc (-0.00608 -0.01624 -0.0094)
      PathPoint P8: firstmc (0.00208 -0.02297 -0.00956)
      PathPoint P9: proximal_thumb (-0.0045 -0.01842 -0.00508)
      PathPoint P10: proximal_thumb (0.0059 -0.02602 -0.01114)
      PathPoint P11: distal_thumb (0.00242 -0.01127 -0.00412)
      PathWrap: wrap_object=FPL method=hybrid
      PathWrap: wrap_object=IPthumb
      PathWrap: wrap_object=MPthumb
    Schutte1993Muscle APL: max_isometric_force=59.53 optimal_fiber_length=0.0713 tendon_slack_length=0.1295
        pennation_angle_at_optimal=0.1308997
      PathPoint P1: radius (0.01154 -0.09477 0.01681)
      PathPoint P2: radius (0.0303 -0.1397 0.03507)
      PathPoint P3: radius (0.03993 -0.16072 0.034)
      PathPoint P4: radius (0.04397 -0.17845 0.03134)
      PathPoint P5: radius (0.05505 -0.23084 0.02368)
      PathPoint P6: APLpt (0.03385 0.00634 -0.00745)
      PathPoint P7: firstmc1 (0.01058 0.00662 -0.00619)
      PathPoint P8: firstmc (0.00629 0.00323 -0.00589)
      PathPoint P9: firstmc (0.00827 -0.00586 -0.00604)
      PathWrap: wrap_object=APL range=(5 6)
    Thelen2003Muscle RI2: max_isometric_force=61.24 optimal_fiber_length=0.0835 tendon_slack_length=0.275
        pennation_angle_at_optimal=0.1047198
      PathPoint P1: secondmc (-0.00407 -0.00025 -0.00479)
      PathPoint P2: secondmc (0.00907 -0.01995 -0.00488)
      PathPoint P3: proxph2 (0.00704 -0.00672 -0.00015)
      PathWrap: wrap_object=FDS method=hybrid
      PathWrap: wrap_object=2ndmcp method=hybrid
    Thelen2003Muscle LU_RB2: max_isometric_force=61.24 optimal_fiber_length=0.0835 tendon_slack_length=0.275
        pennation_angle_at_optimal=0.1047198
      PathPoint P1: secondmc (-0.00407 -0.00025 -0.00479)
      PathPoint P2: secondmc (0.01017 -0.02647 -0.00001)
      PathPoint P3: proxph2 (0.00838 -0.00829 -0.000043)
      PathPoint P4: proxph2 (0.0113 -0.03393 0.00935)
      PathPoint P5: midph2 (0.0058 -0.00686 0.00879)
      PathPoint P6: midph2 (0.00387449 -0.02019714 0.0129)
      PathWrap: wrap_object=FDS method=hybrid
      PathWrap: wrap_object=2ndmcp method=hybrid
      PathWrap: wrap_object=Secondpm range=(4 5)
    Thelen2003Muscle UI_UB2: max_isometric_force=61.24 optimal_fiber_length=0.0835 tendon_slack_length=0.275
        pennation_angle_at_optimal=0.1047198
      PathPoint P1: secondmc (-0.00407 -0.00025 -0.00479)
      PathPoint P2: secondmc (-0.00332 -0.02939 -0.00012)
      PathPoint P3: proxph2 (-0.00431 -0.01593 0.00241)
      PathPoint P4: proxph2 (0.001 -0.03944 0.01114)
      PathPoint P5: midph2 (-0.00408 -0.00655 0.00375)
      PathPoint P6: midph2 (0.00224292 -0.02060299 0.00521576)
      PathWrap: wrap_object=FDS method=hybrid
      PathWrap: wrap_object=2ndmcp method=hybrid
      PathWrap: wrap_object=Secondpm range=(4 5)
    Thelen2003Muscle RI3: max_isometric_force=61.24 optimal_fiber_length=0.0835 tendon_slack_length=0.275
        pennation_angle_at_optimal=0.1047198
      PathPoint P1: thirdmc (0.00128 0.00639 -0.00952)
      PathPoint P2: thirdmc (0.00991 -0.024 -0.00496)
      PathPoint P3: proxph3 (0.0077 -0.01991 0.00053)
      PathWrap: wrap_object=FDS method=hybrid
      PathWrap: wrap_object=3rdmcp method=hybrid
    Thelen2003Muscle LU_RB3: max_isometric_force=61.24 optimal_fiber_length=0.0835 tendon_slack_length=0.275
        pennation_angle_at_optimal=0.1047198
      PathPoint P1: thirdmc (0.00128 0.00639 -0.00952)
      PathPoint P2: thirdmc (0.01025 -0.02317 -0.00083)
      PathPoint P3: proxph3 (0.00684 -0.02196 0.00726)
      PathPoint P4: proxph3 (0.00579 -0.04469 0.00756)
      PathPoint P5: midph3 (0.00492 -0.01161 0.00354)
      PathPoint P6: midph3 (0.00143795 -0.02546435 0.00385209)
      PathWrap: wrap_object=FDS method=hybrid
      PathWrap: wrap_object=3rdmcp method=hybrid
      PathWrap: wrap_object=Thirdpm range=(4 5)
    Thelen2003Muscle UI_UB3: max_isometric_force=61.24 optimal_fiber_length=0.0835 tendon_slack_length=0.275
        pennation_angle_at_optimal=0.1047198
      PathPoint P1: thirdmc (0.00128 0.00639 -0.00952)
      PathPoint P2: thirdmc (-0.00311 -0.02484 -0.00345)
      PathPoint P3: proxph3 (-0.00119 -0.01829 -0.00933)
      PathPoint P4: proxph3 (-0.00426 -0.04283 0.00694)
      PathPoint P5: midph3 (-0.00536 -0.00774 0.00597)
      PathPoint P6: midph3 (-0.00066534 -0.0259696 0.00634982)
      PathWrap: wrap_object=FDS method=hybrid
      PathWrap: wrap_object=3rdmcp method=hybrid
      PathWrap: wrap_object=Thirdpm range=(4 5)
    Thelen2003Muscle RI4: max_isometric_force=61.24 optimal_fiber_length=0.0835 tendon_slack_length=0.275
        pennation_angle_at_optimal=0.1047198
      PathPoint P1: thirdmc (-0.00914 0.00544 -0.01085)
      PathPoint P2: fourthmc (0.00163 -0.0179 -0.00978)
      PathPoint P3: proxph4 (0.00987 -0.01629 0.00053)
    Thelen2003Muscle LU_RB4: max_isometric_force=61.24 optimal_fiber_length=0.0835 tendon_slack_length=0.275
        pennation_angle_at_optimal=0.1047198
      PathPoint P1: thirdmc (-0.00914 0.00544 -0.01085)
      PathPoint P2: fourthmc (0.00317 -0.02242 -0.00081)
      PathPoint P3: proxph4 (0.00017 -0.0146 0.00062)
      PathPoint P4: proxph4 (0.00128 -0.04033 0.0041)
      PathPoint P5: midph4 (0.00427 -0.00451 0.0043)
      PathPoint P6: midph4 (-0.00038138 -0.02022258 0.00506077)
      PathWrap: wrap_object=FDS method=hybrid
      PathWrap: wrap_object=4thmcp method=hybrid
      PathWrap: wrap_object=Fourthpm range=(4 5)
    Thelen2003Muscle UI_UB4: max_isometric_force=61.24 optimal_fiber_length=0.0835 tendon_slack_length=0.275
        pennation_angle_at_optimal=0.1047198
      PathPoint P1: thirdmc (-0.00914 0.00544 -0.01085)
      PathPoint P2: fourthmc (-0.00485 -0.02409 -0.00439)
      PathPoint P3: proxph4 (-0.00415 -0.02118 -0.00552)
      PathPoint P4: proxph4 (-0.00887482 -0.03884243 0.00183437)
      PathPoint P5: midph4 (-0.00575762 -0.00400623 0.00339217)
      PathPoint P6: midph4 (-0.00365292 -0.01995152 0.00802523)
      PathWrap: wrap_object=FDS method=hybrid
      PathWrap: wrap_object=4thmcp method=hybrid
      PathWrap: wrap_object=Fourthpm range=(4 5)
    Thelen2003Muscle RI5: max_isometric_force=61.24 optimal_fiber_length=0.0835 tendon_slack_length=0.275
        pennation_angle_at_optimal=0.1047198
      PathPoint P1: thirdmc (-0.00914 0.00544 -0.01085)
      PathPoint P2: fifthmc (0.00611 -0.01487 -0.0066)
      PathPoint P3: proxph5 (0.00472 -0.01434 0.00233)
      PathWrap: wrap_object=FDS method=hybrid
    Thelen2003Muscle LU_RB5: max_isometric_force=61.24 optimal_fiber_length=0.0835 tendon_slack_length=0.275
        pennation_angle_at_optimal=0.1047198
      PathPoint P1: thirdmc (-0.00914 0.02544 -0.01085)
      PathPoint P2: fifthmc (0.00606 -0.01991 -0.00017)
      PathPoint P3: proxph5 (0.00351 -0.01313 0.00196)
      PathPoint P4: proxph5 (-0.00316 -0.0372 0.00314)
      PathPoint P5: midph5 (0.00139 -0.00741 0.00274)
      PathPoint P6: midph5 (-0.00150371 -0.01822967 0.00233624)
      PathWrap: wrap_object=FDS method=hybrid
      PathWrap: wrap_object=5thmcp method=hybrid
      PathWrap: wrap_object=Fifthpm range=(4 5)
    Thelen2003Muscle UI_UB5: max_isometric_force=61.24 optimal_fiber_length=0.0835 tendon_slack_length=0.275
        pennation_angle_at_optimal=0.1047198
      PathPoint P1: thirdmc (-0.02014 0.02544 -0.01585)
      PathPoint P2: fifthmc (-0.00513 -0.01967 -0.00763)
      PathPoint P3: proxph5 (-0.00307 -0.01771 -0.00793)
      PathPoint P4: proxph5 (-0.01071 -0.03588 -0.00316)
      PathPoint P5: midph5 (-0.00389 -0.00757 -0.00323)
      PathPoint P6: midph5 (-0.00295597 -0.0172352 0.00088184)
      PathWrap: wrap_object=FDS method=hybrid
      PathWrap: wrap_object=5thmcp method=hybrid
      PathWrap: wrap_object=Fifthpm range=(4 5)
  BodySet:
    Body ground: mass=0 mass_center=(0 0 0) inertia_xx=0 inertia_yy=0 inertia_zz=0
    Body thorax: mass=0 mass_center=(0 0 0) inertia_xx=0 inertia_yy=0 inertia_zz=0 meshes=thorax.vtp
      WeldJoint ground_thorax: parent_body=ground location_in_parent=(0 0 0) location=(0 0 0)
      WrapEllipsoid Thorax: dimensions=(0.1 0.135 0.08) xyz_body_rotation=(0.0434587 -0.3319616 0.1898918)
          translation=(-0.0386 -0.1273 0.0709)
    Body clavicle: mass=0 mass_center=(0 0 0) inertia_xx=0 inertia_yy=0 inertia_zz=0 meshes=clavicle.vtp
      CustomJoint sternoclavicular: parent_body=thorax location_in_parent=(0.006325 0.00693 0.025465) location=(0 0 0)
        Coordinate sternoclavicular_r2: default_value=0 initial_value=0 range=(-99999.9 99999.9) clamped=false
        Coordinate sternoclavicular_r3: default_value=0 initial_value=0 range=(-99999.9 99999.9) clamped=false
        SpatialTransform: axes_held_at_zero=(rotation3 translation1 translation2 translation3)
          TransformAxis rotation1: axis=(0.0153 0.9892987 -0.1451) coordinates=sternoclavicular_r2
          TransformAxis rotation2: axis=(-0.9944725 0 -0.104997) coordinates=sternoclavicular_r3
    Body clavphant: mass=0 mass_center=(0 0 0) inertia_xx=0 inertia_yy=0 inertia_zz=0
      CustomJoint unrotscap: parent_body=clavicle location_in_parent=(-0.01433 0.02007 0.135535) location=(0 0 0)
        Coordinate unrotscap_r3: default_value=0 initial_value=0 range=(-99999.9 99999.9) clamped=false
        Coordinate unrotscap_r2: default_value=0 initial_value=0 range=(-99999.9 99999.9) clamped=false
        SpatialTransform: axes_held_at_zero=(rotation3 translation1 translation2 translation3)
          TransformAxis rotation1: axis=(-0.9944725 0 -0.104997) coordinates=unrotscap_r3
          TransformAxis rotation2: axis=(0.0153 0.9892987 -0.1451) coordinates=unrotscap_r2
    Body scapula: mass=0 mass_center=(0 0 0) inertia_xx=0 inertia_yy=0 inertia_zz=0 meshes=scapula.vtp
      CustomJoint acromioclavicular: parent_body=clavphant location_in_parent=(0 0 0) location=(0 0 0)
        Coordinate acromioclavicular_r2: default_value=0 initial_value=0 range=(-99999.9 99999.9) clamped=false
        Coordinate acromioclavicular_r3: default_value=0 initial_value=0 range=(-99999.9 99999.9) clamped=false
        Coordinate acromioclavicular_r1: default_value=0 initial_value=0 range=(-99999.9 99999.9) clamped=false
        SpatialTransform: axes_held_at_zero=(translation1 translation2 translation3)
          TransformAxis rotation1: axis=(0.1570949 0.9472686 -0.2792909) coordinates=acromioclavicular_r2
          TransformAxis rotation2: axis=(-0.754084 0.297594 0.585487) coordinates=acromioclavicular_r3
          TransformAxis rotation3: axis=(0.6376998 0.1186 0.7610998) coordinates=acromioclavicular_r1
      WrapEllipsoid Deltoid2: dimensions=(0.03 0.04 0.035) active=false
          xyz_body_rotation=(3.130423 -1.548805 -1.314233) translation=(-0.0058 -0.0378 0.0096) quadrant=-y
      WrapTorus Delt3: inner_radius=0.04 outer_radius=0.06 active=false
          xyz_body_rotation=(0.6209881 0.32882 -0.5607743) translation=(-0.0973 -0.0428 -0.037)
      WrapTorus INFSP: inner_radius=0.008 outer_radius=0.019 xyz_body_rotation=(0.02530727 0.5883505 0.1518436)
          translation=(-0.0561 -0.0199 -0.0112)
      WrapEllipsoid TMIN: dimensions=(0.03 0.03 0.05) xyz_body_rotation=(-2.097537 -0.2808235 -1.763481)
          translation=(-0.0418 -0.0519 -0.0359) quadrant=x
      WrapCylinder TRIlongglen: radius=0.003 length=0.03 xyz_body_rotation=(1.375319 -0.2946116 2.435956)
          translation=(-0.0359 -0.0309 -0.0132) quadrant=x
    Body scapphant: mass=0 mass_center=(0 0 0) inertia_xx=0 inertia_yy=0 inertia_zz=0
      CustomJoint unrothum: parent_body=scapula location_in_parent=(-0.00955 -0.034 0.009) location=(0 0 0)
        Coordinate unrothum_r1: default_value=0 initial_value=0 range=(-99999.9 99999.9) clamped=false
        Coordinate unrothum_r3: default_value=0 initial_value=0 range=(-99999.9 99999.9) clamped=false
        Coordinate unrothum_r2: default_value=0 initial_value=0 range=(-99999.9 99999.9) clamped=false
        SpatialTransform: axes_held_at_zero=(translation1 translation2 translation3)
          TransformAxis rotation1: axis=(0.6376998 0.1186 0.7610998) coordinates=unrothum_r1
          TransformAxis rotation2: axis=(-0.754084 0.297594 0.585487) coordinates=unrothum_r3
          TransformAxis rotation3: axis=(0.1570949 0.9472686 -0.2792909) coordinates=unrothum_r2
    Body humphant: mass=0 mass_center=(0 0 0) inertia_xx=0 inertia_yy=0 inertia_zz=0
      CustomJoint shoulder0: parent_body=scapphant location_in_parent=(0 0 0) location=(0 0 0)
        Coordinate elv_angle: default_value=0 initial_value=0 range=(-1.570796 2.268928) keys=(s_key leftmouse_button)
            clamped=true
        SpatialTransform: axes_held_at_zero=(rotation1 rotation3 translation1 translation2 translation3)
          TransformAxis rotation2: axis=(0.0048 0.9990892 0.04240001) coordinates=elv_angle
              LinearFunction(coefficients=1 0)
    Body humphant1: mass=0 mass_center=(0 0 0) inertia_xx=0 inertia_yy=0 inertia_zz=0
      CustomJoint shoulder1: parent_body=humphant location_in_parent=(0 0 0) location=(0 0 0)
        Coordinate shoulder_elv: default_value=0 initial_value=0 range=(0 3.141593) keys=(s_key middlemouse_button)
            clamped=true
        Coordinate shoulder1_r2: default_value=0 initial_value=0 range=(-99999.9 99999.9) clamped=false
        SpatialTransform: axes_held_at_zero=(rotation1 translation1 translation2 translation3)
          TransformAxis rotation2: axis=(-0.9982614 0.0023 0.05889802) coordinates=shoulder_elv
              LinearFunction(coefficients=1 0)
          TransformAxis rotation3: axis=(0.0048 0.9990892 0.04240001) coordinates=shoulder1_r2
    Body humerus: mass=0 mass_center=(0 0 0) inertia_xx=0 inertia_yy=0 inertia_zz=0 meshes=humerus.vtp
      CustomJoint shoulder2: parent_body=humphant1 location_in_parent=(0 0 0) location=(0 0 0)
        Coordinate shoulder_rot: default_value=0 initial_value=0 range=(-1.570796 0.3490659)
            keys=(s_key rightmouse_button) clamped=true
        SpatialTransform: axes_held_at_zero=(rotation1 rotation3 translation1 translation2 translation3)
          TransformAxis rotation2: axis=(0.0048 0.9990892 0.04240001) coordinates=shoulder_rot
              LinearFunction(coefficients=1 0)
      WrapEllipsoid DELT1hh: dimensions=(0.00003 0.0001 0.00005) xyz_body_rotation=(0.05846853 1.004612 0.5703736)
          translation=(-0.0139 -0.0127 -0.0262) quadrant=z
      WrapCylinder delt2hum: radius=0.0000094 length=0.00005 xyz_body_rotation=(1.680927 -0.02495821 0.05166175)
          translation=(0.0017 -0.0958 0.0011)
      WrapEllipsoid delt3hum: dimensions=(0.00001 0.00001 0.00005) xyz_body_rotation=(1.727352 0.07592182 -2.743134)
          translation=(0.0019 -0.0592 0.0011) quadrant=x
      WrapEllipsoid SUPSP: dimensions=(0.00002 0.00002 0.00002) xyz_body_rotation=(0.03804818 0.00855211 -1.306728)
          translation=(0.0002 0.0077 0.0043)
      WrapEllipsoid INFSP_and_TMIN_hum_head: dimensions=(0.00002 0.000025 0.00002)
          xyz_body_rotation=(-0.2865831 -0.00907571 -0.06841691) translation=(-0.0003 0.0026 0.0038)
      WrapEllipsoid SUBSCAP: dimensions=(0.00002 0.000017 0.000028) xyz_body_rotation=(-0.9245009 0.288852 0.381529)
          translation=(-0.0025 0.0007 -0.0045)
      WrapCylinder TMINhum: radius=0.000007 length=0.00007 xyz_body_rotation=(1.753532 0.06928957 2.746276)
          translation=(-0.0014 -0.0455 0) quadrant=x
      WrapSphere TMAJ_LAT_PEC_CORBhh: radius=0.00003 translation=(0.0007 0 0.006)
      WrapCylinder TMAJ_LAThum: radius=0.000007 length=0.00004 xyz_body_rotation=(1.536413 -0.06370452 1.41424)
          translation=(0.0007 -0.0443 -0.0055) quadrant=-x
      WrapEllipsoid PEC1hh: dimensions=(0.00003 0.00002 0.00002) xyz_body_rotation=(-0.6204646 -0.3104941 0.3637266)
          translation=(-0.0037 0.0005 -0.0025) quadrant=-z
      WrapCylinder PEC12hum: radius=0.000009 length=0.00007 xyz_body_rotation=(1.559277 -0.07749262 -0.9258972)
          translation=(0.002 -0.0508 -0.0017) quadrant=x
      WrapSphere PEC23hh: radius=0.00002 translation=(-0.0086 0.0021 -0.0004)
      WrapCylinder PEC3hum: radius=0.000008 length=0.00007 xyz_body_rotation=(1.440944 -0.0561996 1.751961)
          translation=(0.0009 -0.0551 -0.0004) quadrant=-x
      WrapCylinder LAT_TMAJhh: radius=0.000007 length=0.000045 xyz_body_rotation=(-0.3050835 -0.01832596 -0.6866125)
          translation=(-0.0224 0.0102 0.0094) quadrant=-y
      WrapSphere LAT_TMAJ2hh: radius=0.00003 xyz_body_rotation=(-0.1272345 0.2761111 0.01972222)
          translation=(-0.0016 0.0092 0.0052) quadrant=-z
      WrapCylinder CORBhum: radius=0.000008 length=0.00005 xyz_body_rotation=(-1.608321 0.09599311 0.8752826)
          translation=(0.0027 -0.1202 -0.0059) quadrant=x
      WrapEllipsoid TRIlonghh: dimensions=(0.000035 0.00002 0.00002) xyz_body_rotation=(3.001617 -0.853466 2.574186)
          translation=(-0.0078 -0.0041 -0.0014) quadrant=z
      WrapCylinder TRI: radius=0.000016 length=0.00004 xyz_body_rotation=(-0.1401499 -0.00628319 0.1549852)
          translation=(0.0028 -0.2919 -0.0119)
      WrapEllipsoid ANC: dimensions=(0.00002 0.00002 0.00002) xyz_body_rotation=(0.00750492 -0.1966986 1.049292)
          translation=(0.0134 -0.2861 -0.0008) quadrant=-x
      WrapEllipsoid BIClong: dimensions=(0.000025 0.00002 0.00002) xyz_body_rotation=(-2.004336 -1.001644 0.9754645)
          translation=(0.0033 0.0073 0.0003) quadrant=-y
      WrapEllipsoid Elbow_BIC_BRD: dimensions=(0.000015 0.000015 0.0001)
          xyz_body_rotation=(-0.1286308 0.1375319 0.03071779) translation=(0.0019 -0.289 -0.014) quadrant=x
      WrapEllipsoid Elbow_PT_ECRL: dimensions=(0.000018 0.000025 0.000035)
          xyz_body_rotation=(-0.1610939 -0.1108284 0.6145304) translation=(0.003 -0.2872 -0.0069) quadrant=x
    Body ulna: mass=0 mass_center=(0 0 0) inertia_xx=0 inertia_yy=0 inertia_zz=0 meshes=ulna.vtp
      CustomJoint elbow: parent_body=humerus location_in_parent=(0.0061 -0.2904 -0.0123) location=(0 0 0)
        Coordinate elbow_flexion: default_value=0 initial_value=0 range=(0 2.268928) keys=(e_key leftmouse_button)
            clamped=true
        SpatialTransform: axes_held_at_zero=(rotation1 rotation2 translation1 translation2 translation3)
          TransformAxis rotation3: axis=(0.04940001 0.03660001 0.9981083) coordinates=elbow_flexion
              LinearFunction(coefficients=1 0)
      WrapCylinder PQ2: radius=0.007 length=0.01 xyz_body_rotation=(1.391376 0.06894051 1.522451)
          translation=(-0.0012 -0.2092 0.0428)
    Body radius: mass=0 mass_center=(0 0 0) inertia_xx=0 inertia_yy=0 inertia_zz=0 meshes=radius.vtp
      CustomJoint radioulnar: parent_body=ulna location_in_parent=(0.0004 -0.011503 0.019999) location=(0 0 0)
        Coordinate pro_sup: default_value=0 initial_value=0 range=(-1.570796 1.570796) keys=(p_key leftmouse_button)
            clamped=true
        SpatialTransform: axes_held_at_zero=(rotation1 rotation3 translation1 translation2 translation3)
          TransformAxis rotation2: axis=(-0.01716099 0.9926656 -0.119668) coordinates=pro_sup
              LinearFunction(coefficients=1 0)
      WrapCylinder SUP: radius=0.008 length=0.04 xyz_body_rotation=(1.447751 0.3040364 -2.441017)
          translation=(0.0045 -0.0437 0.0059) quadrant=-x
      WrapTorus ECU: inner_radius=0.006 outer_radius=0.009 xyz_body_rotation=(-0.9866346 -0.1488766 0.222704)
          translation=(-0.0163 -0.2417 0.0349)
      WrapCylinder PQ1: radius=0.01 length=0.01 xyz_body_rotation=(-1.607623 -0.0127409 -2.690251)
          translation=(0.0281 -0.1986 0.0288)
    Body lunate: mass=0 mass_center=(0 0 0) inertia_xx=0 inertia_yy=0 inertia_zz=0 meshes=lunate.vtp
      CustomJoint radiocarpal: parent_body=radius location_in_parent=(0.018 -0.242 0.025) location=(0 0 0)
        Coordinate deviation: default_value=0 initial_value=0 range=(-0.1745329 0.4363323)
            keys=(v_key leftmouse_button) clamped=true
        Coordinate flexion: default_value=0 initial_value=0 range=(-1.22173 1.22173) keys=(f_key leftmouse_button)
            clamped=true
        SpatialTransform: axes_held_at_zero=(rotation2 translation1 translation2 translation3)
          TransformAxis rotation1: axis=(-0.819064 -0.135611 -0.557444) coordinates=deviation
            NaturalCubicSpline: x=(-0.1745329 0 0.4363323) y=(-0.1745329 0 0.4363323)
          TransformAxis rotation3: axis=(0.9564267 -0.2522069 0.147104) coordinates=flexion
            NaturalCubicSpline: x=(-1.570796 1.570796) y=(-0.7853982 0.7853982)
      WrapEllipsoid Extensor_ellipse: dimensions=(0.05 0.02 0.013) xyz_body_rotation=(-0.2508038 0.2855359 0.2328269)
          translation=(0.0007 -0.0135 0.0047) quadrant=z
      WrapTorus ECRL: inner_radius=0.008 outer_radius=0.016 xyz_body_rotation=(1.538333 0.2343977 0.7311184)
          translation=(0.0222 -0.0096 0.0208)
      WrapTorus ECRB: inner_radius=0.008 outer_radius=0.01 xyz_body_rotation=(1.312662 -0.1178097 -0.1162389)
          translation=(0.0126 -0.0095 0.0186)
      WrapTorus FCR: inner_radius=0.001 outer_radius=0.0025 xyz_body_rotation=(-1.555961 -0.1532399 -0.1000074)
          translation=(0.0032 -0.0045 -0.019)
      WrapTorus FCU: inner_radius=0.0068 outer_radius=0.008 xyz_body_rotation=(-1.573763 -0.07976155 0.39235)
          translation=(-0.0123 -0.0124 -0.0171)
      WrapEllipsoid PL: dimensions=(0.025 0.014 0.012) xyz_body_rotation=(-0.03159046 0.0996583 0.06335545)
          translation=(0.0057 -0.018 -0.0041) quadrant=-z
      WrapEllipsoid FDS: dimensions=(0.025 0.013 0.012) xyz_body_rotation=(0.00837758 -0.08168141 -0.01710423)
          translation=(0.0012 -0.0057 -0.0003) quadrant=-z
      WrapEllipsoid FDP: dimensions=(0.025 0.013 0.012) xyz_body_rotation=(-1.467473 -0.1946042 0.121824)
          translation=(-0.0022 -0.0069 0.0032) quadrant=y
      WrapTorus EDCL: inner_radius=0.008 outer_radius=0.012 xyz_body_rotation=(2.363176 0.1930334 -0.2691298)
          translation=(-0.0128 -0.0133 0.0148)
      WrapTorus EDCR: inner_radius=0.009 outer_radius=0.011 xyz_body_rotation=(1.983916 0.100531 0.5230752)
          translation=(-0.0098 -0.0137 0.0166)
      WrapTorus EDCM: inner_radius=0.009 outer_radius=0.012 xyz_body_rotation=(1.993166 0.1979203 0.3682645)
          translation=(-0.0007 -0.0117 0.0191)
      WrapTorus EDCI: inner_radius=0.009 outer_radius=0.012 xyz_body_rotation=(1.697682 0.08970992 0.00767945)
          translation=(0.009 -0.0149 0.0211)
      WrapEllipsoid EDM: dimensions=(0.018 0.014 0.008) xyz_body_rotation=(2.962696 0.1593486 0.1179843)
          translation=(-0.0167 -0.0022 0.0048) quadrant=-z
      WrapEllipsoid FPL: dimensions=(0.016 0.01 0.01) xyz_body_rotation=(-0.1663299 -0.08220501 -0.06597345)
          translation=(0.017 -0.025 -0.0033) quadrant=-z
    Body scaphoid: mass=0 mass_center=(0 0 0) inertia_xx=0 inertia_yy=0 inertia_zz=0 meshes=scaphoid.vtp
      WeldJoint lun_scaph: parent_body=lunate location_in_parent=(0.012345 -0.004464 -0.001254) location=(0 0 0)
    Body pisiform: mass=0 mass_center=(0 0 0) inertia_xx=0 inertia_yy=0 inertia_zz=0 meshes=pisiform.vtp
      WeldJoint lun_pis: parent_body=lunate location_in_parent=(-0.013388 -0.009886 -0.010593) location=(0 0 0)
    Body triquetrum: mass=0 mass_center=(0 0 0) inertia_xx=0 inertia_yy=0 inertia_zz=0 meshes=triquetrum.vtp
      WeldJoint lun_triq: parent_body=lunate location_in_parent=(-0.010784 -0.007499 -0.001289) location=(0 0 0)
    Body capitate: mass=0 mass_center=(0 0 0) inertia_xx=0 inertia_yy=0 inertia_zz=0 meshes=capitate.vtp
      CustomJoint proximal_distal: parent_body=lunate location_in_parent=(0.003992 -0.015054 0.002327) location=(0 0 0)
        Coordinate proximal_distal_r1: default_value=0 initial_value=0 range=(-99999.9 99999.9) clamped=false
        Coordinate proximal_distal_r3: default_value=0 initial_value=0 range=(-99999.9 99999.9) clamped=false
        SpatialTransform: axes_held_at_zero=(rotation2 translation1 translation2 translation3)
          TransformAxis rotation1: axis=(0.8991357 -0.3490529 -0.2640399) coordinates=proximal_distal_r1
          TransformAxis rotation3: axis=(0.9971185 0.01069999 -0.07510096) coordinates=proximal_distal_r3
    Body trapezium: mass=0 mass_center=(0 0 0) inertia_xx=0 inertia_yy=0 inertia_zz=0 meshes=trapezium.vtp
      WeldJoint cap_trpzm: parent_body=capitate location_in_parent=(0.015293 -0.004569 -0.010308) location=(0 0 0)
    Body trapezoid: mass=0 mass_center=(0 0 0) inertia_xx=0 inertia_yy=0 inertia_zz=0 meshes=trapezoid.vtp
      WeldJoint cap_trpzd: parent_body=capitate location_in_parent=(0.009143 -0.004062 -0.002464) location=(0 0 0)
    Body hamate: mass=0 mass_center=(0 0 0) inertia_xx=0 inertia_yy=0 inertia_zz=0 meshes=hamate.vtp
      WeldJoint cap_ham: parent_body=capitate location_in_parent=(-0.010969 -0.002495 -0.00075) location=(0 0 0)
    Body firstmc1: mass=0 mass_center=(0 0 0) inertia_xx=0 inertia_yy=0 inertia_zz=0
      CustomJoint CMC1a: parent_body=trapezium location_in_parent=(0 0 0) location=(0 0 0)
        Coordinate cmc_flexion: default_value=0 initial_value=0 range=(-0.2617994 0.7853982)
            keys=(c_key leftmouse_button) clamped=true
        SpatialTransform: axes_held_at_zero=(rotation1 rotation2 translation1 translation2 translation3)
          TransformAxis rotation3: axis=(-0.04239899 -0.6652858 0.7453838) coordinates=cmc_flexion
              LinearFunction(coefficients=1 0)
      WrapTorus APL: inner_radius=0.004 outer_radius=0.008 active=false
          xyz_body_rotation=(-1.609892 0.2478367 -0.0301942) translation=(0.0082 0.0023 -0.0101)
    Body firstmc: mass=0 mass_center=(0 0 0) inertia_xx=0 inertia_yy=0 inertia_zz=0 meshes=1mc.vtp
      CustomJoint CMC1b: parent_body=firstmc1 location_in_parent=(0.0072 -0.0054 -0.0025) location=(0 0 0)
        Coordinate cmc_abduction: default_value=0 initial_value=0 range=(-0.4363323 0.4363323)
            keys=(a_key leftmouse_button) clamped=true
        SpatialTransform: axes_held_at_zero=(rotation2 rotation3 translation1 translation2 translation3)
          TransformAxis rotation1: axis=(0.495557 0.731736 0.467959) coordinates=cmc_abduction
              LinearFunction(coefficients=1 0)
      WrapCylinder MPthumb: radius=0.0085 length=0.02 xyz_body_rotation=(0.3213151 0.1101303 -0.834791)
          translation=(0.0177 -0.0305 -0.0143)
    Body secondmc: mass=0 mass_center=(0 0 0) inertia_xx=0 inertia_yy=0 inertia_zz=0 meshes=2mc.vtp
      WeldJoint CMC2: parent_body=capitate location_in_parent=(0.014685 -0.03762 0.005032) location=(0 0 0)
      WrapEllipsoid 2ndmcp: dimensions=(0.005 0.005 0.0065) xyz_body_rotation=(0.8492772 -1.335526 1.338144)
          translation=(0.0058 -0.0294 0.0007) quadrant=-x
    Body thirdmc: mass=0 mass_center=(0 0 0) inertia_xx=0 inertia_yy=0 inertia_zz=0 meshes=3mc.vtp
      WeldJoint CMC3: parent_body=capitate location_in_parent=(0.000477 -0.039239 0.007377) location=(0 0 0)
      WrapEllipsoid 3rdmcp: dimensions=(0.005 0.005 0.0065) xyz_body_rotation=(2.579422 -1.44967 2.906148)
          translation=(0.0016 -0.0271 0.0001) quadrant=-x
      WrapSphere 3rdmcp2: translation=(0.0009 -0.0241 0.0031) quadrant=all radius=0.005
    Body fourthmc: mass=0 mass_center=(0 0 0) inertia_xx=0 inertia_yy=0 inertia_zz=0 meshes=4mc.vtp
      WeldJoint CMC4: parent_body=capitate location_in_parent=(-0.012046 -0.040519 0.003513) location=(0 0 0)
      WrapEllipsoid 4thmcp: dimensions=(0.005 0.005 0.0065) xyz_body_rotation=(-2.972121 -1.22173 -2.463183)
          translation=(-0.0003 -0.0254 -0.0003) quadrant=-x
      WrapSphere 4thmcp2: translation=(-0.0015 -0.0219 0.0016) quadrant=all radius=0.005
    Body fifthmc: mass=0 mass_center=(0 0 0) inertia_xx=0 inertia_yy=0 inertia_zz=0 meshes=5mc.vtp
      WeldJoint CMC5: parent_body=capitate location_in_parent=(-0.021896 -0.034683 -0.004218) location=(0 0 0)
      WrapEllipsoid 5thmcp: dimensions=(0.005 0.005 0.0065) xyz_body_rotation=(-2.67175 -0.834791 -2.465976)
          translation=(-0.0004 -0.0218 -0.0037) quadrant=-x
      WrapSphere 5thmcp2: translation=(-0.003 -0.0204 -0.0019) quadrant=all radius=0.005
    Body proximal_thumb: mass=0 mass_center=(0 0 0) inertia_xx=0 inertia_yy=0 inertia_zz=0 meshes=thumbprox.vtp
      CustomJoint MCP: parent_body=firstmc location_in_parent=(0.0165 -0.0292 -0.0127) location=(0 0 0)
        Coordinate mp_flexion: default_value=0 initial_value=0 range=(-0.7853982 0.6981317)
            keys=(m_key leftmouse_button) clamped=true
        SpatialTransform: axes_held_at_zero=(rotation1 rotation2 translation1 translation2 translation3)
          TransformAxis rotation3: axis=(-0.084295 -0.203488 0.975442) coordinates=mp_flexion
              LinearFunction(coefficients=1 0)
      WrapCylinder IPthumb: radius=0.0045 length=0.01 xyz_body_rotation=(0.3047345 0.01291544 0.08796459)
          translation=(0.0121 -0.0302 -0.0096) quadrant=-x
    Body distal_thumb: mass=0 mass_center=(0 0 0) inertia_xx=0 inertia_yy=0 inertia_zz=0 meshes=thumbdist.vtp
      CustomJoint IP: parent_body=proximal_thumb location_in_parent=(0.014 -0.0259 -0.0101) location=(0 0 0)
        Coordinate ip_flexion: default_value=0 initial_value=0 range=(-1.308997 0.4363323)
            keys=(i_key leftmouse_button) clamped=true
        SpatialTransform: axes_held_at_zero=(rotation1 rotation2 translation1 translation2 translation3)
          TransformAxis rotation3: axis=(-0.05010201 -0.4796231 0.8760431) coordinates=ip_flexion
              LinearFunction(coefficients=1 0)
    Body proxph2: mass=0 mass_center=(0 0 0) inertia_xx=0 inertia_yy=0 inertia_zz=0 meshes=2proxph.vtp
      CustomJoint MCP2: parent_body=secondmc location_in_parent=(0.003501 -0.028243 0.00362) location=(0 0 0)
        Coordinate mcp2_flexion: default_value=0 initial_value=0 range=(0 1.570796) clamped=false
        Coordinate mcp2_abduction: default_value=0 initial_value=0 range=(-0.2617994 0.2617994) clamped=true
        SpatialTransform: axes_held_at_zero=(rotation2 translation1 translation2 translation3)
          TransformAxis rotation1: axis=(0.9975061 -0.03949601 0.05849401) coordinates=mcp2_flexion
              LinearFunction(coefficients=1 0)
          TransformAxis rotation3: axis=(-0.05499898 0.08589897 0.9947846) coordinates=mcp2_abduction
              LinearFunction(coefficients=1 0)
      WrapCylinder Secondpm: radius=0.004 length=0.01 xyz_body_rotation=(0.7419395 -1.473931 0.7096509)
          translation=(0.0075 -0.0407 0.0061)
    Body midph2: mass=0 mass_center=(0 0 0) inertia_xx=0 inertia_yy=0 inertia_zz=0 meshes=2midph.vtp
      CustomJoint prox2-midph: parent_body=proxph2 location_in_parent=(0.007517 -0.041273 0.007326) location=(0 0 0)
        Coordinate pm2_flexion: default_value=0 initial_value=0 range=(0 1.570796) clamped=true
        SpatialTransform: axes_held_at_zero=(rotation2 rotation3 translation1 translation2 translation3)
          TransformAxis rotation1: axis=(0.9603449 0.040998 -0.275784) coordinates=pm2_flexion
              LinearFunction(coefficients=1 0)
      WrapCylinder Secondmd: radius=0.003 length=0.01 xyz_body_rotation=(0.5017822 -1.413019 0.6473426)
          translation=(0.0036 -0.0243 0.0003) quadrant=x
    Body distph2: mass=0 mass_center=(0 0 0) inertia_xx=0 inertia_yy=0 inertia_zz=0 meshes=2distph.vtp
      CustomJoint mid2-distph: parent_body=midph2 location_in_parent=(0.003333 -0.024888 0.00122) location=(0 0 0)
        Coordinate md2_flexion: default_value=0 initial_value=0 range=(0 1.570796) clamped=false
        SpatialTransform: axes_held_at_zero=(rotation2 rotation3 translation1 translation2 translation3)
          TransformAxis rotation1: axis=(0.9789773 0.07690602 -0.1889151) coordinates=md2_flexion
              LinearFunction(coefficients=1 0)
    Body proxph3: mass=0 mass_center=(0 0 0) inertia_xx=0 inertia_yy=0 inertia_zz=0 meshes=3proxph.vtp
      CustomJoint MCP3: parent_body=thirdmc location_in_parent=(0.00024 -0.02629 0.001778) location=(0 0 0)
        Coordinate mcp3_flexion: default_value=0 initial_value=0 range=(0 1.570796) clamped=false
        Coordinate mcp3_abduction: default_value=0 initial_value=0 range=(-0.2617994 0.2617994) clamped=true
        SpatialTransform: axes_held_at_zero=(rotation2 translation1 translation2 translation3)
          TransformAxis rotation1: axis=(0.970748 -0.167208 0.172308) coordinates=mcp3_flexion
              LinearFunction(coefficients=1 0)
          TransformAxis rotation3: axis=(-0.159892 0.085196 0.983451) coordinates=mcp3_abduction
              LinearFunction(coefficients=1 0)
      WrapCylinder Thirdpm: radius=0.004 length=0.01 xyz_body_rotation=(1.808859 -1.506045 1.853191)
          translation=(0.0017 -0.0439 0.005)
      WrapSphere Thirdpm2: translation=(0.0017 -0.0439 0.005) quadrant=all radius=0.005
    Body midph3: mass=0 mass_center=(0 0 0) inertia_xx=0 inertia_yy=0 inertia_zz=0 meshes=3midph.vtp
      CustomJoint prox3-midph: parent_body=proxph3 location_in_parent=(0.00165 -0.044211 0.00623) location=(0 0 0)
        Coordinate pm3_flexion: default_value=0 initial_value=0 range=(0 1.570796) clamped=true
        SpatialTransform: axes_held_at_zero=(rotation2 rotation3 translation1 translation2 translation3)
          TransformAxis rotation1: axis=(0.992332 -0.115004 -0.045301) coordinates=pm3_flexion
              LinearFunction(coefficients=1 0)
      WrapCylinder Thirdmd: radius=0.003 length=0.01 xyz_body_rotation=(1.37881 -1.493304 1.518611)
          translation=(0.0014 -0.0289 0.0012) quadrant=x
      WrapSphere Thirdmd2: translation=(0.0014 -0.0289 0.0012) quadrant=all radius=0.004
    Body distph3: mass=0 mass_center=(0 0 0) inertia_xx=0 inertia_yy=0 inertia_zz=0 meshes=3distph.vtp
      CustomJoint mid3-distph: parent_body=midph3 location_in_parent=(0.001365 -0.029047 0.001954) location=(0 0 0)
        Coordinate md3_flexion: default_value=0 initial_value=0 range=(0 1.570796) clamped=true
        SpatialTransform: axes_held_at_zero=(rotation2 rotation3 translation1 translation2 translation3)
          TransformAxis rotation1: axis=(0.989822 0.093493 0.107292) coordinates=md3_flexion
              LinearFunction(coefficients=1 0)
    Body proxph4: mass=0 mass_center=(0 0 0) inertia_xx=0 inertia_yy=0 inertia_zz=0 meshes=4proxph.vtp
      CustomJoint MCP4: parent_body=fourthmc location_in_parent=(-0.00183 -0.023689 -0.000173) location=(0 0 0)
        Coordinate mcp4_flexion: default_value=0 initial_value=0 range=(0 1.570796) clamped=false
        Coordinate mcp4_abduction: default_value=0 initial_value=0 range=(-0.2617994 0.2617994) clamped=true
        SpatialTransform: axes_held_at_zero=(rotation2 translation1 translation2 translation3)
          TransformAxis rotation1: axis=(0.891962 -0.342185 0.295487) coordinates=mcp4_flexion
              LinearFunction(coefficients=1 0)
          TransformAxis rotation3: axis=(-0.291121 0.065105 0.954468) coordinates=mcp4_abduction
              LinearFunction(coefficients=1 0)
      WrapCylinder Fourthpm: radius=0.004 length=0.01 xyz_body_rotation=(-3.02291 -1.123119 -1.27252)
          translation=(-0.0033 -0.0401 -0.0001)
    Body midph4: mass=0 mass_center=(0 0 0) inertia_xx=0 inertia_yy=0 inertia_zz=0 meshes=4midph.vtp
      CustomJoint prox4-midph: parent_body=proxph4 location_in_parent=(-0.003528 -0.040255 0.001345) location=(0 0 0)
        Coordinate pm4_flexion: default_value=0 initial_value=0 range=(0 1.570796) clamped=false
        SpatialTransform: axes_held_at_zero=(rotation2 rotation3 translation1 translation2 translation3)
          TransformAxis rotation1: axis=(0.913701 -0.1097 0.3913) coordinates=pm4_flexion
              LinearFunction(coefficients=1 0)
      WrapCylinder Fourthmd: radius=0.003 length=0.01 xyz_body_rotation=(-3.029717 -1.102874 -2.872114)
          translation=(-0.0021 -0.0247 -0.0001) quadrant=x
    Body distph4: mass=0 mass_center=(0 0 0) inertia_xx=0 inertia_yy=0 inertia_zz=0 meshes=4distph.vtp
      CustomJoint mid4-distph: parent_body=midph4 location_in_parent=(-0.002317 -0.024789 0.000563) location=(0 0 0)
        Coordinate md4_flexion: default_value=0 initial_value=0 range=(0 1.570796) clamped=true
        SpatialTransform: axes_held_at_zero=(rotation2 rotation3 translation1 translation2 translation3)
          TransformAxis rotation1: axis=(0.900778 -0.057999 0.430389) coordinates=md4_flexion
              LinearFunction(coefficients=1 0)
    Body proxph5: mass=0 mass_center=(0 0 0) inertia_xx=0 inertia_yy=0 inertia_zz=0 meshes=5proxph.vtp
      CustomJoint MCP5: parent_body=fifthmc location_in_parent=(-0.001597 -0.021431 -0.001496) location=(0 0 0)
        Coordinate mcp5_flexion: default_value=0 initial_value=0 range=(0 1.570796) clamped=false
        Coordinate mcp5_abduction: default_value=0 initial_value=0 range=(-0.2617994 0.2617994) clamped=true
        SpatialTransform: axes_held_at_zero=(rotation2 translation1 translation2 translation3)
          TransformAxis rotation1: axis=(0.828072 -0.254191 0.499683) coordinates=mcp5_flexion
              LinearFunction(coefficients=1 0)
          TransformAxis rotation3: axis=(-0.510048 0.028303 0.85968) coordinates=mcp5_abduction
              LinearFunction(coefficients=1 0)
      WrapCylinder Fifthpm: radius=0.004 length=0.01 xyz_body_rotation=(-2.931979 -0.8775515 -2.954493)
          translation=(-0.0046 -0.0349 -0.0042)
    Body midph5: mass=0 mass_center=(0 0 0) inertia_xx=0 inertia_yy=0 inertia_zz=0 meshes=5midph.vtp
      CustomJoint prox5-midph: parent_body=proxph5 location_in_parent=(-0.005279 -0.035563 -0.002879) location=(0 0 0)
        Coordinate pm5_flexion: default_value=0 initial_value=0 range=(0 1.570796) clamped=false
        SpatialTransform: axes_held_at_zero=(rotation2 rotation3 translation1 translation2 translation3)
          TransformAxis rotation1: axis=(0.657113 -0.381007 0.650412) coordinates=pm5_flexion
              LinearFunction(coefficients=1 0)
      WrapCylinder Fifthmd: radius=0.003 length=0.01 xyz_body_rotation=(-2.904402 -0.7251843 -2.99673)
          translation=(-0.0025 -0.0205 -0.0025) quadrant=x
    Body distph5: mass=0 mass_center=(0 0 0) inertia_xx=0 inertia_yy=0 inertia_zz=0 meshes=5distph.vtp
      CustomJoint mid5-distph: parent_body=midph5 location_in_parent=(-0.002871 -0.020677 -0.002243) location=(0 0 0)
        Coordinate md5_flexion: default_value=0 initial_value=0 range=(0 1.570796) clamped=true
        SpatialTransform: axes_held_at_zero=(rotation2 rotation3 translation1 translation2 translation3)
          TransformAxis rotation1: axis=(0.643112 -0.226804 0.731414) coordinates=md5_flexion
              LinearFunction(coefficients=1 0)
    Body bicpt: mass=0 mass_center=(0 0 0) inertia_xx=0 inertia_yy=0 inertia_zz=0
      CustomJoint bicpt: parent_body=radius location_in_parent=(0 0 0) location=(0 0 0)
        Coordinate bicpt_tx: default_value=-0.0001 initial_value=-0.0001 range=(-99999.9 99999.9) clamped=false
        Coordinate bicpt_ty: default_value=-0.0276 initial_value=-0.0276 range=(-99999.9 99999.9) clamped=false
        Coordinate bicpt_tz: default_value=-0.0043 initial_value=-0.0043 range=(-99999.9 99999.9) clamped=false
        SpatialTransform: axes_held_at_zero=(rotation1 rotation2 rotation3)
          TransformAxis translation1: axis=(1 0 0) coordinates=bicpt_tx
          TransformAxis translation2: axis=(0 1 0) coordinates=bicpt_ty
          TransformAxis translation3: axis=(0 0 1) coordinates=bicpt_tz
    Body bicpt2: mass=0 mass_center=(0 0 0) inertia_xx=0 inertia_yy=0 inertia_zz=0
      CustomJoint bicpt2: parent_body=radius location_in_parent=(0 0 0) location=(0 0 0)
        Coordinate bicpt2_tx: default_value=0.0146695 initial_value=0.0146695 range=(-99999.9 99999.9) clamped=false
        Coordinate bicpt2_ty: default_value=-0.0102 initial_value=-0.0102 range=(-99999.9 99999.9) clamped=false
        Coordinate bicpt2_tz: default_value=-0.01061843 initial_value=-0.01061843 range=(-99999.9 99999.9)
            clamped=false
        SpatialTransform: axes_held_at_zero=(rotation1 rotation2 rotation3)
          TransformAxis translation1: axis=(1 0 0) coordinates=bicpt2_tx
          TransformAxis translation2: axis=(0 1 0) coordinates=bicpt2_ty
          TransformAxis translation3: axis=(0 0 1) coordinates=bicpt2_tz
    Body ptpt: mass=0 mass_center=(0 0 0) inertia_xx=0 inertia_yy=0 inertia_zz=0
      CustomJoint ptpt: parent_body=ulna location_in_parent=(0 0 0) location=(0 0 0)
        Coordinate ptpt_tx: default_value=0.00755 initial_value=0.00755 range=(-99999.9 99999.9) clamped=false
        Coordinate ptpt_ty: default_value=-0.0649 initial_value=-0.0649 range=(-99999.9 99999.9) clamped=false
        Coordinate ptpt_tz: default_value=-0.00005 initial_value=-0.00005 range=(-99999.9 99999.9) clamped=false
        SpatialTransform: axes_held_at_zero=(rotation1 rotation2 rotation3)
          TransformAxis translation1: axis=(1 0 0) coordinates=ptpt_tx
          TransformAxis translation2: axis=(0 1 0) coordinates=ptpt_ty
          TransformAxis translation3: axis=(0 0 1) coordinates=ptpt_tz
    Body FCUpt: mass=0 mass_center=(0 0 0) inertia_xx=0 inertia_yy=0 inertia_zz=0
      CustomJoint FCUpt: parent_body=radius location_in_parent=(0 0 0) location=(0 0 0)
        Coordinate FCUpt_tx: default_value=0.004 initial_value=0.004 range=(-99999.9 99999.9) clamped=false
        Coordinate FCUpt_ty: default_value=-0.1841 initial_value=-0.1841 range=(-99999.9 99999.9) clamped=false
        Coordinate FCUpt_tz: default_value=0.0005 initial_value=0.0005 range=(-99999.9 99999.9) clamped=false
        SpatialTransform: axes_held_at_zero=(rotation1 rotation2 rotation3)
          TransformAxis translation1: axis=(1 0 0) coordinates=FCUpt_tx
          TransformAxis translation2: axis=(0 1 0) coordinates=FCUpt_ty
          TransformAxis translation3: axis=(0 0 1) coordinates=FCUpt_tz
    Body EDCpt: mass=0 mass_center=(0 0 0) inertia_xx=0 inertia_yy=0 inertia_zz=0
      CustomJoint EDCpt: parent_body=radius location_in_parent=(0 0 0) location=(0 0 0)
        Coordinate EDCpt_tx: default_value=0 initial_value=0 range=(-99999.9 99999.9) clamped=false
        Coordinate EDCpt_ty: default_value=0 initial_value=0 range=(-99999.9 99999.9) clamped=false
        Coordinate EDCpt_tz: default_value=0 initial_value=0 range=(-99999.9 99999.9) clamped=false
        SpatialTransform: axes_held_at_zero=(rotation1 rotation2 rotation3)
          TransformAxis translation1: axis=(1 0 0) coordinates=EDCpt_tx
          TransformAxis translation2: axis=(0 1 0) coordinates=EDCpt_ty
          TransformAxis translation3: axis=(0 0 1) coordinates=EDCpt_tz
    Body APLpt: mass=0 mass_center=(0 0 0) inertia_xx=0 inertia_yy=0 inertia_zz=0
      CustomJoint APLpt: parent_body=capitate location_in_parent=(0 0 0) location=(0 0 0)
        Coordinate APLpt_tx: default_value=0 initial_value=0 range=(-99999.9 99999.9) clamped=false
        Coordinate APLpt_ty: default_value=0 initial_value=0 range=(-99999.9 99999.9) clamped=false
        Coordinate APLpt_tz: default_value=0 initial_value=0 range=(-99999.9 99999.9) clamped=false
        SpatialTransform: axes_held_at_zero=(rotation1 rotation2 rotation3)
          TransformAxis translation1: axis=(1 0 0) coordinates=APLpt_tx
          TransformAxis translation2: axis=(0 1 0) coordinates=APLpt_ty
          TransformAxis translation3: axis=(0 0 1) coordinates=APLpt_tz
    Body FPLpt: mass=0 mass_center=(0 0 0) inertia_xx=0 inertia_yy=0 inertia_zz=0
      CustomJoint FPLpt: parent_body=capitate location_in_parent=(0 0 0) location=(0 0 0)
        Coordinate FPLpt_tx: default_value=0 initial_value=0 range=(-99999.9 99999.9) clamped=false
        Coordinate FPLpt_ty: default_value=0 initial_value=0 range=(-99999.9 99999.9) clamped=false
        Coordinate FPLpt_tz: default_value=0 initial_value=0 range=(-99999.9 99999.9) clamped=false
        SpatialTransform: axes_held_at_zero=(rotation1 rotation2 rotation3)
          TransformAxis translation1: axis=(1 0 0) coordinates=FPLpt_tx
          TransformAxis translation2: axis=(0 1 0) coordinates=FPLpt_ty
          TransformAxis translation3: axis=(0 0 1) coordinates=FPLpt_tz
    Body FPLpt2: mass=0 mass_center=(0 0 0) inertia_xx=0 inertia_yy=0 inertia_zz=0
      CustomJoint FPLpt2: parent_body=capitate location_in_parent=(0 0 0) location=(0 0 0)
        Coordinate FPLpt2_tx: default_value=0 initial_value=0 range=(-99999.9 99999.9) clamped=false
        Coordinate FPLpt2_ty: default_value=0 initial_value=0 range=(-99999.9 99999.9) clamped=false
        Coordinate FPLpt2_tz: default_value=0 initial_value=0 range=(-99999.9 99999.9) clamped=false
        SpatialTransform: axes_held_at_zero=(rotation1 rotation2 rotation3)
          TransformAxis translation1: axis=(1 0 0) coordinates=FPLpt2_tx
          TransformAxis translation2: axis=(0 1 0) coordinates=FPLpt2_ty
          TransformAxis translation3: axis=(0 0 1) coordinates=FPLpt2_tz
    Body PEC1pt2: mass=0 mass_center=(0 0 0) inertia_xx=0 inertia_yy=0 inertia_zz=0
      CustomJoint PEC1pt2: parent_body=humerus location_in_parent=(0 0 0) location=(0 0 0)
        Coordinate PEC1pt2_tx: default_value=0 initial_value=0 range=(-99999.9 99999.9) clamped=false
        Coordinate PEC1pt2_ty: default_value=0 initial_value=0 range=(-99999.9 99999.9) clamped=false
        Coordinate PEC1pt2_tz: default_value=0 initial_value=0 range=(-99999.9 99999.9) clamped=false
        SpatialTransform: axes_held_at_zero=(rotation1 rotation2 rotation3)
          TransformAxis translation1: axis=(1 0 0) coordinates=PEC1pt2_tx
          TransformAxis translation2: axis=(0 1 0) coordinates=PEC1pt2_ty
          TransformAxis translation3: axis=(0 0 1) coordinates=PEC1pt2_tz
    Body PEC1pt3: mass=0 mass_center=(0 0 0) inertia_xx=0 inertia_yy=0 inertia_zz=0
      CustomJoint PEC1pt3: parent_body=thorax location_in_parent=(0 0 0) location=(0 0 0)
        Coordinate PEC1pt3_tx: default_value=0 initial_value=0 range=(-99999.9 99999.9) clamped=false
        Coordinate PEC1pt3_ty: default_value=0 initial_value=0 range=(-99999.9 99999.9) clamped=false
        Coordinate PEC1pt3_tz: default_value=0 initial_value=0 range=(-99999.9 99999.9) clamped=false
        SpatialTransform: axes_held_at_zero=(rotation1 rotation2 rotation3)
          TransformAxis translation1: axis=(1 0 0) coordinates=PEC1pt3_tx
          TransformAxis translation2: axis=(0 1 0) coordinates=PEC1pt3_ty
          TransformAxis translation3: axis=(0 0 1) coordinates=PEC1pt3_tz
    Body PEC2pt2: mass=0 mass_center=(0 0 0) inertia_xx=0 inertia_yy=0 inertia_zz=0
      CustomJoint PEC2pt2: parent_body=humerus location_in_parent=(0 0 0) location=(0 0 0)
        Coordinate PEC2pt2_tx: default_value=0 initial_value=0 range=(-99999.9 99999.9) clamped=false
        Coordinate PEC2pt2_ty: default_value=0 initial_value=0 range=(-99999.9 99999.9) clamped=false
        Coordinate PEC2pt2_tz: default_value=0 initial_value=0 range=(-99999.9 99999.9) clamped=false
        SpatialTransform: axes_held_at_zero=(rotation1 rotation2 rotation3)
          TransformAxis translation1: axis=(1 0 0) coordinates=PEC2pt2_tx
          TransformAxis translation2: axis=(0 1 0) coordinates=PEC2pt2_ty
          TransformAxis translation3: axis=(0 0 1) coordinates=PEC2pt2_tz
    Body PEC2pt3: mass=0 mass_center=(0 0 0) inertia_xx=0 inertia_yy=0 inertia_zz=0
      CustomJoint PEC2pt3: parent_body=thorax location_in_parent=(0 0 0) location=(0 0 0)
        Coordinate PEC2pt3_tx: default_value=0 initial_value=0 range=(-99999.9 99999.9) clamped=false
        Coordinate PEC2pt3_ty: default_value=0 initial_value=0 range=(-99999.9 99999.9) clamped=false
        Coordinate PEC2pt3_tz: default_value=0 initial_value=0 range=(-99999.9 99999.9) clamped=false
        SpatialTransform: axes_held_at_zero=(rotation1 rotation2 rotation3)
          TransformAxis translation1: axis=(1 0 0) coordinates=PEC2pt3_tx
          TransformAxis translation2: axis=(0 1 0) coordinates=PEC2pt3_ty
          TransformAxis translation3: axis=(0 0 1) coordinates=PEC2pt3_tz
    Body PEC3pt2: mass=0 mass_center=(0 0 0) inertia_xx=0 inertia_yy=0 inertia_zz=0
      CustomJoint PEC3pt2: parent_body=humerus location_in_parent=(0 0 0) location=(0 0 0)
        Coordinate PEC3pt2_tx: default_value=0 initial_value=0 range=(-99999.9 99999.9) clamped=false
        Coordinate PEC3pt2_ty: default_value=0 initial_value=0 range=(-99999.9 99999.9) clamped=false
        Coordinate PEC3pt2_tz: default_value=0 initial_value=0 range=(-99999.9 99999.9) clamped=false
        SpatialTransform: axes_held_at_zero=(rotation1 rotation2 rotation3)
          TransformAxis translation1: axis=(1 0 0) coordinates=PEC3pt2_tx
          TransformAxis translation2: axis=(0 1 0) coordinates=PEC3pt2_ty
          TransformAxis translation3: axis=(0 0 1) coordinates=PEC3pt2_tz
    Body PEC3pt3: mass=0 mass_center=(0 0 0) inertia_xx=0 inertia_yy=0 inertia_zz=0
      CustomJoint PEC3pt3: parent_body=thorax location_in_parent=(0 0 0) location=(0 0 0)
        Coordinate PEC3pt3_tx: default_value=0 initial_value=0 range=(-99999.9 99999.9) clamped=false
        Coordinate PEC3pt3_ty: default_value=0.00022532 initial_value=0.00022532 range=(-99999.9 99999.9) clamped=false
        Coordinate PEC3pt3_tz: default_value=0 initial_value=0 range=(-99999.9 99999.9) clamped=false
        SpatialTransform: axes_held_at_zero=(rotation1 rotation2 rotation3)
          TransformAxis translation1: axis=(1 0 0) coordinates=PEC3pt3_tx
          TransformAxis translation2: axis=(0 1 0) coordinates=PEC3pt3_ty
          TransformAxis translation3: axis=(0 0 1) coordinates=PEC3pt3_tz
    Body DELT2pt2a: mass=0 mass_center=(0 0 0) inertia_xx=0 inertia_yy=0 inertia_zz=0
      CustomJoint DELT2pt2a: parent_body=humerus location_in_parent=(0 0 0) location=(0 0 0)
        Coordinate DELT2pt2a_tx: default_value=0 initial_value=0 range=(-99999.9 99999.9) clamped=false
        Coordinate DELT2pt2a_ty: default_value=0 initial_value=0 range=(-99999.9 99999.9) clamped=false
        Coordinate DELT2pt2a_tz: default_value=0 initial_value=0 range=(-99999.9 99999.9) clamped=false
        SpatialTransform: axes_held_at_zero=(rotation1 rotation2 rotation3)
          TransformAxis translation1: axis=(1 0 0) coordinates=DELT2pt2a_tx
          TransformAxis translation2: axis=(0 1 0) coordinates=DELT2pt2a_ty
          TransformAxis translation3: axis=(0 0 1) coordinates=DELT2pt2a_tz
    Body DELT2pt2: mass=0 mass_center=(0 0 0) inertia_xx=0 inertia_yy=0 inertia_zz=0
      CustomJoint DELT2pt2: parent_body=DELT2pt2a location_in_parent=(0 0 0) location=(0 0 0)
        Coordinate DELT2pt2_tx: default_value=-0.00043991 initial_value=-0.00043991 range=(-99999.9 99999.9)
            clamped=false
        Coordinate DELT2pt2_ty: default_value=0 initial_value=0 range=(-99999.9 99999.9) clamped=false
        Coordinate DELT2pt2_tz: default_value=0 initial_value=0 range=(-99999.9 99999.9) clamped=false
        SpatialTransform: axes_held_at_zero=(rotation1 rotation2 rotation3)
          TransformAxis translation1: axis=(1 0 0) coordinates=DELT2pt2_tx
          TransformAxis translation2: axis=(0 1 0) coordinates=DELT2pt2_ty
          TransformAxis translation3: axis=(0 0 1) coordinates=DELT2pt2_tz
    Body LAT1pt2: mass=0 mass_center=(0 0 0) inertia_xx=0 inertia_yy=0 inertia_zz=0
      CustomJoint LAT1pt2: parent_body=scapula location_in_parent=(0 0 0) location=(0 0 0)
        Coordinate LAT1pt2_tx: default_value=0 initial_value=0 range=(-99999.9 99999.9) clamped=false
        Coordinate LAT1pt2_ty: default_value=0 initial_value=0 range=(-99999.9 99999.9) clamped=false
        Coordinate LAT1pt2_tz: default_value=0 initial_value=0 range=(-99999.9 99999.9) clamped=false
        SpatialTransform: axes_held_at_zero=(rotation1 rotation2 rotation3)
          TransformAxis translation1: axis=(1 0 0) coordinates=LAT1pt2_tx
          TransformAxis translation2: axis=(0 1 0) coordinates=LAT1pt2_ty
          TransformAxis translation3: axis=(0 0 1) coordinates=LAT1pt2_tz
    Body LAT1pt3: mass=0 mass_center=(0 0 0) inertia_xx=0 inertia_yy=0 inertia_zz=0
      CustomJoint LAT1pt3: parent_body=scapula location_in_parent=(0 0 0) location=(0 0 0)
        Coordinate LAT1pt3_tx: default_value=0 initial_value=0 range=(-99999.9 99999.9) clamped=false
        Coordinate LAT1pt3_ty: default_value=0 initial_value=0 range=(-99999.9 99999.9) clamped=false
        Coordinate LAT1pt3_tz: default_value=0 initial_value=0 range=(-99999.9 99999.9) clamped=false
        SpatialTransform: axes_held_at_zero=(rotation1 rotation2 rotation3)
          TransformAxis translation1: axis=(1 0 0) coordinates=LAT1pt3_tx
          TransformAxis translation2: axis=(0 1 0) coordinates=LAT1pt3_ty
          TransformAxis translation3: axis=(0 0 1) coordinates=LAT1pt3_tz
    Body LAT2pt2: mass=0 mass_center=(0 0 0) inertia_xx=0 inertia_yy=0 inertia_zz=0
      CustomJoint LAT2pt2: parent_body=scapula location_in_parent=(0 0 0) location=(0 0 0)
        Coordinate LAT2pt2_tx: default_value=0 initial_value=0 range=(-99999.9 99999.9) clamped=false
        Coordinate LAT2pt2_ty: default_value=0 initial_value=0 range=(-99999.9 99999.9) clamped=false
        Coordinate LAT2pt2_tz: default_value=0 initial_value=0 range=(-99999.9 99999.9) clamped=false
        SpatialTransform: axes_held_at_zero=(rotation1 rotation2 rotation3)
          TransformAxis translation1: axis=(1 0 0) coordinates=LAT2pt2_tx
          TransformAxis translation2: axis=(0 1 0) coordinates=LAT2pt2_ty
          TransformAxis translation3: axis=(0 0 1) coordinates=LAT2pt2_tz
    Body LAT2pt3: mass=0 mass_center=(0 0 0) inertia_xx=0 inertia_yy=0 inertia_zz=0
      CustomJoint LAT2pt3: parent_body=scapula location_in_parent=(0 0 0) location=(0 0 0)
        Coordinate LAT2pt3_tx: default_value=0 initial_value=0 range=(-99999.9 99999.9) clamped=false
        Coordinate LAT2pt3_ty: default_value=0 initial_value=0 range=(-99999.9 99999.9) clamped=false
        Coordinate LAT2pt3_tz: default_value=0 initial_value=0 range=(-99999.9 99999.9) clamped=false
        SpatialTransform: axes_held_at_zero=(rotation1 rotation2 rotation3)
          TransformAxis translation1: axis=(1 0 0) coordinates=LAT2pt3_tx
          TransformAxis translation2: axis=(0 1 0) coordinates=LAT2pt3_ty
          TransformAxis translation3: axis=(0 0 1) coordinates=LAT2pt3_tz
    Body LAT3pt2: mass=0 mass_center=(0 0 0) inertia_xx=0 inertia_yy=0 inertia_zz=0
      CustomJoint LAT3pt2: parent_body=scapula location_in_parent=(0 0 0) location=(0 0 0)
        Coordinate LAT3pt2_tx: default_value=0 initial_value=0 range=(-99999.9 99999.9) clamped=false
        Coordinate LAT3pt2_ty: default_value=0 initial_value=0 range=(-99999.9 99999.9) clamped=false
        Coordinate LAT3pt2_tz: default_value=0 initial_value=0 range=(-99999.9 99999.9) clamped=false
        SpatialTransform: axes_held_at_zero=(rotation1 rotation2 rotation3)
          TransformAxis translation1: axis=(1 0 0) coordinates=LAT3pt2_tx
          TransformAxis translation2: axis=(0 1 0) coordinates=LAT3pt2_ty
          TransformAxis translation3: axis=(0 0 1) coordinates=LAT3pt2_tz
    Body LAT3pt3: mass=0 mass_center=(0 0 0) inertia_xx=0 inertia_yy=0 inertia_zz=0
      CustomJoint LAT3pt3: parent_body=scapula location_in_parent=(0 0 0) location=(0 0 0)
        Coordinate LAT3pt3_tx: default_value=0 initial_value=0 range=(-99999.9 99999.9) clamped=false
        Coordinate LAT3pt3_ty: default_value=0 initial_value=0 range=(-99999.9 99999.9) clamped=false
        Coordinate LAT3pt3_tz: default_value=0 initial_value=0 range=(-99999.9 99999.9) clamped=false
        SpatialTransform: axes_held_at_zero=(rotation1 rotation2 rotation3)
          TransformAxis translation1: axis=(1 0 0) coordinates=LAT3pt3_tx
          TransformAxis translation2: axis=(0 1 0) coordinates=LAT3pt3_ty
          TransformAxis translation3: axis=(0 0 1) coordinates=LAT3pt3_tz
  ConstraintSet:
    CoordinateCouplerConstraint sternoclavicular_r2_con: dependent_coordinate_name=sternoclavicular_r2
        independent_coordinate_names=shoulder_elv
      coupled_coordinates_function f0:
        NaturalCubicSpline: x=(0 2.617994) y=(0 -0.6335545)
    CoordinateCouplerConstraint sternoclavicular_r3_con: dependent_coordinate_name=sternoclavicular_r3
        independent_coordinate_names=shoulder_elv
      coupled_coordinates_function f1:
        NaturalCubicSpline: x=(0 3.141593) y=(0 0.3220132)
    CoordinateCouplerConstraint unrotscap_r2_con: dependent_coordinate_name=unrotscap_r2
        independent_coordinate_names=shoulder_elv
      coupled_coordinates_function f2:
        NaturalCubicSpline: x=(0 2.617994) y=(0 0.6335545)
    CoordinateCouplerConstraint unrotscap_r3_con: dependent_coordinate_name=unrotscap_r3
        independent_coordinate_names=shoulder_elv
      coupled_coordinates_function f3:
        NaturalCubicSpline: x=(0 3.141593) y=(0 -0.3220132)
    CoordinateCouplerConstraint acromioclavicular_r1_con: dependent_coordinate_name=acromioclavicular_r1
        independent_coordinate_names=shoulder_elv
      coupled_coordinates_function f4:
        NaturalCubicSpline: x=(0 2.617994) y=(0 0.4660029)
    CoordinateCouplerConstraint acromioclavicular_r2_con: dependent_coordinate_name=acromioclavicular_r2
        independent_coordinate_names=shoulder_elv
      coupled_coordinates_function f5:
        NaturalCubicSpline: x=(0 2.617994) y=(0 -0.1282817)
    CoordinateCouplerConstraint acromioclavicular_r3_con: dependent_coordinate_name=acromioclavicular_r3
        independent_coordinate_names=shoulder_elv
      coupled_coordinates_function f6:
        NaturalCubicSpline: x=(0 2.617994) y=(0 1.036726)
    CoordinateCouplerConstraint unrothum_r1_con: dependent_coordinate_name=unrothum_r1
        independent_coordinate_names=shoulder_elv
      coupled_coordinates_function f7:
        NaturalCubicSpline: x=(0 2.617994) y=(0 -0.4660029)
    CoordinateCouplerConstraint unrothum_r2_con: dependent_coordinate_name=unrothum_r2
        independent_coordinate_names=shoulder_elv
      coupled_coordinates_function f8:
        NaturalCubicSpline: x=(0 2.617994) y=(0 0.1282817)
    CoordinateCouplerConstraint unrothum_r3_con: dependent_coordinate_name=unrothum_r3
        independent_coordinate_names=shoulder_elv
      coupled_coordinates_function f9:
        NaturalCubicSpline: x=(0 2.617994) y=(0 -1.036726)
    CoordinateCouplerConstraint shoulder1_r2_con: dependent_coordinate_name=shoulder1_r2
        independent_coordinate_names=elv_angle
      coupled_coordinates_function f11:
        NaturalCubicSpline: x=(-1.570796 3.141593) y=(1.570796 -3.141593)
    CoordinateCouplerConstraint proximal_distal_r1_con: dependent_coordinate_name=proximal_distal_r1
        independent_coordinate_names=deviation
      coupled_coordinates_function f18:
        NaturalCubicSpline: x=(-0.1745329 0 0.4363323) y=(-0.2617994 0 0.4363323)
    CoordinateCouplerConstraint proximal_distal_r3_con: dependent_coordinate_name=proximal_distal_r3
        independent_coordinate_names=flexion
      coupled_coordinates_function f19:
        NaturalCubicSpline: x=(-1.22173 1.22173) y=(-0.6108652 0.6108652)
    CoordinateCouplerConstraint bicpt_tx_con: dependent_coordinate_name=bicpt_tx
        independent_coordinate_names=elbow_flexion
      coupled_coordinates_function f70:
        NaturalCubicSpline: x=(0 2.268928) y=(-0.0001 0.0042)
    CoordinateCouplerConstraint bicpt_ty_con: dependent_coordinate_name=bicpt_ty
        independent_coordinate_names=elbow_flexion
      coupled_coordinates_function f71:
        NaturalCubicSpline: x=(0 2.268928) y=(-0.0276 -0.0425)
    CoordinateCouplerConstraint bicpt_tz_con: dependent_coordinate_name=bicpt_tz
        independent_coordinate_names=elbow_flexion
      coupled_coordinates_function f72:
        NaturalCubicSpline: x=(0 2.268928) y=(-0.0043 -0.0067)
    CoordinateCouplerConstraint bicpt2_tx_con: dependent_coordinate_name=bicpt2_tx independent_coordinate_names=pro_sup
      coupled_coordinates_function f80:
        NaturalCubicSpline: x=(-1.570796 -0.6108652 1.578228) y=(-0.003 0.01 0.01376)
    CoordinateCouplerConstraint bicpt2_ty_con: dependent_coordinate_name=bicpt2_ty
        independent_coordinate_names=elbow_flexion
      coupled_coordinates_function f81:
        NaturalCubicSpline: x=(0 2.274834) y=(-0.0102 -0.045607)
    CoordinateCouplerConstraint bicpt2_tz_con: dependent_coordinate_name=bicpt2_tz independent_coordinate_names=pro_sup
      coupled_coordinates_function f82:
        NaturalCubicSpline: x=(-1.570796 -0.6108652 1.575614) y=(-0.0095 -0.011533 -0.000331)
    CoordinateCouplerConstraint ptpt_tx_con: dependent_coordinate_name=ptpt_tx independent_coordinate_names=pro_sup
      coupled_coordinates_function f90:
        NaturalCubicSpline: x=(-1.570796 1.570796) y=(0.0142 0.0009)
    CoordinateCouplerConstraint ptpt_ty_con: dependent_coordinate_name=ptpt_ty independent_coordinate_names=pro_sup
      coupled_coordinates_function f91:
        NaturalCubicSpline: x=(-1.570796 1.570796) y=(-0.0606 -0.0692)
    CoordinateCouplerConstraint ptpt_tz_con: dependent_coordinate_name=ptpt_tz independent_coordinate_names=pro_sup
      coupled_coordinates_function f92:
        NaturalCubicSpline: x=(-1.570796 1.570796) y=(0.0072 -0.0073)
    CoordinateCouplerConstraint FCUpt_tx_con: dependent_coordinate_name=FCUpt_tx independent_coordinate_names=pro_sup
      coupled_coordinates_function f100:
        NaturalCubicSpline: x=(-1.570796 0 1.570796) y=(-0.0027 0.004 0.0132)
    CoordinateCouplerConstraint FCUpt_ty_con: dependent_coordinate_name=FCUpt_ty independent_coordinate_names=pro_sup
      coupled_coordinates_function f101:
        NaturalCubicSpline: x=(-1.570796 0 1.570796) y=(-0.1838 -0.1841 -0.1821)
    CoordinateCouplerConstraint FCUpt_tz_con: dependent_coordinate_name=FCUpt_tz independent_coordinate_names=pro_sup
      coupled_coordinates_function f102:
        NaturalCubicSpline: x=(-1.570796 0 1.570796) y=(0.0069 0.0005 0.0002)
    CoordinateCouplerConstraint EDCpt_tx_con: dependent_coordinate_name=EDCpt_tx independent_coordinate_names=pro_sup
      coupled_coordinates_function f110:
        NaturalCubicSpline: x=(-1.570796 0 1.570796) y=(0.0108 0 -0.0108)
    CoordinateCouplerConstraint EDCpt_ty_con: dependent_coordinate_name=EDCpt_ty independent_coordinate_names=pro_sup
      coupled_coordinates_function f111:
        NaturalCubicSpline: x=(-1.570796 0 1.570796) y=(-0.0013 0 0.0038)
    CoordinateCouplerConstraint EDCpt_tz_con: dependent_coordinate_name=EDCpt_tz independent_coordinate_names=pro_sup
      coupled_coordinates_function f112:
        NaturalCubicSpline: x=(-1.570796 0 1.570796) y=(-0.0035 0 -0.00089)
    CoordinateCouplerConstraint APLpt_tx_con: dependent_coordinate_name=APLpt_tx independent_coordinate_names=flexion
      coupled_coordinates_function f120:
        NaturalCubicSpline: x=(-1.22173 0 1.22173) y=(0 0 -0.0025)
    CoordinateCouplerConstraint APLpt_ty_con: dependent_coordinate_name=APLpt_ty independent_coordinate_names=flexion
      coupled_coordinates_function f121:
        NaturalCubicSpline: x=(-1.22173 0 1.22173) y=(0 0 -0.001)
    CoordinateCouplerConstraint APLpt_tz_con: dependent_coordinate_name=APLpt_tz independent_coordinate_names=flexion
      coupled_coordinates_function f122:
        NaturalCubicSpline: x=(-1.22173 0 1.22173) y=(0 0 -0.005)
    CoordinateCouplerConstraint FPLpt_tx_con: dependent_coordinate_name=FPLpt_tx independent_coordinate_names=flexion
      coupled_coordinates_function f130:
        NaturalCubicSpline: x=(-1.22173 0 1.22173) y=(0 0 -0.0032)
    CoordinateCouplerConstraint FPLpt_ty_con: dependent_coordinate_name=FPLpt_ty independent_coordinate_names=flexion
      coupled_coordinates_function f131:
        NaturalCubicSpline: x=(-1.22173 0 1.22173) y=(0 0 -0.0096)
    CoordinateCouplerConstraint FPLpt_tz_con: dependent_coordinate_name=FPLpt_tz independent_coordinate_names=flexion
      coupled_coordinates_function f132:
        NaturalCubicSpline: x=(-1.22173 0 1.22173) y=(0 0 -0.0054)
    CoordinateCouplerConstraint FPLpt2_tx_con: dependent_coordinate_name=FPLpt2_tx
        independent_coordinate_names=cmc_flexion
      coupled_coordinates_function f140:
        NaturalCubicSpline: x=(-0.2617994 0 0.08726646 0.1836751 0.3764925 0.7853032)
            y=(-0.0032 0 0.00004 0.000032 0.000008 0)
    CoordinateCouplerConstraint FPLpt2_ty_con: dependent_coordinate_name=FPLpt2_ty
        independent_coordinate_names=cmc_flexion
      coupled_coordinates_function f141:
        NaturalCubicSpline: x=(-0.2617994 0 0.7853982) y=(0.0005 0 0)
    CoordinateCouplerConstraint FPLpt2_tz_con: dependent_coordinate_name=FPLpt2_tz
        independent_coordinate_names=cmc_flexion
      coupled_coordinates_function f142:
        NaturalCubicSpline: x=(-0.2617994 0 0.7853982) y=(0.0006 0 0)
    CoordinateCouplerConstraint PEC1pt2_tx_con: dependent_coordinate_name=PEC1pt2_tx
        independent_coordinate_names=shoulder_elv
      coupled_coordinates_function f150:
        NaturalCubicSpline: x=(0 3.141593) y=(0 0.0059)
    CoordinateCouplerConstraint PEC1pt2_ty_con: dependent_coordinate_name=PEC1pt2_ty
        independent_coordinate_names=shoulder_elv
      coupled_coordinates_function f151:
        NaturalCubicSpline: x=(0 3.141593) y=(0 0.0207)
    CoordinateCouplerConstraint PEC1pt2_tz_con: dependent_coordinate_name=PEC1pt2_tz
        independent_coordinate_names=shoulder_elv
      coupled_coordinates_function f152:
        NaturalCubicSpline: x=(0 3.141593) y=(0 0.0144)
    CoordinateCouplerConstraint PEC1pt3_tx_con: dependent_coordinate_name=PEC1pt3_tx
        independent_coordinate_names=shoulder_elv
      coupled_coordinates_function f160:
        NaturalCubicSpline: x=(0 3.141593) y=(0 -0.0193)
    CoordinateCouplerConstraint PEC1pt3_ty_con: dependent_coordinate_name=PEC1pt3_ty
        independent_coordinate_names=shoulder_elv
      coupled_coordinates_function f161:
        NaturalCubicSpline: x=(0 3.141593) y=(0 0.0466)
    CoordinateCouplerConstraint PEC1pt3_tz_con: dependent_coordinate_name=PEC1pt3_tz
        independent_coordinate_names=shoulder_elv
      coupled_coordinates_function f162:
        NaturalCubicSpline: x=(0 3.141593) y=(0 -0.0442)
    CoordinateCouplerConstraint PEC2pt2_tx_con: dependent_coordinate_name=PEC2pt2_tx
        independent_coordinate_names=shoulder_elv
      coupled_coordinates_function f170:
        NaturalCubicSpline: x=(0 3.141593) y=(0 0.0059)
    CoordinateCouplerConstraint PEC2pt2_ty_con: dependent_coordinate_name=PEC2pt2_ty
        independent_coordinate_names=shoulder_elv
      coupled_coordinates_function f171:
        NaturalCubicSpline: x=(0 3.141593) y=(0 0.0207)
    CoordinateCouplerConstraint PEC2pt2_tz_con: dependent_coordinate_name=PEC2pt2_tz
        independent_coordinate_names=shoulder_elv
      coupled_coordinates_function f172:
        NaturalCubicSpline: x=(0 3.141593) y=(0 0.0144)
    CoordinateCouplerConstraint PEC2pt3_tx_con: dependent_coordinate_name=PEC2pt3_tx
        independent_coordinate_names=shoulder_elv
      coupled_coordinates_function f180:
        NaturalCubicSpline: x=(0 3.141593) y=(0 0.0013)
    CoordinateCouplerConstraint PEC2pt3_ty_con: dependent_coordinate_name=PEC2pt3_ty
        independent_coordinate_names=shoulder_elv
      coupled_coordinates_function f181:
        NaturalCubicSpline: x=(0 3.141593) y=(0 0.0432)
    CoordinateCouplerConstraint PEC2pt3_tz_con: dependent_coordinate_name=PEC2pt3_tz
        independent_coordinate_names=shoulder_elv
      coupled_coordinates_function f182:
        NaturalCubicSpline: x=(0 3.141593) y=(0 -0.0227)
    CoordinateCouplerConstraint PEC3pt2_tx_con: dependent_coordinate_name=PEC3pt2_tx
        independent_coordinate_names=shoulder_elv
      coupled_coordinates_function f190:
        NaturalCubicSpline: x=(0 0.7475172 3.141593) y=(0 0.002482 0.0059)
    CoordinateCouplerConstraint PEC3pt2_ty_con: dependent_coordinate_name=PEC3pt2_ty
        independent_coordinate_names=shoulder_elv
      coupled_coordinates_function f191:
        NaturalCubicSpline: x=(0 3.131491) y=(0 0.011474)
    CoordinateCouplerConstraint PEC3pt2_tz_con: dependent_coordinate_name=PEC3pt2_tz
        independent_coordinate_names=shoulder_elv
      coupled_coordinates_function f192:
        NaturalCubicSpline: x=(0 0.6230557 2.291237 3.125328) y=(0 0.009968 0.018193 0.017746)
    CoordinateCouplerConstraint PEC3pt3_tx_con: dependent_coordinate_name=PEC3pt3_tx
        independent_coordinate_names=shoulder_elv
      coupled_coordinates_function f200:
        NaturalCubicSpline: x=(0 3.141593) y=(0 0)
    CoordinateCouplerConstraint PEC3pt3_ty_con: dependent_coordinate_name=PEC3pt3_ty
        independent_coordinate_names=shoulder_elv
      coupled_coordinates_function f201:
        NaturalCubicSpline: x=(0.01010158 1.59605 3.141593) y=(0.000222 0.011219 0.0441)
    CoordinateCouplerConstraint PEC3pt3_tz_con: dependent_coordinate_name=PEC3pt3_tz
        independent_coordinate_names=shoulder_elv
      coupled_coordinates_function f202:
        NaturalCubicSpline: x=(0 3.141593) y=(0 0)
    CoordinateCouplerConstraint DELT2pt2a_tx_con: dependent_coordinate_name=DELT2pt2a_tx
        independent_coordinate_names=shoulder_elv
      coupled_coordinates_function f210:
        NaturalCubicSpline: x=(0 3.141593) y=(0 -0.0169)
    CoordinateCouplerConstraint DELT2pt2a_ty_con: dependent_coordinate_name=DELT2pt2a_ty
        independent_coordinate_names=shoulder_elv
      coupled_coordinates_function f211:
        NaturalCubicSpline: x=(0 3.141593) y=(0 -0.0781)
    CoordinateCouplerConstraint DELT2pt2a_tz_con: dependent_coordinate_name=DELT2pt2a_tz
        independent_coordinate_names=shoulder_elv
      coupled_coordinates_function f212:
        NaturalCubicSpline: x=(0 1.222292 3.141593) y=(0 -0.005395 -0.0363)
    CoordinateCouplerConstraint DELT2pt2_tx_con: dependent_coordinate_name=DELT2pt2_tx
        independent_coordinate_names=shoulder_rot
      coupled_coordinates_function f220:
        NaturalCubicSpline: x=(-1.570796 -0.01015029 0.349046) y=(0.0214 0.000049 -0.020005)
    CoordinateCouplerConstraint DELT2pt2_ty_con: dependent_coordinate_name=DELT2pt2_ty
        independent_coordinate_names=shoulder_rot
      coupled_coordinates_function f221:
        NaturalCubicSpline: x=(-1.570796 -1.181885 -0.1694821 0 0.3490659) y=(-0.0029 -0.002148 -0.000139 0 -0.001644)
    CoordinateCouplerConstraint DELT2pt2_tz_con: dependent_coordinate_name=DELT2pt2_tz
        independent_coordinate_names=shoulder_rot
      coupled_coordinates_function f222:
        NaturalCubicSpline: x=(-1.570796 -0.4966612 0 0.3428927) y=(-0.0455 -0.006762 0 -0.00573)
    CoordinateCouplerConstraint LAT1pt2_tx_con: dependent_coordinate_name=LAT1pt2_tx
        independent_coordinate_names=shoulder_elv
      coupled_coordinates_function f230:
        NaturalCubicSpline: x=(0 3.141593) y=(0 -0.0021)
    CoordinateCouplerConstraint LAT1pt2_ty_con: dependent_coordinate_name=LAT1pt2_ty
        independent_coordinate_names=shoulder_elv
      coupled_coordinates_function f231:
        NaturalCubicSpline: x=(0 3.141593) y=(0 0.0352)
    CoordinateCouplerConstraint LAT1pt2_tz_con: dependent_coordinate_name=LAT1pt2_tz
        independent_coordinate_names=shoulder_elv
      coupled_coordinates_function f232:
        NaturalCubicSpline: x=(0 3.141593) y=(0 -0.0144)
    CoordinateCouplerConstraint LAT1pt3_tx_con: dependent_coordinate_name=LAT1pt3_tx
        independent_coordinate_names=shoulder_elv
      coupled_coordinates_function f240:
        NaturalCubicSpline: x=(0 3.141593) y=(0 0.0058)
    CoordinateCouplerConstraint LAT1pt3_ty_con: dependent_coordinate_name=LAT1pt3_ty
        independent_coordinate_names=shoulder_elv
      coupled_coordinates_function f241:
        NaturalCubicSpline: x=(0 3.141593) y=(0 0.0508)
    CoordinateCouplerConstraint LAT1pt3_tz_con: dependent_coordinate_name=LAT1pt3_tz
        independent_coordinate_names=shoulder_elv
      coupled_coordinates_function f242:
        NaturalCubicSpline: x=(0 3.141593) y=(0 -0.042)
    CoordinateCouplerConstraint LAT2pt2_tx_con: dependent_coordinate_name=LAT2pt2_tx
        independent_coordinate_names=shoulder_elv
      coupled_coordinates_function f250:
        NaturalCubicSpline: x=(0 3.141593) y=(0 -0.0141)
    CoordinateCouplerConstraint LAT2pt2_ty_con: dependent_coordinate_name=LAT2pt2_ty
        independent_coordinate_names=shoulder_elv
      coupled_coordinates_function f251:
        NaturalCubicSpline: x=(0 3.141593) y=(0 0.0305)
    CoordinateCouplerConstraint LAT2pt2_tz_con: dependent_coordinate_name=LAT2pt2_tz
        independent_coordinate_names=shoulder_elv
      coupled_coordinates_function f252:
        NaturalCubicSpline: x=(0 3.141593) y=(0 -0.0129)
    CoordinateCouplerConstraint LAT2pt3_tx_con: dependent_coordinate_name=LAT2pt3_tx
        independent_coordinate_names=shoulder_elv
      coupled_coordinates_function f260:
        NaturalCubicSpline: x=(0 3.141593) y=(0 -0.0294)
    CoordinateCouplerConstraint LAT2pt3_ty_con: dependent_coordinate_name=LAT2pt3_ty
        independent_coordinate_names=shoulder_elv
      coupled_coordinates_function f261:
        NaturalCubicSpline: x=(0 3.141593) y=(0 0.0644)
    CoordinateCouplerConstraint LAT2pt3_tz_con: dependent_coordinate_name=LAT2pt3_tz
        independent_coordinate_names=shoulder_elv
      coupled_coordinates_function f262:
        NaturalCubicSpline: x=(0 3.141593) y=(0 -0.0721)
    CoordinateCouplerConstraint LAT3pt2_tx_con: dependent_coordinate_name=LAT3pt2_tx
        independent_coordinate_names=shoulder_elv
      coupled_coordinates_function f270:
        NaturalCubicSpline: x=(0 3.141593) y=(0 -0.0552)
    CoordinateCouplerConstraint LAT3pt2_ty_con: dependent_coordinate_name=LAT3pt2_ty
        independent_coordinate_names=shoulder_elv
      coupled_coordinates_function f271:
        NaturalCubicSpline: x=(0 3.141593) y=(0 0.0341)
    CoordinateCouplerConstraint LAT3pt2_tz_con: dependent_coordinate_name=LAT3pt2_tz
        independent_coordinate_names=shoulder_elv
      coupled_coordinates_function f272:
        NaturalCubicSpline: x=(0 3.141593) y=(0 -0.0173)
    CoordinateCouplerConstraint LAT3pt3_tx_con: dependent_coordinate_name=LAT3pt3_tx
        independent_coordinate_names=shoulder_elv
      coupled_coordinates_function f280:
        NaturalCubicSpline: x=(0 3.141593) y=(0 -0.0366)
    CoordinateCouplerConstraint LAT3pt3_ty_con: dependent_coordinate_name=LAT3pt3_ty
        independent_coordinate_names=shoulder_elv
      coupled_coordinates_function f281:
        NaturalCubicSpline: x=(0 3.141593) y=(0 0.0744)
    CoordinateCouplerConstraint LAT3pt3_tz_con: dependent_coordinate_name=LAT3pt3_tz
        independent_coordinate_names=shoulder_elv
      coupled_coordinates_function f282:
        NaturalCubicSpline: x=(0 3.141593) y=(0 -0.0901)
